# Rahmenlose Schiebefenster - Skyframe AG - Sky-Frame 2

Dataset: ILCD process, EPD, representative dataset
Geography: DE
Reference year: 2018
Valid until: 2023
Classification: OEKOBAU.DAT: Komponenten von Fenstern und Vorhangfassaden / Füllungen / Transparente Füllungen
Synonyms: Schiebetür; Schiebefenster; Fenster
Method details: EPD Rahmenlose Schiebefenster; Produktkategorieregeln Teil A; Produktkategorieregeln Teil B – für Fenster, Flachdachfenster, Lichtkuppeln und Lichtbänder
Owner: Sky-Frame AG
Compliance: EN 15804
Review: Independent external review by Patrick Wortner
Amounts: rows without a unit in brackets have none in this file; such an amount is in the reference unit of its flow, which a separate flow dataset defines
copyright: true

## General comment
Module A1-A3. Das Umweltprofil beinhaltet die Aufwendungen für die Lebenszyklus-Stadien cradle-to-gate (Modul A1-A3). Die Herstellung der Verpackung wurde innerhalb der Module A1-A3 berücksichtigt.

## Geography
Dieser Datensatz repräsentiert die Situation des Unternehmens Sky-Frame AG in 8500 Frauenfeld, Schweiz, im Hinblick auf die wichtigsten Technologien und die gesetzlichen Rahmenbedingungen.

## Time period
jährlicher Durchschnitt

## Technology and included processes
Die Ökobilanzergebnisse umfassen die Lebenszyklusstadien der Herstellung der Vorprodukte bis hin zur Rohstoffgewinnung und Verarbeitungsprozesse von als Input dienenden Sekundärstoffen (z.B. Recyclingprozesse), deren Transporte zum Werk sowie die Produktion selbst, einschließlich der Bereitstellung von allen Hilfs- und Betriebsstoffen, Energie, sowie die vollständige Abfallbehandlung oder die Deponierung der Restabfälle während des Stadiums der Produktion. Die Module A1, A2 und A3 sind hier als ein aggregiertes Modul A1-A3 ausgewiesen. Falls für diesen Datensatz weitere Module berechnet wurden, sind diese separat zu finden und können für eine Betrachtung des gesamten Lebenszyklus zusammengeführt werden.

## Technical purpose
Rahmenlose Schiebetüren / Fenster für den privatwirtschaftlichen Gebäudesektor.

## Reference product
- Rahmenlose Schiebefenster - Skyframe AG - Sky-Frame 2: 1

## Inputs
- Use of net fresh water (FW) [m3]: A1-A3 0.28
- Use of non renewable primary energy (PENRE) [MJ]: A1-A3 978.78
- Use of non renewable primary energy resources used as raw materials (PENRM) [MJ]: A1-A3 14.18
- Use of non renewable secondary fuels (NRSF) [MJ]: A1-A3 6.24e-8
- Use of renewable primary energy (PERE) [MJ]: A1-A3 159.6
- Use of renewable primary energy resources used as raw materials (PERM) [MJ]: A1-A3 42.4
- Use of renewable secondary fuels (RSF) [MJ]: A1-A3 5.31e-9
- Use of secondary material (SM) [kg]: A1-A3 1.15
- Total use of non renewable primary energy resource (PENRT) [MJ]: A1-A3 992.96
- Total use of renewable primary energy resources (PERT) [MJ]: A1-A3 202.02

## Outputs
- Components for re-use (CRU) [kg]: A1-A3 0
- Exported electrical energy (EEE) [MJ]: A1-A3 0
- Exported thermal energy (EET) [MJ]: A1-A3 0
- Hazardous waste disposed (HWD) [kg]: A1-A3 1.33e-6
- Materials for energy recovery (MER) [kg]: A1-A3 0
- Materials for recycling (MFR) [kg]: A1-A3 3.93
- Non hazardous waste dispose (NHWD) [kg]: A1-A3 28.37
- Radioactive waste disposed (RWD) [kg]: A1-A3 0.0808

## Impact indicators
- Abiotic depletion potential for non fossil resources (ADPE) [kg Sb-Äqv.]: A1-A3 0.000416
- Abiotic depletion potential for fossil resources (ADPF) [MJ]: A1-A3 780.04
- Acidification potential of soil and water (AP) [kg SO2-Äqv.]: A1-A3 0.39
- Eutrophication potential (EP) [kg Phosphat-Äqv.]: A1-A3 0.0332
- Global warming potential (GWP) [kg CO2-Äqv.]: A1-A3 46.49
- Depletion potential of the stratospheric ozone layer (ODP) [kg CFC 11 eq.]: A1-A3 1.34e-7
- Formation potential of tropospheric ozone (POCP) [kg Ethen-Äqv.]: A1-A3 0.0213

## Use advice
Dieser Datensatz beinhaltet die Ergebnisse für die Module A1-A3 gemäß EN 15804. Ein Vergleich mit anderen Produkten ist nur mit einer vergleichbaren Anwendung im Gebäude zulässig. Grundsätzlich ist eine Gegenüberstellung oder die Bewertung von EPD Daten nur möglich, wenn alle zu vergleichenden Datensätze nach EN 15804 erstellt wurden und der Gebäudekontext, bzw. die produktspezifischen Leistungsmerkmale berücksichtigt werden.

## Review details
Die angewendete LCI Methode ist in Übereinstimmung mit ISO 14040 und 14044. Die Dokumentation enthält alle relevanten Informationen im Hinblick auf die Datenqualität und den Umfang der Anwendung der jeweiligen LCI Ergebnisse bzw. der Datensätze. Der Datensatz repräsentiert den Stand der Technik bezogen auf die funktionelle Einheit.

## Data sources
- GaBi database (all versions)
