# WPC Terrassendielen

Dataset: ILCD process, EPD, average dataset
Geography: DE
Reference year: 2015
Valid until: 2020
Classification: OEKOBAU.DAT: Holz / Holzwerkstoffe / Wood-Plastic-Composites
Classification: IBUCategories: 02 Bauprodukte / Holzwerkstoffe / Terrassenbeläge aus Holz-Polymer-Verbundwerkstoffen (WPC)
Method details: Terrassenbeläge aus Holz-Polymer-Verbundwerkstoffen (WPC).pdf
Owner: Verband der Deutschen Holzwerkstoffindustrie e.V.
Compliance: DIN EN 15804; ISO 14025
Review: Accredited third party review by IBU
Amounts: rows without a unit in brackets have none in this file; such an amount is in the reference unit of its flow, which a separate flow dataset defines
copyright: false

## General comment
Bei dem deklarierten Produkt handelt es sich um speziell für den Außenbereich geeignete Holz-Kunststoff-Terrassendielen. Die Kunststoffmatrix kann entweder aus Polyethylen (PE), Polypropylen (PP) oder Polyvinylchlorid (PVC) bestehen.

Die EPD bezieht sich nicht auf ein spezifisches Produkt eines Herstellers, sondern deklariert die durchschnittliche Umweltqualität für alle WPC-Terrassendielen von Mitgliedsunternehmen des VHI. Die Angaben repräsentieren 80 % des deutschen Marktes. Detaillierte Daten sind der Produktbeschreibung des jeweiligen Herstellers zu entnehmen.

## Technology and included processes
Bei dem deklarierten Produkt handelt es sich um Terrassendielen aus Holz-Polymer-Verbundwerkstoffen (WPC), die hauptsächlich aus Holzfasern (Fichte und Kiefer aus Industrierestholz) einer Kunststoffmatrix (entweder Polyethylen (PE), Polypropylen (PP) oder Polyvinylchlorid (PVC)) und Additiven bestehen. Bei der Herstellung von WPC-Profilen gibt es zwei unterschiedliche in der Praxis eingesetzte Verfahren. Zum einen die Direktextrusion, in der die Rohstoffe direkt zugegeben werden und zum anderen ein zweistufiger Prozess aus Compoundieren und Extrudieren. Im Anschluss an die Kühlung wird die Oberfläche der WPC-Terrassendiele durch eine Bürste aufgeraut, um Eigenschaften wie Barfußfreundlichkeit und Rutschfestigkeit zu gewährleisten. Allgemeine Regelungen zu WPC-Produkten und WPC-Terrassendielen sind in der Norm DIN EN 15234, Teile 1 und 4 sowie den Qualitäts- und Prüfbestimmungen der Qualitätsgemeinschaft Holzwerkstoffe enthalten.
Technische Daten:
Die nachfolgend aufgeführten bautechnischen Daten gelten für alle WPC-Terrassendielen der beteiligten Hersteller.
Deklarierte Einheit:
Die deklarierte Einheit ist wie folgt definiert:
1 m² installierte WPC-Terrassendiele, mit den Abmessungen 3.000-6.000 mm/138-196 mm/21-38 mm und einem Flächengewicht von 18,36 kg/m², über eine Nutzungsdauer von 30 Jahren.
Die Zusammensetzung der WPC-Terrassendiele ergibt sich aus dem gewichteten Durchschnitt in Abhängigkeit des Produktionsvolumens der beteiligten Hersteller.

## Technical purpose
WPC-Terrassendielen nach /DIN EN 15534:2014, Teile 1-4/ dienen als Bodenbelag und können nur als nicht-tragendes Bauelement eingesetzt werden (keine allgemeine bauaufsichtliche Zulassung erforderlich).
Die Produkte sind gesundheitlich unbedenklich und technisch sicher.

## Scenarios
- S1: zum Rcycling
- S2: Zur Thermischenverwertung

## Reference product
- 1 m² WPC-Terrassendiele: 1

## Inputs
- Erneuerbare Primärenergie als Energieträger (PERE) [MJ]: A1-A3 2.9, A4 0.566141, B2 0.253698, C2 0.275555, C3 (S1) 0, C3 (S2) 0, D (S1) -65.813, D (S2) -3.7663
- Erneuerbare Primärenergie zur stofflichen Nutzung (PERM) [MJ]: A1-A3 199.35, A4 0, B2 0, C2 0, C3 (S1) 0, C3 (S2) 0, D (S1) 0, D (S2) -219.65
- Total erneuerbare Primärenergie (PERT) [MJ]: A1-A3 202.25, A4 0.566141, B2 0.253698, C2 0.275555, C3 (S1) 0, C3 (S2) 0, D (S1) -65.813, D (S2) -223.416
- Nicht-erneuerbare Primärenergie als Energieträger (PENRE) [MJ]: A1-A3 248, A4 7.42228, B2 3.61261, C2 3.61261, C3 (S1) 0, C3 (S2) 0, D (S1) -316.156, D (S2) -19.42
- Nicht-erneuerbare Primärenergie zur stofflichen Nutzung (PENRM) [MJ]: A1-A3 287.086, A4 0, B2 0, C2 0, C3 (S1) 0, C3 (S2) 0, D (S1) 0, D (S2) -277.809
- Total nicht erneuerbare Primärenergie (PENRT) [MJ]: A1-A3 535, A4 7.42228, B2 3.61261, C2 3.61261, C3 (S1) 0, C3 (S2) 0, D (S1) -316.156, D (S2) -297.229
- Einsatz von Sekundärstoffen (SM) [kg]: A1-A3 0, A4 0, B2 0, C2 0, C3 (S1) 0, C3 (S2) 0, D (S1) 0, D (S2) 17.44
- Erneuerbare Sekundärbrennstoffe (RSF) [MJ]: A1-A3 0, A4 0, B2 0, C2 0, C3 (S1) 0, C3 (S2) 0, D (S1) 196, D (S2) 9.8
- Nicht erneuerbare Sekundärbrennstoffe (NRSF) [MJ]: A1-A3 0, A4 0, B2 0, C2 0, C3 (S1) 0, C3 (S2) 0, D (S1) 272, D (S2) 136
- Einsatz von Süßwasserressourcen (FW) [m^3]: A1-A3 89.5552, A4 0.326583, B2 0.158956, C2 0.158956, C3 (S1) 0, C3 (S2) 0, D (S1) 28.9642, D (S2) -34.1162

## Outputs
- Gefährlicher Abfall zur Deponie (HWD) [kg]: A1-A3 0.000213, A4 5.98e-6, B2 1.46e-6, C2 2.91e-6, C3 (S1) 0, C3 (S2) 0, D (S1) -0.000135, D (S2) -5.55e-5
- Entsorgter nicht gefährlicher Abfall (NHWD) [kg]: A1-A3 0.356, A4 0.00185, B2 0.00158, C2 0.000902, C3 (S1) 0, C3 (S2) 0, D (S1) -0.055, D (S2) -0.237
- Entsorgter radioaktiver Abfall (RWD) [kg]: A1-A3 0.0177, A4 9.87e-6, B2 8.67e-5, C2 4.8e-6, C3 (S1) 0, C3 (S2) 0, D (S1) -0.0122, D (S2) -0.00116
- Komponenten für die Wiederverwendung (CRU) [kg]: A1-A3 0, A4 0, B2 0, C2 0, C3 (S1) 0, C3 (S2) 0, D (S1) 0, D (S2) 0
- Stoffe zum Recycling (MFR) [kg]: A1-A3 0, A4 0, B2 0, C2 0, C3 (S1) 0, C3 (S2) 17.44, D (S1) 0, D (S2) 0
- Stoffe für die Energierückgewinnung (MER) [kg]: A1-A3 0, A4 0, B2 0, C2 0, C3 (S1) 18.36, C3 (S2) 0.92, D (S1) 0, D (S2) 0
- Exportierte elektrische Energie (EEE) [MJ]: A1-A3 0, A4 0, B2 0, C2 0, C3 (S1) 0, C3 (S2) 0, D (S1) 0, D (S2) 0
- Exportierte thermische Energie (EET) [MJ]: A1-A3 0, A4 0, B2 0, C2 0, C3 (S1) 0, C3 (S2) 0, D (S1) 0, D (S2) 0

## Impact indicators
- Globales Erwärmungspotenzial (GWP) [kg CO_(2)-Äq.]: A1-A3 0.253, A4 0.55537, B2 0.225216, C2 0.270512, C3 (S1) 21.0833, C3 (S2) 21.0833, D (S1) -4.87195, D (S2) -6.89265
- Abbau Potential der stratosphärischen Ozonschicht (ODP) [kg CFC11-Äq.]: A1-A3 9.56e-9, A4 6.69e-13, B2 4.46e-12, C2 3.26e-13, C3 (S1) 0, C3 (S2) 0, D (S1) 6.23e-8, D (S2) 2.18e-9
- Versauerungspotenzial von Boden und Wasser (AP) [kg SO_(2)-Äq.]: A1-A3 0.043913, A4 0.00236971, B2 0.00054303, C2 0.00115, C3 (S1) 0, C3 (S2) 0, D (S1) -0.0197392, D (S2) -0.0202529
- Eutrophierungspotenzial (EP) [kg PO_(4)^(3)-Äq.]: A1-A3 0.00548781, A4 0.00064778, B2 8.83e-5, C2 0.000315, C3 (S1) 0, C3 (S2) 0, D (S1) -0.00264347, D (S2) -0.00228532
- Bildungspotential für troposphärisches Ozon (POCP) [kg Ethen-Äq.]: A1-A3 0.00781928, A4 -0.00081395, B2 5.35e-5, C2 -0.000396, C3 (S1) 0, C3 (S2) 0, D (S1) -0.00263, D (S2) -0.005579
- Potenzial für den abiotischen Abbau nicht fossiler Ressourcen (ADPE) [kg Sb-Äq.]: A1-A3 0.00014, A4 2.8e-8, B2 1.05e-6, C2 1.36e-8, C3 (S1) 0, C3 (S2) 0, D (S1) -4.03e-6, D (S2) -0.000123
- Potenzial für den abiotischen Abbau fossiler Brennstoffe (ADPF) [MJ]: A1-A3 490.16, A4 7.39736, B2 6.2838, C2 3.6, C3 (S1) 0, C3 (S2) 0, D (S1) -342, D (S2) -331

## Use advice
Gültigkeitsbereich:
Es handelt sich bei dieser EPD um eine Verbands-EPD. Als Datenbasis für die Terrassendiele aus Wood-Polymer-Composite (WPC) wurde das gewichtete Mittel aus Herstellerangaben von sechs Mitgliedsunternehmen herangezogen. Die Mitglieder können den Verbands-Internetseiten entnommen werden.
Die datenliefernden Häuser repräsentieren einen Anteil von 80 % der deutschen Produktion.
Der Geltungsbereich der EPD umfasst alle Terrassendielen aus Holz-Kunststoff-Werkstoffen, da die verschiedenen Kunststoffarten entsprechend ihrer Anteile berücksichtigt wurden.
Systemgrenze:
Typ der EPD: Wiege bis Werkstor mit Optionen
Gemäß /EN 15804/ werden folgende Module verwendet:
Modul A1-3
Für die Herstellung findet die aggregierte Darstellung in Form von A1-3 Verwendung. Darunter fallen die Rohstoffversorgung, die Herstellung der WPC-Terrassendiele, alle Transporte zum Hersteller, die benötigten Energieverbräuche und Ressourcen sowie jegliche anfallende Produktionsabfälle.
Modul A4
Transport des Produktes von dem Hersteller zur Baustelle
Modul B2
Instandhaltung der WPC-Terrassendielen während der Nutzungsphase : Reinigung der WPC-Terrassendiele
Modul C2
Transport des ausrangierten Produktes zum Recyclinghof oder Hersteller
Modul C3
Abfallbehandlung, wie thermische oder stoffliche Verwertung
Auf Grund der gewählten Systemgrenzen (Definition des End-of-waste Status) findet keine Abfallbeseitigung (Modul C4) der WPC-Terrassendiele statt. Es wird somit nur der Export der materialinhärenten Eigenschaften bilanziert.
Modul D
Gutschriften und Lasten außerhalb des betrachteten Systems durch thermische und stoffliche Verwertung

## Data sources
- WPC Terrassendielen.pdf
- GaBi Database (all versions)
- GaBi database SP26 2014
