# GLAPOR cellular glass

Dataset: ILCD process, EPD, specific dataset
Geography: DE
Reference year: 2017
Valid until: 2022
Classification: OEKOBAU.DAT: Dämmstoffe / Schaumglas / Platten
Classification: IBUCategories: 02 Bauprodukte / Wärmedämmungsprodukte / Mineralische Dämmstoffe
Method details: Mineralische Dämmstoffe.pdf
Registration number: 10314
Owner: GLAPOR Werk Mitterteich GmbH
Compliance: DIN EN 15804; ISO 14025
Review: Accredited third party review by Institut Bauen und Umwelt e. V.
Amounts: rows without a unit in brackets have none in this file; such an amount is in the reference unit of its flow, which a separate flow dataset defines
copyright: true

## General comment
GLAPOR cellular glass boards cellular glass products are vapour-tight, lightweight insulation materials for the construction industry made of 100 % recycled glass. By combining the physical properties of glass with the insulating properties of a closed cell structure, GLAPOR cellular glass products provide high compressive strength, are lightweight, fire resistant and resistant to rodents. The permanent, continuous production process guarantees consistent high quality.

This EPD is valid for the GLAPOR cellular glass boards:

GLAPOR cellular glass boards PG 600 (110 kg/m³)

The LCA-related information can be extrapolated to other products via their specific densities, notably to:

GLAPOR cellular glass boards PG 400 (125 kg/m³)
GLAPOR cellular glass boards PG 900.2 (135 kg/m³)
GLAPOR cellular glass boards PG 1000 (135 kg/m³)

## Technology and included processes
Declared unit:
The declaration is valid for 1 m3 of GLAPOR cellular glass with a density of 120 kg/m3, with a typical thickness of 160 mm and with a thermal conductivity of 0.054 W/(mK) (Source: /Fraunhofer 2017/).

## Technical purpose
GLAPOR cellular glass boards are an insulation material suitable for a wide range of applications. Projects have included football pitches, airports, public meeting places and biogas plants in addition to technical installations for noise insulation and fire protection - the application areas range from the foundation slab to the roof of the building.

Thus, GLAPOR cellular glass can be applied in a broad variety of applications in residential, industrial and public buildings or in re-developments in accordance with /DIN 4108-10/ for structural engineering.

Such applications include in:

Residential buildings:

insulation under the ceiling
warm roof as metal roof without thermal bridges
thermal insulation of terraces and balconies
flat roof insulation for extensive and intensive green areas
load bearing thermal insulation for under foundation slabs with base insulation and perimeter insulation formwork
load-bearing thermal insulation for under foundation slabs with perimeter insulation formwork and perimeter insulation

Industrial buildings:

warm roof as metal roof without thermal bridges
flat roof insulation on trapezoidal steel with sealing
thermal insulation under screed, e.g. for forklift traffic and racking loads
flat roof insulation for parking decks and ceilings of courtyard cellars
thermal insulation of the foundation slab with strip foundation
insulation under the storey ceiling

Public buildings

flat roof insulation for parking decks and ceilings of courtyard cellars
flat roof insulation for extensive and intensive green areas
insulation for under storey ceilings
thermal insulation for under screed for walkable areas
thermal insulation for under screed
load-bearing thermal insulation for under foundation slabs with perimeter insulation formwork and base insulation.

Redevelopments

warm roof as metal roof without thermal bridges
lightweight fill on existing arches
thermal insulation of the cellar wall
thermal insulation for under screed
interior insulation

More details on the application of GLAPOR cellular glass can be found under www.glapor.de

## Scenarios
- S1: Scenario 1
- S2: Scenario 2

## Reference product
- GLAPOR Schaumglas / pro m³ (120 kg/m³): 1

## Inputs
- Renewable primary energy as energy carrier (PERE) [MJ]: A1-A3 130, A4 0.408, A5 0.00227, C2 (S1) 0.408, C2 (S2) 0.0583, C3 0.953, C4 0, D (S1) -5.19, D (S2) -0.935
- Renewable primary energy resources as material utilization (PERM) [MJ]: A1-A3 0, A4 0, A5 0, C2 (S1) 0, C2 (S2) 0, C3 0, C4 0, D (S1) 0, D (S2) 0
- Total use of renewable primary energy resources (PERT) [MJ]: A1-A3 130, A4 0.408, A5 0.00227, C2 (S1) 0.408, C2 (S2) 0.0583, C3 0.953, C4 0, D (S1) -5.19, D (S2) -0.935
- Non renewable primary energy as energy carrier (PENRE) [MJ]: A1-A3 1430, A4 71.9, A5 29.2, C2 (S1) 71.9, C2 (S2) 10.3, C3 13.1, C4 0, D (S1) -24, D (S2) -20.4
- Non renewable primary energy as material utilization (PENRM) [MJ]: A1-A3 29.2, A4 0, A5 -29.2, C2 (S1) 0, C2 (S2) 0, C3 0, C4 0, D (S1) 0, D (S2) 0
- Total use of non renewable primary energy resources (PENRT) [MJ]: A1-A3 1460, A4 71.9, A5 0.0375, C2 (S1) 71.9, C2 (S2) 10.3, C3 13.1, C4 0, D (S1) -24, D (S2) -20.4
- Use of secondary material (SM) [kg]: A1-A3 153, A4 0, A5 0, C2 (S1) 0, C2 (S2) 0, C3 0, C4 0, D (S1) 0, D (S2) 0
- Use of renewable secondary fuels (RSF) [MJ]: A1-A3 0, A4 0, A5 0, C2 (S1) 0, C2 (S2) 0, C3 0, C4 0, D (S1) 0, D (S2) 0
- Use of non renewable secondary fuels (NRSF) [MJ]: A1-A3 0, A4 0, A5 0, C2 (S1) 0, C2 (S2) 0, C3 0, C4 0, D (S1) 0, D (S2) 0
- Use of net fresh water (FW) [m^3]: A1-A3 0.412, A4 0.00205, A5 4.95e-5, C2 (S1) 0.00205, C2 (S2) 0.000293, C3 0.00234, C4 0, D (S1) -0.0591, D (S2) -0.00254

## Outputs
- Hazardous waste disposed (HWD) [kg]: A1-A3 0.00158, A4 1.57e-5, A5 4.09e-7, C2 (S1) 1.57e-5, C2 (S2) 2.24e-6, C3 2.7e-5, C4 0, D (S1) -3.34e-5, D (S2) -3.17e-5
- Non hazardous waste disposed (NHWD) [kg]: A1-A3 0.00105, A4 2.36e-5, A5 3.04e-9, C2 (S1) 2.36e-5, C2 (S2) 3.38e-6, C3 1.74e-7, C4 0, D (S1) -5.98e-7, D (S2) -1.76e-7
- Radioactive waste disposed (RWD) [kg]: A1-A3 0.0068, A4 0.00109, A5 2e-7, C2 (S1) 0.00109, C2 (S2) 0.000156, C3 6.97e-5, C4 0, D (S1) -0.000128, D (S2) -8.71e-5
- Components for re-use (CRU) [kg]: A1-A3 0, A4 0, A5 0, C2 (S1) 0, C2 (S2) 0, C3 0, C4 0, D (S1) 0, D (S2) 0
- Materials for recycling (MFR) [kg]: A1-A3 0.00629, A4 0, A5 0, C2 (S1) 0, C2 (S2) 0, C3 110, C4 0, D (S1) 0, D (S2) 0
- Materials for energy recovery (MER) [kg]: A1-A3 0, A4 0, A5 0, C2 (S1) 0, C2 (S2) 0, C3 0, C4 0, D (S1) 0, D (S2) 0
- Exported electrical energy (EEE) [MJ]: A1-A3 0, A4 0, A5 3.33, C2 (S1) 0, C2 (S2) 0, C3 0, C4 0, D (S1) 0, D (S2) 0
- Exported thermal energy (EET) [MJ]: A1-A3 0, A4 0, A5 6.79, C2 (S1) 0, C2 (S2) 0, C3 0, C4 0, D (S1) 0, D (S2) 0

## Impact indicators
- Global warming potential (GWP) [kg CO_(2)-Äq.]: A1-A3 87.3, A4 4.68, A5 1.99, C2 (S1) 4.68, C2 (S2) 0.669, C3 0.662, C4 0, D (S1) -1.37, D (S2) -1.11
- Depletion potential of the stratospheric ozone layer (ODP) [kg CFC11-Äq.]: A1-A3 9.82e-6, A4 8.96e-7, A5 8.79e-10, C2 (S1) 8.96e-7, C2 (S2) 1.28e-7, C3 3.39e-8, C4 0, D (S1) 1.37e-7, D (S2) -1.06e-7
- Acidification potential of land and water (AP) [kg SO_(2)-Äq.]: A1-A3 0.209, A4 0.0138, A5 2.65e-5, C2 (S1) 0.0138, C2 (S2) 0.00197, C3 0.000944, C4 0, D (S1) -0.00308, D (S2) -0.00142
- Eutrophication potential (EP) [kg PO_(4)^(3)-Äq.]: A1-A3 0.0686, A4 0.00226, A5 7.79e-6, C2 (S1) 0.00226, C2 (S2) 0.000322, C3 0.000343, C4 0, D (S1) -0.00065, D (S2) -0.000358
- Formation potential of tropospheric ozone photochemical oxidants (POCP) [kg Ethen-Äq.]: A1-A3 0.0099, A4 0.000651, A5 4.62e-6, C2 (S1) 0.000651, C2 (S2) 9.3e-5, C3 5.62e-5, C4 0, D (S1) -0.000297, D (S2) -9.44e-5
- Abiotic depletion potential for non fossil resources (ADPE) [kg Sb-Äq.]: A1-A3 7.35e-6, A4 1.13e-7, A5 3.08e-10, C2 (S1) 1.13e-7, C2 (S2) 1.61e-8, C3 1.5e-8, C4 0, D (S1) -2.16e-7, D (S2) -1.47e-8
- Abiotic depletion potential for fossil resources (ADPF) [MJ]: A1-A3 1350, A4 71.4, A5 0.033, C2 (S1) 71.4, C2 (S2) 10.2, C3 10.6, C4 0, D (S1) -21.5, D (S2) -18

## Use advice
Scope:
The EPD represents cellular glass produced at the GLAPOR production site at Mitterteich/GER.
System boundary:
Type of EPD: cradle-to-gate - with options.

The system boundary of module A1-A3 encompasses all processes related to the production of cellular glass. The system boundary for the recycled glass is assumed to be after the sorting of the glass cullets that are to be recycled. Within the system boundary of A1-A3 are considered:

grinding of recycled glass cullets
production of all ancillary materials
electricity production
heat generation for the production process
production of packaging material
all transport, including transport of glass cullets to the external grinding and transport of inputs to the production site.

The process does not generate waste water.

The process generates about 30% of production waste that is used for the production of cellular glass gravel. For this product an economic allocation is applied.

No other waste is generated in significant quantities.

Module A4 contains the average transport scenario from the production site to the construction site.

Module A5 contains the disposal of the PE packaging in a municipal waste incineration plant, from which energy is exported from the product system; the benefits of this exported energy are reported in Module D.

In the end-of-life, 2 scenarios are declared

Scenario 1: recycling into cellular glass gravel

Module C2/1 contains a default transport scenario (350 km by lorry) of the cellular glass from the deconstruction site to the GLAPOR production site (see also module A4).

Module C3/1 contains the electricity consumption used to crush the deconstructed cellular foam board into gravel smaller than 60 mm.

Module D/1 contains the benefits of replacing natural crushed gravel and of the exported energy from the energy recovery from the treatment of PE in a municipal waste incineration plant.

Scenario 2: landfilling:

Module C2/2 contains a default transport scenario (50 km by lorry) of the cellular glass from the deconstruction site to the inert material landfill.

Module C4/2 contains the landfilling of the cellular glass.

Module D/2 contains the benefits of the exported energy from the energy recovery from the treatment of PE in a municipal waste incineration plant.

## Data sources
- GLAPOR Schaumglas.pdf
- ecoinvent database (all versions)
- ecoinvent 3.2 database
