# NedZink NOVA, NedZink NOIR

Dataset: ILCD process, EPD, specific dataset
Geography: NL
Reference year: 2015
Valid until: 2020
Classification: OEKOBAU.DAT: Metalle / Zink / Zinkbleche
Classification: IBUCategories: 02 Bauprodukte / Metallbauprodukte und Zubehör / Baumetalle
Method details: Baumetalle.pdf
Owner: NedZink B.V.
Compliance: DIN EN 15804; ISO 14025
Review: Accredited third party review by IBU
Amounts: rows without a unit in brackets have none in this file; such an amount is in the reference unit of its flow, which a separate flow dataset defines
copyright: true

## General comment
NedZink® NOVA / NedZink® NOIR is titanium zinc produced by NedZink according to EN 988. Small quantities, as specified in EN 988, of the alloy elements copper, titanium and aluminium are added to electrolytically refined zinc (with a purity of min. 99,995% Zn, Z1 according to EN 1179). The chemical composition, mechanical and physical properties and measurement tolerances are determined in the KOMO product certificate and the product certificate from Lloyd’s Register, LRIQS (Approval QIS122). The defined material properties are checked by an independent and neutral research institute. This product certification and the ISO 9001 certificate for the quality management system at NedZink assure a constant and uniform high quality standard.

NedZink® NOVA is pre-weathered titanium zinc in a matt natural medium gray color. NedZink® NOIR is pre-weathered titanium zinc in an anthracite black color.

## Technology and included processes
Pre-alloy: In order to improve the properties of zinc, and for energy saving reasons, a pre-alloy with titanium, copper and aluminium is prepared in an induction furnace. This pre-alloy is poured into ingots. Melting: In the melting furnace the Special High Grade (SHG) zinc and the ingots are mixed homogeneously. Zinc with the right composition is pumped to the casting furnace. Casting: Casting takes place from the casting furnace into a vertical casting installation. The zinc is cast into blocks, cooled down and stored for further processing. Rolling and coiling: Blocks coming from the casting installation are homogeneous pre-heated for the “hot rolling” process. This takes place in a gas-fired continuous oven. During the hot rolling on a reversible rolling machine the blocks are processed to a pre-defined thickness. At the end of the rolling installation the zinc is coiled and stored to cool off. On the reversible cold-rolling mill the coils are rolled to the desired final thickness. For cooling and lubrication of the process a special emulsion is used Stretching and cutting: Tensions in the coils are released by a stretching-and straightening process. The zinc is uniquely marked and slitted and cut to the desired width and length. Preweathering: In a continuously operating production line the coils are degreased, brushed and phosphated to get a prepatinated medium gray appearance for NedZink® NOVA. With an additional process for NedZink® NOIR an anthracite black appearance is created. After rinsing and drying the material surface is provided with a thin protection layer and stored in the warehouse. Quality control: During the entire process extensive quality checks are conducted by the manufacturer and Lloyd’s Register. Quality management control according to ISO 9001.
Declared unit:
The declared unit is 1 kg of NedZink NOVA / NedZink NOIR, pre-weathered titanium zinc.

## Technical purpose
NedZink® NOVA / NedZink® NOIR titanium zinc coils, sheets, strips and profiles are used for roof and façade cladding, interior use and rainwater drainage systems (gutters, downpipes and accessories).

NedZink® NOVA / NedZink® NOIR is intended mainly for outdoor use. However, the product is safe for indoor use and can be used as such. There are no harmful emissions to indoor air. The product does not contain VOC’s.

## Reference product
- 1 kg NEDZINK NOVA/NOIR: 1

## Inputs
- Erneuerbare Primärenergie als Energieträger (PERE) [MJ]: A1-A3 1.37, D -0.256
- Erneuerbare Primärenergie zur stofflichen Nutzung (PERM) [MJ]
- Total erneuerbare Primärenergie (PERT) [MJ]: A1-A3 1.37, D -0.256
- Nicht-erneuerbare Primärenergie als Energieträger (PENRE) [MJ]: A1-A3 22.2, D -11.7
- Nicht-erneuerbare Primärenergie zur stofflichen Nutzung (PENRM) [MJ]
- Total nicht erneuerbare Primärenergie (PENRT) [MJ]: A1-A3 222, D -117
- Einsatz von Sekundärstoffen (SM) [kg]
- Erneuerbare Sekundärbrennstoffe (RSF) [MJ]
- Nicht erneuerbare Sekundärbrennstoffe (NRSF) [MJ]
- Einsatz von Süßwasserressourcen (FW) [m^3]: A1-A3 2.26, D -1.45

## Outputs
- Gefährlicher Abfall zur Deponie (HWD) [kg]: A1-A3 0.002
- Entsorgter nicht gefährlicher Abfall (NHWD) [kg]: A1-A3 0.0185
- Entsorgter radioaktiver Abfall (RWD) [kg]
- Komponenten für die Wiederverwendung (CRU) [kg]
- Stoffe zum Recycling (MFR) [kg]: D 0.9
- Stoffe für die Energierückgewinnung (MER) [kg]
- Exportierte elektrische Energie (EEE) [MJ]
- Exportierte thermische Energie (EET) [MJ]

## Impact indicators
- Globales Erwärmungspotenzial (GWP) [kg CO_(2)-Äq.]: A1-A3 2.09, D -1.15
- Abbau Potential der stratosphärischen Ozonschicht (ODP) [kg CFC11-Äq.]: A1-A3 1.11e-7, D -7.4e-8
- Versauerungspotenzial von Boden und Wasser (AP) [kg SO_(2)-Äq.]: A1-A3 0.012, D -0.00964
- Eutrophierungspotenzial (EP) [kg PO_(4)^(3)-Äq.]: A1-A3 0.00326, D -0.00182
- Bildungspotential für troposphärisches Ozon (POCP) [kg Ethen-Äq.]: A1-A3 0.000203, D -8.09e-5
- Potenzial für den abiotischen Abbau nicht fossiler Ressourcen (ADPE) [kg Sb-Äq.]: A1-A3 8.13e-5, D -7.42e-5
- Potenzial für den abiotischen Abbau fossiler Brennstoffe (ADPF) [MJ]

## Use advice
Scope:
The Life Cycle Assessment (LCA) was carried out according to ISO 14040, ISO 14044 and EN 15804. The LCA is performed for the pre-weathered products NedZink® NOVA/NedZink® NOIR manufactured by NedZink B.V. in Budel-Dorplein, Netherlands. NedZink B.V. has provided the site-specific data, background processes are taken from the Ecoinvent (version 2) database. The LCA was carried out for the manufacturing phase of the declared product, containing information on raw and secondary material production, transport and packaging (cradle to gate). Possible credits after the end of life phase (module D) are also included.
System boundary:
Type of the EPD: Cradle-to-Gatefor a specific product created at the NedZink production plant (declaration of a specific product from a manufacturer’s plant).. Modules A1, A2 and A3 contain information on the raw- and secondary material extraction, transport to the manufacturer, manufacturing and packaging. The possible credits after End-of-Life of the product areis also included (module D). No other modules are included in the EPD. Considering the economic value of zinc, the end-of-waste stadium is met after deconstruction of the metal from the building (using hand-tools). As such, there will be no contribution from module C.

## Data sources
- NedZink NOVA, NedZink NOIR.pdf
- ecoinvent database (all versions)
- ecoinvent 2.2 database
