# Blanke Kupfer-Hausinstallationsrohre

Dataset: ILCD process, EPD, average dataset
Geography: DE
Reference year: 2015
Valid until: 2020
Classification: OEKOBAU.DAT: Metalle / Kupfer / Kupferrohre
Classification: IBUCategories: 02 Bauprodukte / Metallbauprodukte und Zubehör / Metallrohre für Hausinstallationen
Method details: Metallrohre für Hausinstallationen.pdf
Owner: KME
Compliance: DIN EN 15804; ISO 14025
Review: Accredited third party review by IBU
Amounts: rows without a unit in brackets have none in this file; such an amount is in the reference unit of its flow, which a separate flow dataset defines
copyright: true

## General comment
Dieses Dokument bezieht sich auf blanke KME-Markenkupferrohre für Hausinstallationen.

Für die Herstellung von Installationsrohren wird bei KME Kupfer der sauerstofffreien Qualität Cu-DHP nach /DIN EN1057/ eingesetzt. Bei Cu-DHP handelt es sich um desoxidiertes Kupfer mit begrenzt hohem Phosphorgehalt (maximal 0,04%), welches sich durch seine sehr gute Schweiß- und Lötbarkeit auszeichnet.

Der Reinheitsgrad beträgt mindestens 99,90% Kupfer.

Folgende Marken werden von KME angeboten:

Tabelle 1: Markenkupfer - Hausinstallationsrohre

Zur Umrechnung sind das Gewicht, und für eine mögliche spätere Berechnung von Wärmeverlusten der Installation die Außenfläche des Rohres pro Meter unter Lieferzustand/ Eigenschaften angegeben.

Basis für die Berechnung der Ergebnisse sind die jeweils angegebenen produzierten Jahresmengen an blanken Kupferrohren. Die Ergebnisse basieren dabei auf gemittelten Werten, die sich anhand der Jahresproduktionsmengen zusammensetzen.

Die Umweltdeklaration bezieht sich auf 1kg Rohr in durchschnittlicher Länge und Wandstärke.

## Technology and included processes
Grundstoffe: Die Hausinstallationsrohre bestehen zu 100 Masse-% aus Cu-DHP, d.h. sauerstofffreiem phosphor- desoxidiertem Kupfer mit begrenztem Restphosphor- gehalt. Der Reinheitsgrad beträgt mindestens 99,90 % Kupfer (Cu-DHP; EN-Nr. CW 024A). Zusammensetzung 99,90 % Cu + Ag, Phosphor 0,015-0,040 %. Hilfsstoffe: Eingesetzte Ziehmittel: 2,6 g/kg Kupfer. Ziehmittel bestehen aus hochtemperaturbeständigen mineralölhaltigen und synthetischen Ölen, die als Kühl- und Schmiermittel während des Ziehprozesses dienen. Fertigung von blanken KME-Kupferrohren In der ersten Stufe der Kupferrohrproduktion wird aus dem Rundbolzen ein Vorrohr hergestellt. Dieses Vor- rohr kann entweder durch Warmumformen oder durch einen Warmschrägwalzprozess gefertigt werden. Dem Verfahren des Warmwalzens folgt als nächste Stufe die Kaltverformung durch Pilgerwalzen. Hierdurch können hohe Verformungsgrade erreicht werden. Beim Verfahren des Warmumformens wird im Anschluss sofort im Ziehverfahren kalt weiter- verarbeitet. Abbildung 1 zeigt die schematische Darstellung dieser Umformprozesse. Abbildung 1: Schema der Fertigung von blanken KME-Kupferrohren Die weiteren Arbeitsschritte zum Fertigrohr erfolgen in mehreren Stufen jeweils durch Kaltziehen in Zieh- maschinen. Im Unterschied zur Warmverformung wird dabei mit einem „fliegenden Dorn“ (Mandrille) gearbeitet. Abbildung 2 zeigt in einer Querschnitt- zeichnung das Prinzip des „fliegenden Dorns“. Abbildung 2: Prinzip des fliegenden Dorns Der jeweilige Außendurchmesser wird durch die Matritze vorgegeben, während die sogenannte Mandrille den Innendurchmesser bestimmt. Im Verlauf der weiteren Verarbeitung werden KME-Kupferrohre in drei unterschiedlichen Festigkeitsstufen hergestellt, welche jeweils spezifische Vorteile für die Verarbeitung bieten. Es sind dies die Festigkeiten hart (R 290), halbhart (R 250) und weich (R 220). Als Kennwert ist die minimale Zugfestigkeit Rm in MPa (N/mm2) angegeben. Die Zugfestigkeit von Kupfer wird beim Kaltverformen erhöht und kann durch Erwärmen wieder vermindert werden. Somit können die Festigkeiten halbhart und weich durch Zwischenglühen gezielt eingestellt werden. Harte Rohre durchlaufen keine weitere Glühstufe. KME - Kupferrohre blank: SANCO®, cuprotherm ® BLANK, cuprotherm PLAN® In der ersten Stufe der Kupferrohrproduktion wird aus einem Rundbolzen durch Warmumformen ein Vorrohr erstellt. Dieses wird im Anschluss im Ziehverfahren kalt weitergearbeitet. Das Glühen und Fertigziehen erfolgt je nach Festigkeitsstufe. Harte und halbharte Rohre durchlaufen zusätzlich eine Richtanlage. Nach einer abschließenden Prüfung werden die Rohre gekennzeichnet, abgelängt und konfektioniert. Gütesicherung Eigenüberwachung durch den Hersteller mit Qualitätsmanagementsystem nach /DIN EN ISO 9001/ sowie Fremdüberwachung durch Lloyds Register, Gütegemeinschaft Kupferrohre e.V., DVGW und andere nationale europäische Überwachungsinstitutionen, wie KIWA, CSTB, etc.
Technische Daten:
Prüfnormen/Produktnormen/Zulassungen:

/DIN EN 1057/, /DVGW - GW 392/, /RAL-Gütezeichen der Gütegemeinschaft Kupferrohre /
Deklarierte Einheit:
Die Deklaration bezieht sich auf die Herstellung von und das Recycling von einem Kilogramm Kupferrohr (blank).

Tabelle 4: Überblick zu den Produktgruppen, Firmennamen, Produktionsstätten und Art der Durchschnittsbildung

Der Durchschnitt wurde auf Basis der jährlichen Produktionsmenge gebildet.

## Technical purpose
Die Einsatzzwecke der deklarierten Markenkupferrohre sind Transport von:
Trinkwasser kalt, warm, Zirkulation
Regenwasser
Grauwasser
Wärmeträgern in Heizung, Flächenheizung, Flächenkühlung und Solarthermie
Kältemittel
Gas und Flüssiggas
Öl

## Reference product
- Blanke Kupfer-Hausinstallationsrohre / 1kg Kupferrohr (Blanke Kupfer-Hausinstallationsrohre / 1kg Kupferrohr ): 1

## Inputs
- Erneuerbare Primärenergie als Energieträger (PERE) [MJ]: A1-A3 3.63, C4 0.00108, D -1.15
- Erneuerbare Primärenergie zur stofflichen Nutzung (PERM) [MJ]: A1-A3 0
- Total erneuerbare Primärenergie (PERT) [MJ]: A1-A3 3.63, C4 0.00108, D -1.15
- Nicht-erneuerbare Primärenergie als Energieträger (PENRE) [MJ]: A1-A3 21.8, C4 0.013, D -6.55
- Nicht-erneuerbare Primärenergie zur stofflichen Nutzung (PENRM) [MJ]: A1-A3 0
- Total nicht erneuerbare Primärenergie (PENRT) [MJ]: A1-A3 21.8, C4 0.013, D -6.55
- Einsatz von Sekundärstoffen (SM) [kg]: A1-A3 0, C4 0, D 0
- Erneuerbare Sekundärbrennstoffe (RSF) [MJ]: A1-A3 0, C4 0, D 0
- Nicht erneuerbare Sekundärbrennstoffe (NRSF) [MJ]: A1-A3 0, C4 0, D 0
- Einsatz von Süßwasserressourcen (FW) [m^3]: A1-A3 0.0122, C4 -3.94e-5, D -0.00537

## Outputs
- Gefährlicher Abfall zur Deponie (HWD) [kg]: A1-A3 0.00203, C4 5.91e-7, D -0.000216
- Entsorgter nicht gefährlicher Abfall (NHWD) [kg]: A1-A3 0.0242, C4 0.0701, D -0.00446
- Entsorgter radioaktiver Abfall (RWD) [kg]: A1-A3 0.00099, C4 2.27e-7, D -0.000201
- Komponenten für die Wiederverwendung (CRU) [kg]: A1-A3 0, C4 0
- Stoffe zum Recycling (MFR) [kg]: A1-A3 0, C4 0
- Stoffe für die Energierückgewinnung (MER) [kg]: A1-A3 0, C4 0
- Exportierte elektrische Energie (EEE) [MJ]: A1-A3 0, C4 0
- Exportierte thermische Energie (EET) [MJ]: A1-A3 0, C4 0

## Impact indicators
- Globales Erwärmungspotenzial (GWP) [kg CO_(2)-Äq.]: A1-A3 1.97, C4 0.000949, D -0.733
- Abbau Potential der stratosphärischen Ozonschicht (ODP) [kg CFC11-Äq.]: A1-A3 4.26e-11, C4 1.19e-14, D -3.88e-12
- Versauerungspotenzial von Boden und Wasser (AP) [kg SO_(2)-Äq.]: A1-A3 0.00809, C4 6.03e-6, D -0.00392
- Eutrophierungspotenzial (EP) [kg PO_(4)^(3)-Äq.]: A1-A3 0.000791, C4 8.27e-7, D -0.000337
- Bildungspotential für troposphärisches Ozon (POCP) [kg Ethen-Äq.]: A1-A3 0.000506, C4 5.75e-7, D -0.00022
- Potenzial für den abiotischen Abbau nicht fossiler Ressourcen (ADPE) [kg Sb-Äq.]: A1-A3 1.54e-5, C4 3.57e-10, D -8.47e-6
- Potenzial für den abiotischen Abbau fossiler Brennstoffe (ADPF) [MJ]: A1-A3 19.2, C4 0.0125, D -5.99

## Use advice
Gültigkeitsbereich:
Die vorliegende EPD ist eine Durchschnitts - EPD.

Die für die Berechnung der Ökobilanz verwendeten Werte stammen von zwei Herstellern. Die Produktionsstandorte sind Osnabrück und Ulm.
Systemgrenze:
Die Lebenszyklusanalyse für die Herstellung der betrachteten Kupferrohre umfasst die Lebenswegabschnitte „von der Wiege bis zum Werkstor" (cradle to gate) mit Option.

Produktionsstadium

Module A1-A3 betrachtet: Die Bereitstellung von Rohmaterialen, Hilfsstoffen und Energien, Transport von Rohmaterialien und Hilfsstoffen Herstellprozess im Werk inklusive energetischen Aufwendungen, Herstellung von Hilfsstoffen, Entsorgung von anfallenden Reststoffen und der Berücksichtigung von auftretenden Werksemissionen. Kreislaufführung von Produktionsschrotten.

Module C4 beinhaltet die Emissionen im End-of-Life bei der Verbrennung und Deponierung.

Für Kupferschrott wird angenommen, dass der "end-of-waste" Status nach dem Sortieren und Schreddern beim Abriss oder in den Abfallbehandlungsanlagen erreicht ist.

In Modul D werden Wiederverwendung und Recycling von Kupferschrott auf Basis der Netto-Schrottmenge im End-of-Life betrachtet.

## Data sources
- Blanke Kupfer-Hausinstallationsrohre.pdf
- GaBi Database (all versions)
- GaBi database SP20 2013
