# FOAMGLAS® W+F and FOAMGLAS® T3+

Dataset: ILCD process, EPD, specific dataset
Geography: RER
Reference year: 2015
Valid until: 2020
Classification: OEKOBAU.DAT: Dämmstoffe / Schaumglas / Platten
Classification: IBUCategories: 02 Bauprodukte / Wärmedämmungsprodukte / Mineralische Dämmstoffe
Method details: Mineralische Dämmstoffe.pdf
Registration number: 7480
Owner: Pittsburgh Corning Europe NV
Compliance: DIN EN 15804; ISO 14025
Review: Accredited third party review by Institut Bauen und Umwelt e. V.
Amounts: rows without a unit in brackets have none in this file; such an amount is in the reference unit of its flow, which a separate flow dataset defines
copyright: false

## General comment
FOAMGLAS® is an insulating material made of foamed glass for building construction and industrial installations. It is used to manufacture dimensionally-accurate slabs, boards, pipe shells, segments and other special elements.

FOAMGLAS® slabs and elements are largely manufactured from high-quality recycled glass (e.g. windscreens) and mineral base materials such as sand and without the use of binding agents. They display a closed-cell structure. The product FOAMGLAS® W+F is declared with an apparent density of 100 kg/m³ (± 15 %). The products are supplied in thicknesses of 40 mm to 140 mm, e.g. slabs with high compressive strength. The use of coated or uncoated FOAMGLAS® is application-dependent. The uncoated slab is frequently used for interior insulation, and then coated with various types of plaster.

For roofs, FOAMGLAS® is either coated with hot bitumen before the waterproofing membranes are applied, or special boards are used, for example FOAMGLAS® READY BOARD. This ex-works coating is a thin bitumen coating combined with foil or non-woven fabric.

The products by Pittsburgh Corning Europe NV are produced in the Tessenderlo plant (Belgium).

## Technology and included processes
A first step involves weighing, crushing and mixing the raw materials followed by melting at 1250 °C in the electrode furnace. Using electrical energy for melting guarantees a homogeneous melt. Once the melt has cooled, the glass is finely ground in ball mills with the aid of corundum cylinders. Some of the recycled glass used can be ground and foamed directly without necessarily being melted first. It is combined with the pretreated powder mixture and poured into foaming moulds made of stainless steel. The mixture then runs through a foaming process at 850 °C followed by a controlled cooling process. Stressless cooling is followed by cutting and packing. Production process: 1 Mixing and batching of the raw materials: Recycled glass, feldspar, sodium carbonate, iron oxide, manganese oxide, sodium sulphate, sodium nitrate. 2 The melting furnace has a constant temperature of 1250°C. 3 Molten glass is drawn out of the furnace. 4 Control room for monitoring the production. 5 The glass is drawn off and falls onto the conveyor band where it cools down before entering the ball mill. 6 Addition of “carbon black”. 7 Ball mill grinds all ingredients into a fine powder before putting them into stainless steel moulds. 8 The filled moulds pass through a cellulating oven (foaming furnace) with a temperature of 850°C. This is where the material gains its unique cell structure. 9 Energy recovery of heat. 10 The FOAMGLAS® blocks pass through an annealing oven to allow carefully controlled cooling without thermal stress. 11 The blocks are cut to size and sorted by batch. Production waste is recycled. 12 FOAMGLAS® slabs are then packaged, labelled and palletized. 13 Finished FOAMGLAS® products are stored and prepared for transport. Quality assurance: Quality is assured through internal and external monitoring. The product complies with the Declaration of Performance. It also bears the CEN Keymark certificate in accordance with DIN EN 13167 and DIN EN 13172. Electricity requirements are fully guaranteed by purchasing a certified electricity mix from hydropower plants.
Declared unit:
The declaration refers to the life cycle of 1kg FOAMGLAS® W+F and FOAMGLAS® T3+. The apparent density of the product is 100 kg/m³.

## Technical purpose
FOAMGLAS® insulation material is used for the entire building envelope.

• All types of application comply with DIN 4108 or other local application guidelines for roofs, walls, ceilings, perimeters and other special applications.

• Building equipment (air ducts, cold water systems, conduits)

• Technical insulation (insulation of pipes, containers, tanks and equipment)

• Fire protection (fire protection upgrades for walls, connections and pipe ducts)

## Reference product
- 1 kg FOAMGLAS® W+F bzw. FOAMGLAS® T3+: 1

## Inputs
- Renewable primary energy as energy carrier (PERE) [MJ]: A1-A3 8.66, A4 0.00919, A5 0.00106, C4 0.0154, D -0.00949
- Renewable primary energy resources as material utilization (PERM) [MJ]: A1-A3 0
- Total use of renewable primary energy resources (PERT) [MJ]: A1-A3 8.66, A4 0.00919, A5 0.00106, C4 0.0154, D -0.00949
- Non renewable primary energy as energy carrier (PENRE) [MJ]: A1-A3 19.8, A4 0.234, A5 0.0116, C4 0.186, D -0.219
- Non renewable primary energy as material utilization (PENRM) [MJ]: A1-A3 0
- Total use of non renewable primary energy resources (PENRT) [MJ]: A1-A3 19.8, A4 0.234, A5 0.0116, C4 0.186, D -0.219
- Use of secondary material (SM) [kg]: A1-A3 0.47, A4 0, A5 0, C4 0, D 0
- Use of renewable secondary fuels (RSF) [MJ]: A1-A3 0, A4 0, A5 0, C4 0, D 0
- Use of non renewable secondary fuels (NRSF) [MJ]: A1-A3 0, A4 0, A5 0, C4 0, D 0
- Use of net fresh water (FW) [m^3]: A1-A3 0.0146, A4 6.49e-6, A5 5.39e-5, C4 -0.000711, D -2.4e-5

## Outputs
- Hazardous waste disposed (HWD) [kg]: A1-A3 0.000476, A4 5.33e-7, A5 1.46e-6, C4 8.36e-6, D -1.97e-5
- Non hazardous waste disposed (NHWD) [kg]: A1-A3 0.0455, A4 2.94e-5, A5 0.00222, C4 1, D -5.17e-5
- Radioactive waste disposed (RWD) [kg]: A1-A3 0.000206, A4 3.06e-7, A5 5.62e-7, C4 3.25e-6, D -2.4e-5
- Components for re-use (CRU) [kg]: A1-A3 0, A4 0, A5 0, C4 0
- Materials for recycling (MFR) [kg]: A1-A3 0, A4 0, A5 0, C4 0
- Materials for energy recovery (MER) [kg]: A1-A3 0, A4 0, A5 0.0087, C4 0
- Exported electrical energy (EEE) [MJ]: A1-A3 0, A4 0, A5 0, C4 0, D -0.0424
- Exported thermal energy (EET) [MJ]: A1-A3 0, A4 0, A5 0, C4 0, D -0.102

## Impact indicators
- Global warming potential (GWP) [kg CO_(2)-Äq.]: A1-A3 1.26, A4 0.0169, A5 0.022, C4 0.0135, D -0.00971
- Depletion potential of the stratospheric ozone layer (ODP) [kg CFC11-Äq.]: A1-A3 2.52e-11, A4 8.09e-14, A5 2.65e-14, C4 1.84e-13, D -1.13e-11
- Acidification potential of land and water (AP) [kg SO_(2)-Äq.]: A1-A3 0.00289, A4 7.74e-5, A5 5.39e-6, C4 8.62e-5, D -1.12e-5
- Eutrophication potential (EP) [kg PO_(4)^(3)-Äq.]: A1-A3 0.000348, A4 1.77e-5, A5 4.3e-7, C4 1.18e-5, D -1.59e-6
- Formation potential of tropospheric ozone photochemical oxidants (POCP) [kg Ethen-Äq.]: A1-A3 0.000222, A4 -2.5e-5, A5 2.93e-7, C4 8.09e-6, D -1.55e-6
- Abiotic depletion potential for non fossil resources (ADPE) [kg Sb-Äq.]: A1-A3 6.78e-6, A4 6.37e-10, A5 3.16e-9, C4 5.1e-9, D -6.95e-10
- Abiotic depletion potential for fossil resources (ADPF) [MJ]: A1-A3 19.3, A4 0.233, A5 0.0102, C4 0.178, D -0.158

## Use advice
Scope:
This document refers to the production of 1 kg uncoated "FOAMGLAS® W+F" cellular glass manufactured in Belgium at the Tessenderlo production facility of Pittsburgh Corning Europe NV. The environmental impacts of the coated product "FOAMGLAS® W+F" are to be assessed with the help of a markup factor in the amount of 13%.

The LCA results of "FOAMGLAS® W+F" can be regarded as representative of the "FOAMGLAS® T3+" product. On account of the 5% lower apparent density, the LCA results of "FOAMGLAS® T3+" are also about 5% below those of "FOAMGLAS® W+F", since the manufacturing process as well as the raw materials used are practically identical. Accordingly, the results of "FOAMGLAS® W+F" can be interpreted as the "worst case" for "FOAMGLAS® T3+". This document is translated from the German Environmental Product Declaration into English. It is based on the German original version EPD-PCE-20150042-IBA1-DE. The verifier has no influence on the quality of the translation.
System boundary:
Type of EPD: cradle to gate

The LCA addresses the life cycle stage of production. The product stage comprises Modules A1 (Raw material supply), A2 (Transport) and A3 (Production).

The following individual processes were included in the product stage A1–A3 of production:

· Processes for providing preliminary products and energy

· Transporting the raw materials and preliminary materials to the plant

· Manufacturing process in the plant including energy-related expenses, disposal of residual materials and emissions

· Production of packaging

The packaging material volumes considered involve annual consumption / annual purchase volumes.

Module A4 takes account of transportation to the construction site. The utilisation of the packaging materials is assigned to Module A5. Environmental effects caused by installation losses are not included in the LCA results, since these depend on the construction project and thus vary. To calculate the additional environmental burdens caused by the production and disposal of these installation losses, the LCA results for a specific installation loss can be calculated (e.g. installation loss 3%, multiplication of the LCA results by 1.03). Landfilling with residual materials is assigned to Module C4.

Credits based on the thermal utilisation of the residual materials are assigned to Module D.

## Data sources
- FOAMGLAS® W+F und FOAMGLAS® T3+.pdf
- GaBi Database (all versions)
- GaBi database SP20 2013
