# Multipor Mineraldämmplatte

Dataset: ILCD process, EPD, average dataset
Geography: DE
Reference year: 2015
Valid until: 2020
Classification: OEKOBAU.DAT: Dämmstoffe / Calciumsilikat / Calcium-Silikathydrat / Calciumsilikat
Classification: IBUCategories: 02 Bauprodukte / Mauerwerk und Mörtel / Porenbeton
Method details: Porenbeton.pdf
Owner: Xella
Compliance: DIN EN 15804; ISO 14025
Review: Accredited third party review by IBU
Amounts: rows without a unit in brackets have none in this file; such an amount is in the reference unit of its flow, which a separate flow dataset defines
copyright: true

## General comment
Die genannten Multipor Mineraldämmplatten sind Wärmedämmplatten aus Calciumsilikathydraten mit sehr hohem Luftporenanteil.

Die Xella Baustoffe GmbH verfügt über 2 Standorte in Deutschland. Es erfolgte eine Durchschnittsbildung auf Basis der jährlichen Produktionsvolumen im Jahr 2013.

## Technology and included processes
Sandmehl 25-40 M-% Zement 25-50 M-% Branntkalk 5-25 M-% Anhydrit/Gips 3-7 M-% Mineralischer Zuschlag 10-20 M-% Aluminium als Porenbildner 0,7-0,8 M-% //Herstellung: Der gemahlene Quarzsand wird mit den anderen Grundstoffen unter Zugabe von Wasser und Aluminiumpaste, in einem Mischer zu einer Rohmasse gemischt und in Gießformen gegossen. Das Wasser löscht unter Wärmeentwicklung den Kalk. Das Aluminium reagiert im alkalischen Milieu. Dabei bildet sich gasförmiger Wasserstoff, der die Poren in der Masse erzeugt und ohne Rückstände entweicht. Die Poren besitzen meist einen Durchmesser von 0,5 – 1,5 mm und sind ausschließlich mit Luft gefüllt. Nach dem ersten Abbinden entstehen halbfeste Rohblöcke, aus denen maschinell und mit hoher Genauigkeit die Dämmplatten geschnitten werden. Die Ausbildung der endgültigen Eigenschaften der Bauteile erfolgt während der anschließenden Dampfhärtung über 5 – 12 Stunden bei etwa 190 °C und einem Druck von ca. 12 bar in Dampfdruckkesseln, den sog. Autoklaven. Hier bilden sich aus den eingesetzten Stoffen Calcium- Silikathydrate, die dem in der Natur vorkommenden Mineral Tobermorit entsprechen. Die Reaktion des Materials ist mit der Entnahme aus dem Autoklaven abgeschlossen. Der Dampf wird nach Abschluss des Härtungsprozesses für weitere Autoklavzyklen verwandt. Das anfallende Kondensat wird als Prozesswasser genutzt. Auf diese Weise wird Energie eingespart und es fällt kein Abwasser an.
Deklarierte Einheit:
Die Deklaration bezieht sich auf die Herstellung von 1 m³ Multipor Mineraldämmplatten mit einer durchschnittlichen Rohdichte von 115 kg/m³. Hierbei handelt es sich um unbewehrten Porenbeton.

## Technical purpose
Alt- und Neubau
Innen- und Außendämmung von Außenwänden
Unterseitige Deckendämmung von Tiefgaragen, Kellern, Durchfahrten
Aufdachdämmung von Steil- und Flachdächern, belasteten Parkdecks
Im Wärmedämmverbundsystem (WDVS) als Systemkomponente
Zweischaliges Mauerwerk
Hohlraumdämmung von Wänden
Vorgehängte hinterlüftete Fassaden
Estrichdämmung

## Reference product
- 1 m³ Multipor: 1

## Inputs
- Erneuerbare Primärenergie als Energieträger (PERE) [MJ]: A1-A3 311
- Erneuerbare Primärenergie zur stofflichen Nutzung (PERM) [MJ]: A1-A3 0
- Total erneuerbare Primärenergie (PERT) [MJ]: A1-A3 311
- Nicht-erneuerbare Primärenergie als Energieträger (PENRE) [MJ]: A1-A3 1349
- Nicht-erneuerbare Primärenergie zur stofflichen Nutzung (PENRM) [MJ]: A1-A3 0
- Total nicht erneuerbare Primärenergie (PENRT) [MJ]: A1-A3 1349
- Einsatz von Sekundärstoffen (SM) [kg]: A1-A3 0
- Erneuerbare Sekundärbrennstoffe (RSF) [MJ]: A1-A3 12
- Nicht erneuerbare Sekundärbrennstoffe (NRSF) [MJ]: A1-A3 126
- Einsatz von Süßwasserressourcen (FW) [m^3]: A1-A3 0.46

## Outputs
- Gefährlicher Abfall zur Deponie (HWD) [kg]: A1-A3 0.14
- Entsorgter nicht gefährlicher Abfall (NHWD) [kg]: A1-A3 25.5
- Entsorgter radioaktiver Abfall (RWD) [kg]: A1-A3 0.06
- Komponenten für die Wiederverwendung (CRU) [kg]
- Stoffe zum Recycling (MFR) [kg]
- Stoffe für die Energierückgewinnung (MER) [kg]
- Exportierte elektrische Energie (EEE) [MJ]
- Exportierte thermische Energie (EET) [MJ]

## Impact indicators
- Globales Erwärmungspotenzial (GWP) [kg CO_(2)-Äq.]: A1-A3 101
- Abbau Potential der stratosphärischen Ozonschicht (ODP) [kg CFC11-Äq.]: A1-A3 3.21e-9
- Versauerungspotenzial von Boden und Wasser (AP) [kg SO_(2)-Äq.]: A1-A3 0.186
- Eutrophierungspotenzial (EP) [kg PO_(4)^(3)-Äq.]: A1-A3 0.0231
- Bildungspotential für troposphärisches Ozon (POCP) [kg Ethen-Äq.]: A1-A3 0.016
- Potenzial für den abiotischen Abbau nicht fossiler Ressourcen (ADPE) [kg Sb-Äq.]: A1-A3 7.27e-5
- Potenzial für den abiotischen Abbau fossiler Brennstoffe (ADPF) [MJ]: A1-A3 1207

## Use advice
Gültigkeitsbereich:
Die Ökobilanz beruht auf den deutschen Herstellwerken von Multipor Stulln und Köln-Porz und der Datenbasis des Jahres 2013.
Systemgrenze:
Typ der EPD: Wiege-bis-Werkstor

Im Einzelnen wurden folgende Prozesse in das Produktstadium A1-A3 der Herstellung der Porenbetonprodukte einbezogen:

Bereitstellungsprozesse von Hilfsstoffen & Energie
Transporte der Ressourcen und Vorprodukte (Zement, Kalk, Sand etc.) zum jeweiligen Produktionsstandort
Herstellprozess im Werk inklusive energetischer Aufwendungen, Herstellung von Hilfsstoffen, Entsorgung anfallender Reststoffe
Herstellung der anteiligen Verpackung

## Data sources
- Multipor Mineraldämmplatte.pdf
- GaBi Database (all versions)
- GaBi database SP25 2014
