# PremiumClean

Dataset: ILCD process, EPD, average dataset
Geography: DE
Reference year: 2015
Valid until: 2020
Classification: OEKOBAU.DAT: Beschichtungen / Innenbeschichtungen / Innenfarben
Classification: IBUCategories: 02 Bauprodukte / Bauklebstoffe und Beschichtungen / Beschichtungen mit organischen Bindemitteln
Method details: Beschichtungen mit organischen Bindemitteln.pdf
Owner: CAPAROL - Farben Lacke Bautenschutz GmbH - Handelnd im Namen und für Rechnung der DAW SE
Compliance: DIN EN 15804; ISO 14025
Review: Accredited third party review by IBU
Amounts: rows without a unit in brackets have none in this file; such an amount is in the reference unit of its flow, which a separate flow dataset defines
copyright: true

## General comment
Die dispersionsbasierte Innenwandfarbe PremiumClean entspricht der /DIN EN 13300:2002/. Sie besteht aus anorganischen Bindemitteln auf Basis von Kunstharzen, anorganischen Pigmenten, die der Farbgebung und der Einstellung des Deckvermögens dienen, mineralischen Füllstoffen wie z. B. Kreide, Wasser und kleineren Mengen an Hilfsstoffen (Verdicker, Entschäumer, Netzmittel, Konservierungsstoffe, u.a.).
Sie trocknet physikalisch durch Verdunstung des enthaltenen Wassers.
Weiter wird durch den Einsatz von dispersionsbasierten Innenwandfarben die Gebrauchstauglichkeit von Bauwerken verbessert und ihre Lebensdauer verlängert.
Als repräsentatives Produkt wurde die Farbe mit den höchsten Umweltwirkungen zur Berechnung der Ökobilanzergebnisse herangezogen.

## Technology and included processes
Für hoch reinigungsfähige und verschmutzungsunempfindliche Wand- und Deckenanstriche auf allen Innenflächen. Ideal für Bereiche, die einer erhöhten mechanischen Beanspruchung unterliegen und gelegentlich gereinigt werden müssen. Trotz matter Oberfläche lassen sich haushaltsübliche Verunreinigungen gut beseitigen. PremiumClean ist beständig gegen wäßrige Desinfektionsmittel und eignet sich besonders für den Einsatz in Räumen mit erhöhter Hygieneanforderung wie Krankenhäuser, Altersheime und Arztpraxen. Auch Kaufhäuser, Hotels, Gaststätten, Büros, Schulen, Kindergärten, Behörden sowie der private Wohnbereich sind das bevorzugte Anwendungsgebiet für PremiumClean, mit dem Schwerpunkt auf verschmutzungsgefährdete Bereiche. Nassabrieb: Klasse 1 (entspricht scheuerbeständig nach DIN 53778) Deckvermögen: Klasse 2, bei einer Ergiebigkeit von 7 m²/l bzw. 140 ml/m2
Technische Daten:
Dichte [g/cm³] 1,35

Feststoffgehalt 55 bis 60 %

pH-Wert 8,5

Weitere bautechnische Daten gemäß PCR sind für das hier deklarierte Produkt nicht relevant.
Deklarierte Einheit:
Die Verbands-EPD bezieht sich auf die deklarierte Einheit von 1 kg dispersionsbasierter Innenwandfarbe. Aus den Produktgruppen wurde das Produkt mit den höchsten Umweltwirkungen deklariert.

Das hier deklarierte Produkt hat einen Verbrauch von 140 ml/m², dies entspricht 189 g/m².

## Technical purpose
Das deklarierte Produkt werden als Innenwandfarbe nach /DIN EN 13300:2002/ eingesetzt.

Gemäß /Decopaint-Richtlinie/ 2004/42/EG/
Produktgruppen a und b,
Nassabrieb Klasse 1
Deckvermögen Klasse 2

## Reference product
- 1 kg Innenwandfarbe auf Dispersionsbasis Produkt: PremiumClean: 1

## Inputs
- Erneuerbare Primärenergie als Energieträger (PERE) [MJ]: A1-A3 3.62
- Erneuerbare Primärenergie zur stofflichen Nutzung (PERM) [MJ]: A1-A3 0
- Total erneuerbare Primärenergie (PERT) [MJ]: A1-A3 3.62, A4 0.02, A5 0.00291, D -0.114
- Nicht-erneuerbare Primärenergie als Energieträger (PENRE) [MJ]: A1-A3 46.2
- Nicht-erneuerbare Primärenergie zur stofflichen Nutzung (PENRM) [MJ]: A1-A3 4.56
- Total nicht erneuerbare Primärenergie (PENRT) [MJ]: A1-A3 50.8, A4 0.338, A5 0.033, D -1.2
- Einsatz von Sekundärstoffen (SM) [kg]: A1-A3 0
- Erneuerbare Sekundärbrennstoffe (RSF) [MJ]: A1-A3 0.00347, A4 2.51e-6, A5 5.11e-7, D -1.73e-5
- Nicht erneuerbare Sekundärbrennstoffe (NRSF) [MJ]: A1-A3 0.0351, A4 2.63e-5, A5 5.34e-6, D -0.000182
- Einsatz von Süßwasserressourcen (FW) [m^3]: A1-A3 0.013, A4 1.93e-5, A5 0.000381, D -0.000178

## Outputs
- Gefährlicher Abfall zur Deponie (HWD) [kg]: A1-A3 0.0105, A4 0, A5 0.000777, D 0
- Entsorgter nicht gefährlicher Abfall (NHWD) [kg]: A1-A3 0.502, A4 6.68e-5, A5 1.53e-5, D -0.00045
- Entsorgter radioaktiver Abfall (RWD) [kg]: A1-A3 0.00202, A4 4.85e-7, A5 1.76e-6, D -6.82e-5
- Komponenten für die Wiederverwendung (CRU) [kg]
- Stoffe zum Recycling (MFR) [kg]
- Stoffe für die Energierückgewinnung (MER) [kg]
- Exportierte elektrische Energie (EEE) [MJ]: A5 0.24
- Exportierte thermische Energie (EET) [MJ]: A5 0.577

## Impact indicators
- Globales Erwärmungspotenzial (GWP) [kg CO_(2)-Äq.]: A1-A3 2.56, A4 0.0246, A5 0.159, D -0.0786
- Abbau Potential der stratosphärischen Ozonschicht (ODP) [kg CFC11-Äq.]: A1-A3 7.82e-10, A4 5.14e-13, A5 1e-12, D -2.38e-11
- Versauerungspotenzial von Boden und Wasser (AP) [kg SO_(2)-Äq.]: A1-A3 0.0309, A4 0.000162, A5 1.68e-5, D -0.000109
- Eutrophierungspotenzial (EP) [kg PO_(4)^(3)-Äq.]: A1-A3 0.00079, A4 4.03e-5, A5 3.44e-6, D -1.22e-5
- Bildungspotential für troposphärisches Ozon (POCP) [kg Ethen-Äq.]: A1-A3 0.00157, A4 -6.81e-5, A5 0.000256, D -9.99e-6
- Potenzial für den abiotischen Abbau nicht fossiler Ressourcen (ADPE) [kg Sb-Äq.]: A1-A3 3.67e-6, A4 1.14e-9, A5 2.09e-9, D -8.14e-9
- Potenzial für den abiotischen Abbau fossiler Brennstoffe (ADPF) [MJ]: A1-A3 45.9, A4 0.337, A5 0.0287, D -1.04

## Use advice
Gültigkeitsbereich:
Diese validierte Deklaration berechtigt zum Führen des Zeichens des Instituts Bauen und Umwelt e.V. Sie gilt ausschließlich für die genannten Produktgruppen für Mitglieder in Deutschland, für fünf Jahre ab Ausstellungsdatum. Es handelt sich hierbei um eine Verbands-EPD, bei der für die Berechnung der Ökobilanz das Produkt einer Gruppe ausgewählt wurde, welches die höchsten Umweltlasten dieser Gruppe aufweist. Die Mitglieder der Verbände sind den Verbandshomepages zu entnehmen.

Für individualisierte EPDs gilt: Diese EPD beruht auf der Muster-Deklaration EPD-DIV-20140060-IBG1-DE.
Systemgrenze:
In der Ökobilanz werden die Module A1/A2/A3, A4, A5 und D berücksichtigt:

A1 Herstellung der Vorprodukte

A2 Transport zum Werk

A3 Produktion inkl. Energiebereitstellung, Herstellung von Verpackung sowie Hilfs- und Betriebsstoffen und Abfallbehandlung)

A4 Transport zur Baustelle

A5 Installation (Verpackungsentsorgung sowie Emissionen bei der Installation)

D Gutschriften aus der Verbrennung der Verpackungsmaterialien und Recycling des Metallgebindes

Es handelt sich also um eine Deklaration von der „Wiege bis Werkstor - mit Optionen“.

## Data sources
- PremiumClean.pdf
- GaBi Database (all versions)
- GaBi database SP20 2013
