# Massivholzböden und Massivholzparkett

Dataset: ILCD process, EPD, average dataset
Geography: DE
Reference year: 2015
Valid until: 2020
Classification: OEKOBAU.DAT: Holz / Holzböden / Parkett
Classification: IBUCategories: 02 Bauprodukte / Produkte aus Bauholz / Vollholzprodukte
Method details: Vollholzprodukte.pdf
Owner: Verband der Deutschen Parkettindustrie e.V.
Compliance: DIN EN 15804; ISO 14025
Review: Accredited third party review by IBU
Amounts: rows without a unit in brackets have none in this file; such an amount is in the reference unit of its flow, which a separate flow dataset defines
copyright: false

## General comment
Massivholzböden sind einschichtige Bodenbeläge aus massivem Holz in Form von Massivholzparkett (Stab-, Riemen, Lam-, Tafel-, Mosaikparkett, Parkettblock, Hochkantlamelle, Breitlammelle, Modulklotz) oder Massivholzdielen. Die Böden haben Dicken zwischen 8 und 40 mm. Die Produkte erfüllen die Anforderungen der jeweiligen unter 2.4 angeführten Produktnormen.
Die Durchschnittsbildung der hier deklarierten Produkte richtet sich nach dem gewichteten Produktionsvolumen der Hersteller.

## Technology and included processes
Einschichtige Massivholzböden und Massivparkett. Massivholzböden sind einschichtige Bodenbeläge aus massivem Holz in Form von Massivholzparkett (Stab-, Riemen, Lam-, Tafel-, Mosaikparkett, Parkettblock, Hochkantlamelle, Breitlammelle, Modulklotz) oder Massivholzdielen. Die Böden haben Dicken zwischen 8 und 40 mm zur Verwendung im Innenbereich. Zur Herstellung von einschichtigen Massivholzböden wird getrocknetes Schnittholz oder Hobelware in mehreren Schritten zu verlegbaren, massiven Einzelelementen verarbeitet. Beginnend mit dem Einschnitt des Rundholzes zu Bohlen und Brettern werden diese in mehreren Arbeitsgängen zu trocknen Rohlingen für die Endproduktion vorbereitet. Je nach Produkt werden daraus in unterschiedlichen zerspanenden Prozessen verlegbare, massive Elemente in den erwünschten Dimensionen der Einzelelemente je m² Bodenfläche hergestellt.
Technische Daten:
Folgende technische Daten für Massivholzböden sind zu nennen:
Deklarierte Einheit:
Die deklarierte Einheit ist 1m² Massivholzparkett bis zum Werkstor der Herstellung. Die Zusammensetzung entspricht dem nach Produktionsvolumen gewichteten Durchschnitt.

## Technical purpose
Massivholzböden werden im Innenbereich für die private und gewerbliche Nutzung entweder auf Estrich, oder auf bestehenden anderen Unterböden wie Holz, Fliesen, PVC schwimmend verlegt oder verklebt oder mit sonstigen Befestigungsmitteln fixiert. Es sind in jedem Fall die Herstellerangaben zu beachten.

## Reference product
- 1m² Massivholzboden: 1

## Inputs
- Erneuerbare Primärenergie als Energieträger (PERE) [MJ]: A1 71.9759, A2 3.83564e-6, A3 436.779, C2 0.000203295, C3 0.0790559, C4 0, D 200.811
- Erneuerbare Primärenergie zur stofflichen Nutzung (PERM) [MJ]: A1 208.875, A2 0, A3 0.205617, C2 0, C3 -209.081, C4 0, D 0
- Total erneuerbare Primärenergie (PERT) [MJ]: A1 280.851, A2 3.83564e-6, A3 436.985, C2 0.000203295, C3 -209.002, C4 0, D 200.811
- Nicht-erneuerbare Primärenergie als Energieträger (PENRE) [MJ]: A1 17.6627, A2 0.00291, A3 113.716, C2 0.154235, C3 1.51177, C4 0, D -175.541
- Nicht-erneuerbare Primärenergie zur stofflichen Nutzung (PENRM) [MJ]: A1 0, A2 0, A3 0, C2 0, C3 0, C4 0, D 0
- Total nicht erneuerbare Primärenergie (PENRT) [MJ]: A1 17.6627, A2 0.00291, A3 113.716, C2 0.154235, C3 1.51177, C4 0, D -175.541
- Einsatz von Sekundärstoffen (SM) [kg]: A1 0, A2 0, A3 0, C2 0, C3 0, C4 0, D 0
- Erneuerbare Sekundärbrennstoffe (RSF) [MJ]: A1 0, A2 0, A3 0.251492, C2 0, C3 0, C4 0, D 209.081
- Nicht erneuerbare Sekundärbrennstoffe (NRSF) [MJ]: A1 0, A2 0, A3 0, C2 0, C3 0, C4 0, D 0
- Einsatz von Süßwasserressourcen (FW) [m^3]: A1 0.0600082, A2 5.45684e-8, A3 4.02879, C2 2.89221e-6, C3 0.0560646, C4 0, D 0.0889321

## Outputs
- Gefährlicher Abfall zur Deponie (HWD) [kg]: A1 0.000125842, A2 0, A3 0.000116569, C2 0, C3 0, C4 0, D 0.0372941
- Entsorgter nicht gefährlicher Abfall (NHWD) [kg]: A1 0.00120615, A2 0, A3 0.000379764, C2 0, C3 0, C4 0, D 1.13293e-6
- Entsorgter radioaktiver Abfall (RWD) [kg]: A1 0.00201581, A2 5.12283e-9, A3 0.0168644, C2 2.71519e-7, C3 0.000261334, C4 0, D -0.0261672
- Komponenten für die Wiederverwendung (CRU) [kg]: A1 0, A2 0, A3 0, C2 0, C3 0, C4 0, D 0
- Stoffe zum Recycling (MFR) [kg]: A1 0, A2 0, A3 0, C2 0, C3 11.705, C4 0, D 0
- Stoffe für die Energierückgewinnung (MER) [kg]: A1 0, A2 0, A3 0.0106698, C2 0, C3 11.705, C4 0, D -11.7157
- Exportierte elektrische Energie (EEE) [MJ]: A1 0, A2 0, A3 0, C2 0, C3 0, C4 0, D 0
- Exportierte thermische Energie (EET) [MJ]: A1 0, A2 0, A3 0, C2 0, C3 0, C4 0, D 0

## Impact indicators
- Globales Erwärmungspotenzial (GWP) [kg CO_(2)-Äq.]: A1 -18.7227, A2 0.000205355, A3 7.34469, C2 0.0108749, C3 19.935, C4 0, D -9.06568
- Abbau Potential der stratosphärischen Ozonschicht (ODP) [kg CFC11-Äq.]: A1 1.62345e-7, A2 4.10095e-13, A3 1.3533e-6, C2 2.17357e-11, C3 2.07265e-8, C4 0, D -2.09902e-6
- Versauerungspotenzial von Boden und Wasser (AP) [kg SO_(2)-Äq.]: A1 0.0107788, A2 1.50749e-6, A3 0.0358173, C2 4.66983e-5, C3 0.000108179, C4 0, D -0.00945496
- Eutrophierungspotenzial (EP) [kg PO_(4)^(3)-Äq.]: A1 0.00229739, A2 3.38911e-7, A3 0.00827104, C2 1.08183e-5, C3 1.262e-5, C4 0, D -9.52658e-5
- Bildungspotential für troposphärisches Ozon (POCP) [kg Ethen-Äq.]: A1 0.00176486, A2 1.78165e-7, A3 0.00608818, C2 5.1281e-6, C3 8.1435e-6, C4 0, D -0.000634773
- Potenzial für den abiotischen Abbau nicht fossiler Ressourcen (ADPE) [kg Sb-Äq.]: A1 2.85565e-5, A2 4.36764e-12, A3 1.44963e-5, C2 2.31492e-10, C3 2.03525e-9, C4 0, D -1.593e-7
- Potenzial für den abiotischen Abbau fossiler Brennstoffe (ADPF) [MJ]: A1 11.9556, A2 0.00288592, A3 67.0006, C2 0.152959, C3 0.788175, C4 0, D -103.49

## Use advice
Gültigkeitsbereich:
Die in dieser EPD beschriebenen einschichtigen Massivholzböden werden von den Mitgliedern des Verbands der Deutschen Parkettindustrie (vdp) hergestellt. Die Deklaration basiert auf den Angaben von 70% der Hersteller von Massivholzböden, wobei die hier vertretene Technologie für alle Mitglieder repräsentativ ist. Die ermittelten Ökobilanzergebnisse sind gemittelte Werte eines durchschnittlichen Produkts aus mehreren Werken mehrerer Hersteller. Wegen der Mannigfaltigkeit der möglichen Oberflächenbeschichtungen wurden diese bei den hier betrachteten Massivholzböden nicht berücksichtigt. Da hinter dem Werkstor der Produktherstellung nur wenige bis keine Aussagen über die Verwendung bzw. Nutzung der Produkte gemacht werden können, sind die Phasen A4 bis C1 nach /EN 15804/ ausgeklammert. Die Umweltwirkung des jeweiligen Entsorgungsstadiums der Module C2 bis D wurden berücksichtigt.
Systemgrenze:
Der Deklarationstyp entspricht einer EPD „von der Wiege bis Werkstor mit Optionen“. Inhalte sind das Stadium der Produktion, also von der Bereitstellung der Rohstoffe bis zum Werkstor der Produktion (cradle-to-gate, Module A1 bis A3), sowie Teile des Ende des Lebensweges (Modul C2 bis C4). Darüber hinaus erfolgt eine Betrachtung der Nutzen und Lasten über den Lebensweg des Produktes hinaus (Modul D).

Im Einzelnen werden in Modul A1 die Bereitstellung des Holzes aus dem Forst und die Bereitstellung weiterer vorveredelter Holzprodukte bilanziert. Die Transporte dieser Stoffe werden in Modul A2 berücksichtigt. Modul A3 umfasst die Bereitstellung der Brennstoffe, Betriebsmittel und Strom sowie die Herstellungsprozesse vor Ort. Diese sind im Wesentlichen die Entrindung, der Einschnitt und die Trocknung. Modul C2 berücksichtigt den Transport zum Entsorger, Modul C3 die Aufbereitung und Sortierung des Altholzes, Modul D bilanziert die thermische Verwertung sowie Nutzen und Lasten außerhalb der Systemgrenze.

## Data sources
- Massivholzböden und Massivholzparkett.pdf
- GaBi Database (all versions)
- GaBi database SP26 2014
