# Baufritz HOIZ Hobelspandämmung; 70 kg/m³

Dataset: ILCD process, EPD, specific dataset
Geography: DE
Reference year: 2018
Valid until: 2023
Classification: OEKOBAU.DAT: Dämmstoffe / Holzfasern / Holzfasern und Holzspäne, lose
Synonyms: Holzspandämmung, Holzdämmung, Holzfaserdämmung
Method details: PKR Bau EPD GmbH PKR-Code: 2.22.5 Version 17.08.2017
Owner: Baufritz GmbH & Co KG
Compliance: DIN EN 15804
Review: Independent external review by Richter Sarah
Amounts: rows without a unit in brackets have none in this file; such an amount is in the reference unit of its flow, which a separate flow dataset defines
copyright: true

## General comment
Die gegenständliche EPD bezieht sich auf das Produkt HOIZ - Hobelspandämmung, hergestellt in dem Werk in 87746 Erkheim, Deutschland.
Die HOIZ - Hobelspandämmung wird als Wärme- und Schalldämmstoff für Dächer, Decken und Wände als nicht belastbare Hohlraumdämmung im Holzbau eingesetzt. Generell können jedoch alle Hohlräume von Bauteilen (auch Stahlkonstruktionen) damit gedämmt bzw. akustisch gedämmt werden.
Der Dämmstoff wird jedoch nur werksintern in Fertigteile verbaut und nicht als „reiner“ Dämmstoff separat ausgeliefert.

## Time period
Die Sachbilanzdaten repräsentieren alle im Jahr 2016 von der Baufritz GmbH & Co. KG in der Produktionsstätte Erkheim produzierten HOIZ - Hobelspandämmungen.

## Technology and included processes
Bei dem Dämmstoff handelt es sich um Hobelspäne, die beim Hobeln verschiedener Weichholzarten aus nahegelegenen regionalen Sägewerken entstehen. Verwendet werden vor allem Fichte in reiner Sortierung, eventuell kleine Restmengen von Tanne und Kiefer. Als Flammschutzmittel und gegen Schimmelpilz werden die Späne mit Molke und Soda imprägniert.

## Reference product
- Baufritz HOIZ Hobelspandämmung: 1

## Inputs
- Erneuerbare Primärenergie als Energieträger (PERE) [MJ]: A1 0, A2 0, A3 0, A1-A3 19.9, A4 1.29, A5 0.00638, B1 0, B2 0, B3 0, B4 0, B5 0, B6 0, B7 0, C1 0, C2 0.286, C3 3.98, C4 0, D -117
- Erneuerbare Primärenergie zur stofflichen Nutzung (PERM) [MJ]: A1 0, A2 0, A3 0, A1-A3 1130, A4 0, A5 0, B1 0, B2 0, B3 0, B4 0, B5 0, B6 0, B7 0, C1 0, C2 0, C3 -1130, C4 0, D 0
- Total erneuerbare Primärenergie (PERT) [MJ]: A1 0, A2 0, A3 0, A1-A3 1150, A4 1.29, A5 0.00638, B1 0, B2 0, B3 0, B4 0, B5 0, B6 0, B7 0, C1 0, C2 0.286, C3 -1130, C4 0, D -117
- Nicht-erneuerbare Primärenergie als Energieträger (PENRE) [MJ]: A1 0, A2 0, A3 0, A1-A3 59.3, A4 22.4, A5 0.0163, B1 0, B2 0, B3 0, B4 0, B5 0, B6 0, B7 0, C1 0, C2 4.98, C3 23.3, C4 0, D -664
- Nicht-erneuerbare Primärenergie zur stofflichen Nutzung (PENRM) [MJ]: A1 0, A2 0, A3 0, A1-A3 0, A4 0, A5 0, B1 0, B2 0, B3 0, B4 0, B5 0, B6 0, B7 0, C1 0, C2 0, C3 0, C4 0, D 0
- Total nicht erneuerbare Primärenergie (PENRT) [MJ]: A1 0, A2 0, A3 0, A1-A3 59.3, A4 22.4, A5 0.0163, B1 0, B2 0, B3 0, B4 0, B5 0, B6 0, B7 0, C1 0, C2 4.98, C3 23.3, C4 0, D -664
- Einsatz von Sekundärstoffen (SM) [kg]: A1 0, A2 0, A3 0, A1-A3 0, A4 0, A5 0, B1 0, B2 0, B3 0, B4 0, B5 0, B6 0, B7 0, C1 0, C2 0, C3 0, C4 0, D 0
- Erneuerbare Sekundärbrennstoffe (RSF) [MJ]: A1 0, A2 0, A3 0, A1-A3 0, A4 0, A5 0, B1 0, B2 0, B3 0, B4 0, B5 0, B6 0, B7 0, C1 0, C2 0, C3 0, C4 0, D 0
- Nicht erneuerbare Sekundärbrennstoffe (NRSF) [MJ]: A1 0, A2 0, A3 0, A1-A3 0, A4 0, A5 0, B1 0, B2 0, B3 0, B4 0, B5 0, B6 0, B7 0, C1 0, C2 0, C3 0, C4 0, D 0
- Einsatz von Süßwasserressourcen (FW) [m3]: A1 0, A2 0, A3 0, A1-A3 4.86, A4 0.187, A5 0.00681, B1 0, B2 0, B3 0, B4 0, B5 0, B6 0, B7 0, C1 0, C2 0.0416, C3 4.52, C4 0, D -125

## Outputs
- Gefährlicher Abfall zur Deponie (HWD) [kg]: A1 0, A2 0, A3 0, A1-A3 3.33e-7, A4 1.68e-6, A5 2.03e-11, B1 0, B2 0, B3 0, B4 0, B5 0, B6 0, B7 0, C1 0, C2 3.73e-7, C3 3.39e-8, C4 0, D -7.07e-7
- Entsorgter nicht gefährlicher Abfall (NHWD) [kg]: A1 0, A2 0, A3 0, A1-A3 0.095, A4 0.00193, A5 1.23e-5, B1 0, B2 0, B3 0, B4 0, B5 0, B6 0, B7 0, C1 0, C2 0.000429, C3 0.253, C4 0, D 0
- Entsorgter radioaktiver Abfall (RWD) [kg]: A1 0, A2 0, A3 0, A1-A3 0.00106, A4 0.00111, A5 1.49e-6, B1 0, B2 0, B3 0, B4 0, B5 0, B6 0, B7 0, C1 0, C2 1.07e-5, C3 0.0011, C4 0, D 0
- Komponenten für die Wiederverwendung (CRU) [kg]: A1 0, A2 0, A3 0, A1-A3 0, A4 0, A5 0, B1 0, B2 0, B3 0, B4 0, B5 0, B6 0, B7 0, C1 0, C2 0, C3 0, C4 0, D 0
- Stoffe zum Recycling (MFR) [kg]: A1 0, A2 0, A3 0, A1-A3 0, A4 0, A5 0, B1 0, B2 0, B3 0, B4 0, B5 0, B6 0, B7 0, C1 0, C2 0, C3 0, C4 0, D 0
- Stoffe für die Energierückgewinnung (MER) [kg]: A1 0, A2 0, A3 0, A1-A3 0, A4 0, A5 0, B1 0, B2 0, B3 0, B4 0, B5 0, B6 0, B7 0, C1 0, C2 0, C3 0, C4 0, D 0
- Exportierte elektrische Energie (EEE) [MJ]: A1 0, A2 0, A3 0, A1-A3 0, A4 0, A5 0, B1 0, B2 0, B3 0, B4 0, B5 0, B6 0, B7 0, C1 0, C2 0, C3 155, C4 0, D -155
- Exportierte thermische Energie (EET) [MJ]: A1 0, A2 0, A3 0, A1-A3 0, A4 0, A5 0, B1 0, B2 0, B3 0, B4 0, B5 0, B6 0, B7 0, C1 0, C2 0, C3 385, C4 0, D -385

## Impact indicators
- Globales Erwärmungspotenzial (GWP) [kg CO2-Äqv.]: A1 0, A2 0, A3 0, A1-A3 -107, A4 1.64, A5 0.00126, B1 0, B2 0, B3 0, B4 0, B5 0, B6 0, B7 0, C1 0, C2 0.366, C3 113, C4 0, D -45.8
- Abbau Potential der stratosphärischen Ozonschicht (ODP) [kg R11-Äqv.]: A1 0, A2 0, A3 0, A1-A3 8.75e-9, A4 1.17e-11, A5 7.57e-14, B1 0, B2 0, B3 0, B4 0, B5 0, B6 0, B7 0, C1 0, C2 2.6e-12, C3 4.74e-11, C4 0, D -1.39e-9
- Versauerungspotenzial von Boden und Wasser (AP) [kg SO2-Äqv.]: A1 0, A2 0, A3 0, A1-A3 0.0101, A4 0.0072, A5 1.82e-6, B1 0, B2 0, B3 0, B4 0, B5 0, B6 0, B7 0, C1 0, C2 0.0016, C3 0.0103, C4 0, D -0.0483
- Eutrophierungspotenzial (EP) [kg Phosphat-Äqv.]: A1 0, A2 0, A3 0, A1-A3 0.00229, A4 0.00177, A5 2.89e-7, B1 0, B2 0, B3 0, B4 0, B5 0, B6 0, B7 0, C1 0, C2 0.000393, C3 0.00226, C4 0, D -0.00754
- Bildungspotential für troposphärisches Ozon (POCP) [kg Ethen-Äqv.]: A1 0, A2 0, A3 0, A1-A3 0.00084, A4 -0.00245, A5 1.35e-7, B1 0, B2 0, B3 0, B4 0, B5 0, B6 0, B7 0, C1 0, C2 -0.000545, C3 0.000984, C4 0, D -0.00533
- Potenzial für den abiotischen Abbau nicht fossiler Ressourcen (ADPE) [kg Sb-Äqv.]: A1 0, A2 0, A3 0, A1-A3 0.00059, A4 1.21e-7, A5 5.63e-10, B1 0, B2 0, B3 0, B4 0, B5 0, B6 0, B7 0, C1 0, C2 2.69e-8, C3 1.25e-6, C4 0, D -1.13e-5
- Potenzial für den abiotischen Abbau fossiler Brennstoffe (ADPF) [MJ]: A1 0, A2 0, A3 0, A1-A3 56.6, A4 22.3, A5 0.0125, B1 0, B2 0, B3 0, B4 0, B5 0, B6 0, B7 0, C1 0, C2 4.96, C3 20.9, C4 0, D -593

## Use advice
Anwendung im Gebäude sinnvoll. Grundsätzlich ist eine Gegenüberstellung oder die Bewertung von EPD Daten nur möglich, wenn alle zu vergleichenden Datensätze nach EN 15804 erstellt wurden und die produktspezifischen Leistungsmerkmale berücksichtigt werden.
Anwendung ausschließlich in Baufritz Systemwänden.

## Data sources
- Software: Umberto NXT Universal Version 7.1.
- Hintergrunddatenbank GaBi SP29 2016
