# Brillux Latexfarbe ELF 992

Dataset: ILCD process, EPD, representative dataset
Geography: DE
Reference year: 2015
Valid until: 2020
Classification: OEKOBAU.DAT: Beschichtungen / Innenbeschichtungen / Innenfarben
Classification: IBUCategories: 02 Bauprodukte / Bauklebstoffe und Beschichtungen / Beschichtungen mit organischen Bindemitteln
Method details: Beschichtungen mit organischen Bindemitteln.pdf
Owner: Brillux GmbH & Co. KG
Compliance: DIN EN 15804; ISO 14025
Review: Accredited third party review by IBU
Amounts: rows without a unit in brackets have none in this file; such an amount is in the reference unit of its flow, which a separate flow dataset defines
copyright: true

## General comment
Brillux Latexfarbe ELF 992 ist eine seidenglänzende, gut deckende, emissionsarme, lösemittel- und weichmacherfreie Innendispersionsfarbe. Das WKI Fraunhofer-Institut hat die Desinfektionsmittel- beständigkeit in Anlehnung der /DIN EN ISO 2812-1/ attestiert. Ausgezeichnet vom /TÜV SÜD/ mit dem TÜV Gütezeichen >> Emissionsarm, Schadstoffgeprüft und Produktion überwacht <<.

Es handelt sich um ein werkseitig hergestelltes flüssiges Gemisch mit organischem Bindemittel, mineralischen Füllstoffen, Pigmenten, Wasser und Zusatzstoffen. Die Verfestigung erfolgt durch Trocknung und Verfilmung der Polymerbindemittel.

## Technology and included processes
Brillux Latexfarbe ELF 992 ist eine seidenglänzende, gut deckende, emissionsarme, lösemittel- und weichmacherfreie Innendispersionsfarbe. Das WKI Fraunhofer-Institut hat die Desinfektionsmittelbeständigkeit in Anlehnung der /DIN EN ISO 2812-1/ attestiert. Ausgezeichnet vom /TÜV SÜD/ mit dem TÜV Gütezeichen >> Emissionsarm, Schadstoffgeprüft und Produktion überwacht <<. Es handelt sich um ein werkseitig hergestelltes flüssiges Gemisch mit organischem Bindemittel, mineralischen Füllstoffen, Pigmenten, Wasser und Zusatzstoffen. Die Verfestigung erfolgt durch Trocknung und Verfilmung der Polymerbindemittel.
Deklarierte Einheit:
Die Deklaration bezieht sich auf 1 kg Brillux Latexfarbe ELF 992. Da Farben nach Volumen (Liter) verkauft werden, ist nachfolgend der Verbrauch volumenbezogen angegeben.

## Technical purpose
Für strapazierfähige und gut reinigungsfähige Decken- und Wandanstriche im Innenbereich, auf z. B. Innenputz (Normalputz MG PII, PIII, PIV in Abhängigkeit der Druckfestigkeit), Beton, Gipskarton oder Raufaser. Darüber hinaus auch einsetzbar in den Brillux Creativ-Techniken. Der Verbrauch beträgt ca. 0,130 - 0,150 l/m².

## Reference product
- 1 kg Brillux Latexfarbe ELF 992: 1

## Inputs
- Erneuerbare Primärenergie als Energieträger (PERE) [MJ]: A1-A3 1.56
- Erneuerbare Primärenergie zur stofflichen Nutzung (PERM) [MJ]: A1-A3 0
- Total erneuerbare Primärenergie (PERT) [MJ]: A1-A3 1.56
- Nicht-erneuerbare Primärenergie als Energieträger (PENRE) [MJ]: A1-A3 22.12
- Nicht-erneuerbare Primärenergie zur stofflichen Nutzung (PENRM) [MJ]: A1-A3 6.28
- Total nicht erneuerbare Primärenergie (PENRT) [MJ]: A1-A3 28.4
- Einsatz von Sekundärstoffen (SM) [kg]: A1-A3 0
- Erneuerbare Sekundärbrennstoffe (RSF) [MJ]: A1-A3 0
- Nicht erneuerbare Sekundärbrennstoffe (NRSF) [MJ]: A1-A3 0
- Einsatz von Süßwasserressourcen (FW) [m^3]: A1-A3 0.0129

## Outputs
- Gefährlicher Abfall zur Deponie (HWD) [kg]: A1-A3 0.00488
- Entsorgter nicht gefährlicher Abfall (NHWD) [kg]: A1-A3 0.0201
- Entsorgter radioaktiver Abfall (RWD) [kg]: A1-A3 0.000879
- Komponenten für die Wiederverwendung (CRU) [kg]
- Stoffe zum Recycling (MFR) [kg]
- Stoffe für die Energierückgewinnung (MER) [kg]
- Exportierte elektrische Energie (EEE) [MJ]
- Exportierte thermische Energie (EET) [MJ]

## Impact indicators
- Globales Erwärmungspotenzial (GWP) [kg CO_(2)-Äq.]: A1-A3 1.42
- Abbau Potential der stratosphärischen Ozonschicht (ODP) [kg CFC11-Äq.]: A1-A3 3.72e-10
- Versauerungspotenzial von Boden und Wasser (AP) [kg SO_(2)-Äq.]: A1-A3 0.0301
- Eutrophierungspotenzial (EP) [kg PO_(4)^(3)-Äq.]: A1-A3 0.000447
- Bildungspotential für troposphärisches Ozon (POCP) [kg Ethen-Äq.]: A1-A3 0.00137
- Potenzial für den abiotischen Abbau nicht fossiler Ressourcen (ADPE) [kg Sb-Äq.]: A1-A3 2.65e-6
- Potenzial für den abiotischen Abbau fossiler Brennstoffe (ADPF) [MJ]: A1-A3 26.3

## Use advice
Gültigkeitsbereich:
In dieser Produktdeklaration wird die Innenwandfarbe Brillux Latexfarbe ELF 992 betrachtet, die am Standort Münster/Westfalen hergestellt wird.
Systemgrenze:
Diese Ökobilanz adressiert das Lebenszyklusstadium der Produktherstellung (Wiege bis Werktor). Das Produktstadium umfasst die Module A1 (Rohstoffbereitstellung), A2 (Transport), A3 (Herstellung) gemäß der /DIN EN 15804/.

## Data sources
- Brillux Latexfarbe ELF 992.pdf
- GaBi Database (all versions)
- GaBi database SP28 2015
