# Sylitol Bio-Innenfarbe

Dataset: ILCD process, EPD, average dataset
Geography: DE
Reference year: 2015
Valid until: 2020
Classification: OEKOBAU.DAT: Beschichtungen / Innenbeschichtungen / Innenfarben
Classification: IBUCategories: 02 Bauprodukte / Bauklebstoffe und Beschichtungen / Beschichtungen mit organischen Bindemitteln
Method details: Beschichtungen mit organischen Bindemitteln.pdf
Owner: CAPAROL - Farben Lacke Bautenschutz GmbH - Handelnd im Namen und für Rechnung der DAW SE
Compliance: DIN EN 15804; ISO 14025
Review: Accredited third party review by IBU
Amounts: rows without a unit in brackets have none in this file; such an amount is in the reference unit of its flow, which a separate flow dataset defines
copyright: false

## General comment
Die dispersionsbasierte Innenwandfarbe Sylitol Bio-Innenfarbe entspricht der /DIN EN 13300:2002/. Sie besteht aus organischen und anorganischen Bindemitteln auf Basis von Kunstharzen und Wasserglas, anorganischen Pigmenten, die der Farbgebung und der Einstellung des Deckvermögens dienen, mineralischen Füllstoffen wie z. B. Kreide, Wasser und kleineren Mengen an Hilfsstoffen (Verdicker, Entschäumer, Netzmittel, Konservierungsstoffe, u.a.).
Sie trocknen physikalisch durch Verdunstung des enthaltenen Wassers.

Weiter wird durch den Einsatz von dispersionsbasierten Innenwandfarben die Gebrauchstauglichkeit von Bauwerken verbessert und ihre Lebensdauer verlängert. Als repräsentatives Produkt wurde die Farbe mit den höchsten Umweltwirkungen zur Berechnung der Ökobilanzergebnisse herangezogen.

## Technology and included processes
Für hochwertige Wand- und Deckenanstriche im gesamten Wohnbereich, in Schulen, Kindergärten,öffentlichen Gebäuden sowie in der Denkmalpflege. Durch die allergenkontrollierte Rezeptur ideal für Allergiker. - konservierungsmittelfrei - lösemittelfrei - weichmacherfrei - frei von foggingaktiven Substanzen - raumlufthygienisch unbedenklich - Zertifikat „für Allergiker geeignet“, gemäß Prüfzeugnis des TÜV Nord - fremdüberwacht - wasserverdünnbar - umweltschonend und geruchsarm - hochdiffusionsfähig, sd H2O <0,02 m nach DIN EN 1062 Nassabrieb: Klasse 3 (entspricht waschbeständig nach DIN 53778) Deckvermögen: Klasse 2, bei einer Ergiebigkeit von 7 m²/l bzw. 140 ml/m²
Technische Daten:
Dichte [g/cm³] 1,5

Feststoffgehalt 55 bis 60 %

pH-Wert 11

Weitere bautechnische Daten gemäß PCR sind für dieses Produkt nicht relevant.
Deklarierte Einheit:
Die Verbands-EPD bezieht sich auf die deklarierte Einheit von 1 kg dispersionsbasierter Innenwandfarbe. Aus den Produktgruppen wurde das Produkt mit den höchsten Umweltwirkungen deklariert.

Das hier deklarierte Produkt hat einen Verbrauch von 140 ml/m², dies entspricht 210 g/m².

## Technical purpose
Das deklarierte Produkt wird als Innenwandfarbe nach /DIN EN 13300:2002/ eingesetzt.

Gemäß /Decopaint-Richtlinie/ 2004/42/EG/
Produktgruppen a und b,
Nassabrieb Klasse 3
Deckvermögen Klasse 2

## Reference product
- 1 kg Innenwandfarbe auf Dispersionsbasis Produkt: Sylitol Bio-Innenfarbe: 1

## Inputs
- Erneuerbare Primärenergie als Energieträger (PERE) [MJ]: A1-A3 1.22
- Erneuerbare Primärenergie zur stofflichen Nutzung (PERM) [MJ]: A1-A3 0
- Total erneuerbare Primärenergie (PERT) [MJ]: A1-A3 1.22, A4 0.02, A5 0.00291, D -0.114
- Nicht-erneuerbare Primärenergie als Energieträger (PENRE) [MJ]: A1-A3 14.8
- Nicht-erneuerbare Primärenergie zur stofflichen Nutzung (PENRM) [MJ]: A1-A3 1.57
- Total nicht erneuerbare Primärenergie (PENRT) [MJ]: A1-A3 16.4, A4 0.338, A5 0.033, D -1.2
- Einsatz von Sekundärstoffen (SM) [kg]: A1-A3 0
- Erneuerbare Sekundärbrennstoffe (RSF) [MJ]: A1-A3 0.000742, A4 2.51e-6, A5 5.11e-7, D -1.73e-5
- Nicht erneuerbare Sekundärbrennstoffe (NRSF) [MJ]: A1-A3 0.00745, A4 2.63e-5, A5 5.34e-6, D -0.000182
- Einsatz von Süßwasserressourcen (FW) [m^3]

## Outputs
- Gefährlicher Abfall zur Deponie (HWD) [kg]
- Entsorgter nicht gefährlicher Abfall (NHWD) [kg]
- Entsorgter radioaktiver Abfall (RWD) [kg]
- Komponenten für die Wiederverwendung (CRU) [kg]
- Stoffe zum Recycling (MFR) [kg]
- Stoffe für die Energierückgewinnung (MER) [kg]
- Exportierte elektrische Energie (EEE) [MJ]: A5 0.24
- Exportierte thermische Energie (EET) [MJ]: A5 0.577

## Impact indicators
- Globales Erwärmungspotenzial (GWP) [kg CO_(2)-Äq.]: A1-A3 0.878, A4 0.0246, A5 0.159, D -0.0786
- Abbau Potential der stratosphärischen Ozonschicht (ODP) [kg CFC11-Äq.]: A1-A3 1.09e-9, A4 5.14e-13, A5 1e-12, D -2.38e-11
- Versauerungspotenzial von Boden und Wasser (AP) [kg SO_(2)-Äq.]: A1-A3 0.00713, A4 0.000162, A5 1.68e-5, D -0.000109
- Eutrophierungspotenzial (EP) [kg PO_(4)^(3)-Äq.]: A1-A3 0.000275, A4 4.03e-5, A5 3.44e-6, D -1.22e-5
- Bildungspotential für troposphärisches Ozon (POCP) [kg Ethen-Äq.]: A1-A3 0.000394, A4 -6.81e-5, A5 0.000256, D -9.99e-6
- Potenzial für den abiotischen Abbau nicht fossiler Ressourcen (ADPE) [kg Sb-Äq.]: A1-A3 1.65e-6, A4 1.14e-9, A5 2.09e-9, D -8.14e-9
- Potenzial für den abiotischen Abbau fossiler Brennstoffe (ADPF) [MJ]: A1-A3 15.1, A4 0.337, A5 0.0287, D -1.04

## Use advice
Gültigkeitsbereich:
Diese validierte Deklaration berechtigt zum Führen des Zeichens des Instituts Bauen und Umwelt e.V. Sie gilt ausschließlich für die genannten Produktgruppen für Mitglieder in Deutschland, für fünf Jahre ab Ausstellungsdatum. Es handelt sich hierbei um eine Verbands-EPD, bei der für die Berechnung der Ökobilanz das Produkt einer Gruppe ausgewählt wurde, welches die höchsten Umweltlasten dieser Gruppe aufweist. Die Mitglieder der Verbände sind den Verbandshomepages zu entnehmen.

Für individualisierte EPDs gilt: Diese EPD beruht auf der Muster-Deklaration EPD-DIV-20140061-IBG1-DE.
Systemgrenze:
In der Ökobilanz werden die Module A1/A2/A3, A4, A5 und D berücksichtigt:

A1 Herstellung der Vorprodukte

A2 Transport zum Werk

A3 Produktion inkl. Energiebereitstellung, Herstellung von Verpackung sowie Hilfs- und Betriebsstoffen und Abfallbehandlung)

A4 Transport zur Baustelle

A5 Installation (Verpackungsentsorgung sowie Emissionen bei der Installation)

D Gutschriften aus der Verbrennung der Verpackungsmaterialien und Recycling des Metallgebindes

Es handelt sich also um eine Deklaration von der „Wiege bis Werkstor - mit Optionen“.

## Data sources
- Sylitol Bio-Innenfarbe.pdf
- GaBi Database (all versions)
- GaBi database SP20 2013
