# MSH Profiles

Dataset: ILCD process, EPD, average dataset
Geography: DE
Reference year: 2015
Valid until: 2020
Classification: OEKOBAU.DAT: Metalle / Stahl und Eisen / Stahlprofile
Classification: IBUCategories: 02 Bauprodukte / Metallbauprodukte und Zubehör / Baustähle
Method details: Baustähle.pdf
Owner: Vallourec Deutschland GmbH
Compliance: DIN EN 15804; ISO 14025
Review: Accredited third party review by IBU
Amounts: rows without a unit in brackets have none in this file; such an amount is in the reference unit of its flow, which a separate flow dataset defines
copyright: true

## General comment
MSH (hot-finished structural hollow) sections are hot-finished hollow sections for structural steel which are manufactured from non-alloy structural steels and fine-grain steels in accordance with /DIN EN 10 210-/1.

## Technology and included processes
1. Plug rolling mill in Düsseldorf Rath After heating the continuous-cast circular steel blocks to approx. 1,280 °C in the rotary hearth furnace, the blocks are rolled out as hollow blocks in the cross rolling mill. The wall thickness of these hollow blocks is then reduced in two runs (stubs) in the plug rolling mill, whereby plugs and rolls form an annular gap. Reeling (straightening) and renewed heating in the reheating furnace is followed by final forming to the finished size on the sizing mill, whereby square and rectangular hollow sections are formed in the last stands. The MSH sections are then left to cool on the cooling bed before being directed along roller beds to the finishing section. 2. Mandrel rolling mill in Mülheim First of all, the continuous-cast round bars are heated to rolling temperature in the rotary hearth furnace. This is followed by forming as hollow blocks in the cross rolling mill where two work rolls featuring special profiles rotate in the same direction and whose axes are inclined towards the horizontal stock axis. This generates a helical movement on the part of the stock across an internal tool acting as a piercer plug. The hollow block is rolled at a consistent heat over eight dual stands arranged in a close in-line formation, whereby the hollow block is slid onto a mandrel bar serving as an internal tool during rolling. The ensuing tube is reheated in a walking beam furnace before reshaping to the exact final circular, square or rectangular dimensions in the stretch-reducing mill. The MSH sections are then left to cool on the cooling bed before being directed along roller beds and by crane to the finishing section.
Technical data:
The mechanical and technical properties displayed by hot-finished hollow sections are indicated in Part 1, Table A.3 (Non-alloy structural steels) and Table B.3 (Fine-grain steels) of the /DIN EN 10210/ delivery standard.
Declared unit:
This declaration refers to the manufacture of 1 tonne structural hollow sections.

## Technical purpose
MSH sections are used in numerous construction applications:

· Industrial buildings and halls

· Bridge construction

· Boiler support structures

· Sports facilities (stadiums)

· Exhibition buildings

· Airport terminals and hangars

· Steel-glass façades

· Offshore constructions

## Reference product
- 1 lfm Stahlschutzplanke: 1000

## Inputs
- Erneuerbare Primärenergie als Energieträger (PERE) [MJ]: A1-A3 1228.8, C3 0, D 281.37
- Erneuerbare Primärenergie zur stofflichen Nutzung (PERM) [MJ]: A1-A3 0, C3 0, D 0
- Total erneuerbare Primärenergie (PERT) [MJ]: A1-A3 1228.8, C3 0, D 281.37
- Nicht-erneuerbare Primärenergie als Energieträger (PENRE) [MJ]: A1-A3 26973, C3 0, D -15308
- Nicht-erneuerbare Primärenergie zur stofflichen Nutzung (PENRM) [MJ]: A1-A3 0, C3 0, D 0
- Total nicht erneuerbare Primärenergie (PENRT) [MJ]: A1-A3 26973, C3 0, D -15308
- Einsatz von Sekundärstoffen (SM) [kg]: A1-A3 172, C3 0, D 930
- Erneuerbare Sekundärbrennstoffe (RSF) [MJ]: A1-A3 0, C3 0, D 0
- Nicht erneuerbare Sekundärbrennstoffe (NRSF) [MJ]: A1-A3 0, C3 0, D 0
- Einsatz von Süßwasserressourcen (FW) [m^3]: A1-A3 2.2654, C3 0, D -1.1444

## Outputs
- Gefährlicher Abfall zur Deponie (HWD) [kg]: A1-A3 0.066252, C3 0, D -0.0054016
- Entsorgter nicht gefährlicher Abfall (NHWD) [kg]: A1-A3 29.25, C3 0, D -23.376
- Entsorgter radioaktiver Abfall (RWD) [kg]: A1-A3 0.30756, C3 0, D 0.24059
- Komponenten für die Wiederverwendung (CRU) [kg]: A1-A3 0, C3 0, D 0
- Stoffe zum Recycling (MFR) [kg]: A1-A3 0, C3 990, D 0
- Stoffe für die Energierückgewinnung (MER) [kg]: A1-A3 0, C3 0, D 0
- Exportierte elektrische Energie (EEE) [MJ]: A1-A3 0, C3 0, D 0
- Exportierte thermische Energie (EET) [MJ]: A1-A3 0, C3 0, D 0

## Impact indicators
- Globales Erwärmungspotenzial (GWP) [kg CO_(2)-Äq.]: A1-A3 2605.1, C3 0, D -1684.1
- Abbau Potential der stratosphärischen Ozonschicht (ODP) [kg CFC11-Äq.]: A1-A3 2.7244e-8, C3 0, D 1.2533e-8
- Versauerungspotenzial von Boden und Wasser (AP) [kg SO_(2)-Äq.]: A1-A3 8.3244, C3 0, D -6.3513
- Eutrophierungspotenzial (EP) [kg PO_(4)^(3)-Äq.]: A1-A3 0.72878, C3 0, D -0.53593
- Bildungspotential für troposphärisches Ozon (POCP) [kg Ethen-Äq.]: A1-A3 1.1635, C3 0, D -0.93392
- Potenzial für den abiotischen Abbau nicht fossiler Ressourcen (ADPE) [kg Sb-Äq.]: A1-A3 0.00060494, C3 0, D -8.0698e-5
- Potenzial für den abiotischen Abbau fossiler Brennstoffe (ADPF) [MJ]: A1-A3 26199, C3 0, D -15915

## Use advice
Scope:
This Environmental Product Declaration considers hot-finished MSH sections with circular, square and rectangular cross-sections manufactured in the Vallourec plants in Düsseldorf Rath and Mülheim (Germany). This document is translated from the German Environmental Product Declaration into English. It is based on the German original version EPD-VAL-20150248-IBB1-DE. The verifier has no influence on the quality of the translation.
System boundary:
Type of EPD: cradle to gate – with options

The following life cycle phases are considered:

Product stage (Modules A1-A3)

Waste processing (Module C3) Benefits and loads beyond the system boundaries (Module D)

The production stage considers: Provision of raw materials (steel billet), auxiliaries and energy Transporting raw materials Manufacturing process in the plant including energy, manufacturing auxiliaries, disposing of any residual materials incurred and consideration of plant emissions

Waste processing as well as benefits and loads beyond the system boundary:

It is assumed for steel scrap that the waste characteristic ends after sorting and collecting following demolition.

Module D considers the re-use and recycling of MSH sections.

## Data sources
- MSH-Profile.pdf
- GaBi Database (all versions)
- GaBi database SP29 2016
