# Volume flow controller VKE, VK

Dataset: ILCD process, EPD, specific dataset
Geography: DE
Reference year: 2015
Valid until: 2020
Classification: OEKOBAU.DAT: Gebäudetechnik / Klimatisierung und Lüftung / Lüftungsanlagen
Classification: IBUCategories: 03 Gebäudetechnik / Raumlufttechnische Anlagen (RLT) und Klimatechnik / Volumenstromregler und Volumenstrombegrenzer für Lüftungsanlagen
Method details: Volumenstromregler und Volumenstrombegrenzer für Lüftungsanlagen.pdf
Owner: Wildeboer Bauteile GmbH
Compliance: DIN EN 15804; ISO 14025
Review: Accredited third party review by IBU
Amounts: rows without a unit in brackets have none in this file; such an amount is in the reference unit of its flow, which a separate flow dataset defines
copyright: true

## General comment
Electronic volume flow controllers VKE for constant and variable volume flows are maintenance-free, they can be installed independent of position in ventilation ducts for supply air as well as exhaust air in ventilation and air-conditioning systems. They are factory-adjusted for the entire volume flow range. An innovative measurement procedure uses the differential pressure and damper blade position for measuring and controlling the volume flow rate. At the same time, an efficiency signal is provided for energy-saving optimisation of the operating pressure in the ventilation system. At all pressures, the innovative measurement principle enables high control precision of ±5% to ±15% from the set point volume flow in the volume flow ranges of approx. 1:6. The casing and the centrically-mounted damper blade are made of galvanised sheet steel with a stainless steel bearing axis in special bearing bushings while the drive casing is made of plastic. The operating modes "constant", "variable" and "4-point" are possible in addition to the overriding controls "open" and "closed". The "variable" operating mode is possible in operation modes 0-10V, 2-10V and 2-8V. Parallel operation and sequential circuit are possible.

Constant mechanical VK volume flow controllers are maintenance-free mechanical controllers without auxiliary power supply for constant volume flows in ventilation and air-conditioning systems. They can be installed independent of position in ventilation ducts for supply air and exhaust air. The casing and control mechanism are made of galvanised sheet steel. The damper blade for volume flow regulation is centrically-mounted and guided into special bearing bushings via stainless steel bearing axes. The setting device features a rotary pointer, scale and locking mechanism. The volume flow set points can be actuator-driven adjusted or set manually within the volume flow ranges of Vmin to Vmax. The special control mechanism guarantees a high degree of control accuracy with deviations of only approx. ±5% to ±10%. Accordingly, in the case of variable pressures, the volume flow is kept constant throughout the entire pressure range. As an option, the VK is available with actuator-driven adjustment for two volume flow set points or with continuous actuator-driven adjustment for any volume flow set points.

More information is available in the /manufacturer’s documents/ and section 7 provides information on hygiene.

## Technology and included processes
Production is at one location in the Weener plant. The necessary raw and semi-finished parts, ancillary materials and operating materials are delivered by suppliers and are integrated in production. Semi-finished parts are manufactured in a prefabrication using standard manufacturing methods. Metal parts are punched and edged to shape. Blanks are optimised accordingly in order to avoid waste. Any waste incurred is collected and where possible recycled by the corresponding companies, or disposed of and incinerated as domestic waste. Lubricants are largely collected, treated and re-used in production. Dust and fumes are extracted and collected on site. Prefabricated parts are assembled along with bought-in parts to volume flow controllers, inspected within the framework of quality assurance to /DIN EN ISO 9001/, packed and shipped. Each volume flow controller is factory-adjusted to ensure a high and consistent degree of control accuracy. The plant is subject to an energy management system.
Technical data:
The requirements in accordance with the harmonised regulations governing CE marking relating to electromagnetic compatibility (EMC) in line with EU Guideline /2004/108/EC/, the performance rating according to /DIN EN 12589/ and the associated requirements according to /DIN EN ISO 5135/, /DIN EN ISO 3741/, /DIN EN ISO 5167-1/ and /DIN EN 1751/ are fulfilled.
Declared unit:
This declaration refers to the manufacture of one volume flow controller VKE including drive, electric control unit and the optional acoustic insulation according to /IBU PCR, Part B/. Other volume flow controllers, type VKE and VK, whose variants and varying dimensions deviate from the reference products analysed here can be calculated using a weight chart provided by Wildeboer Bauteile GmbH and scaling the results.

## Technical purpose
Volume flow controller for controlling constant and variable volume flows in ventilation and air-conditioning systems and for shutting off the ventilation ducts.

## Reference product
- 1 Stück Volumenstromregler VKE mit 4,91 kg/Stück: 1

## Inputs
- Erneuerbare Primärenergie als Energieträger (PERE) [MJ]: A1-A3 19, A4 0.093, A5 0.0011, B1 0, B2 0, B3 0, B4 0, B5 0, B6 130, C1 0, C2 0.05, C3 0.013, C4 0.029, D 0.47
- Erneuerbare Primärenergie zur stofflichen Nutzung (PERM) [MJ]: A1-A3 0, A4 0, A5 0, B1 0, B2 0, B3 0, B4 0, B5 0, B6 0, C1 0, C2 0, C3 0, C4 0, D 0
- Total erneuerbare Primärenergie (PERT) [MJ]: A1-A3 19, A4 0.093, A5 0.0011, B1 0, B2 0, B3 0, B4 0, B5 0, B6 130, C1 0, C2 0.05, C3 0.013, C4 0.029, D 0.47
- Nicht-erneuerbare Primärenergie als Energieträger (PENRE) [MJ]: A1-A3 320, A4 1.6, A5 0.013, B1 0, B2 0, B3 0, B4 0, B5 0, B6 630, C1 0, C2 0.85, C3 0.11, C4 0.45, D -73
- Nicht-erneuerbare Primärenergie zur stofflichen Nutzung (PENRM) [MJ]: A1-A3 13, A4 0, A5 0, B1 0, B2 0, B3 0, B4 0, B5 0, B6 0, C1 0, C2 0, C3 0, C4 0, D 0
- Total nicht erneuerbare Primärenergie (PENRT) [MJ]: A1-A3 330, A4 1.6, A5 0.013, B1 0, B2 0, B3 0, B4 0, B5 0, B6 630, C1 0, C2 0.85, C3 0.11, C4 0.45, D -73
- Einsatz von Sekundärstoffen (SM) [kg]: A1-A3 0.701
- Erneuerbare Sekundärbrennstoffe (RSF) [MJ]: A1-A3 0, A4 0, A5 0, B1 0, B2 0, B3 0, B4 0, B5 0, B6 0, C1 0, C2 0, C3 0, C4 0, D 0
- Nicht erneuerbare Sekundärbrennstoffe (NRSF) [MJ]: A1-A3 0, A4 0, A5 0, B1 0, B2 0, B3 0, B4 0, B5 0, B6 0, C1 0, C2 0, C3 0, C4 0, D 0
- Einsatz von Süßwasserressourcen (FW) [m^3]: A1-A3 0.12, A4 6e-5, A5 8e-5, B1 0, B2 0, B3 0, B4 0, B5 0, B6 0.18, C1 0, C2 3.2e-5, C3 0.00061, C4 0.0014, D -0.0051

## Outputs
- Gefährlicher Abfall zur Deponie (HWD) [kg]: A1-A3 0.03, A4 7e-6, A5 1.6e-6, B1 0, B2 0, B3 0, B4 0, B5 0, B6 0.19, C1 0, C2 3.8e-6, C3 2e-5, C4 2.8e-5, D 0.0038
- Entsorgter nicht gefährlicher Abfall (NHWD) [kg]: A1-A3 0.6, A4 0.0003, A5 0.00093, B1 0, B2 0, B3 0, B4 0, B5 0, B6 0.24, C1 0, C2 0.00016, C3 0.025, C4 0.81, D -0.12
- Entsorgter radioaktiver Abfall (RWD) [kg]: A1-A3 0.011, A4 2.2e-6, A5 6.2e-7, B1 0, B2 0, B3 0, B4 0, B5 0, B6 0.075, C1 0, C2 1.2e-6, C3 7.4e-6, C4 1.5e-5, D 0.0012
- Komponenten für die Wiederverwendung (CRU) [kg]: A1-A3 0, A4 0, A5 0, B1 0, B2 0, B3 0, B4 0, B5 0, B6 0, C1 0, C2 0, C3 0, C4 0, D 0
- Stoffe zum Recycling (MFR) [kg]: A1-A3 0, A4 0, A5 0, B1 0, B2 0, B3 0, B4 0, B5 0, B6 0, C1 0, C2 0, C3 0, C4 0, D 4.3
- Stoffe für die Energierückgewinnung (MER) [kg]: A1-A3 0, A4 0, A5 0.022, B1 0, B2 0, B3 0, B4 0, B5 0, B6 0, C1 0, C2 0, C3 0.16, C4 0.3
- Exportierte elektrische Energie (EEE) [MJ]: A1-A3 0, A4 0, A5 0.026, B1 0, B2 0, B3 0, B4 0, B5 0, B6 0, C1 0, C2 0, C3 0.2, C4 1.4
- Exportierte thermische Energie (EET) [MJ]: A1-A3 0, A4 0, A5 0.064, B1 0, B2 0, B3 0, B4 0, B5 0, B6 0, C1 0, C2 0, C3 0.52, C4 4

## Impact indicators
- Globales Erwärmungspotenzial (GWP) [kg CO_(2)-Äq.]: A1-A3 24, A4 0.11, A5 0.027, B1 0, B2 0, B3 0, B4 0, B5 0, B6 44, C1 0, C2 0.062, C3 0.12, C4 0.77, D -7.9
- Abbau Potential der stratosphärischen Ozonschicht (ODP) [kg CFC11-Äq.]: A1-A3 8.3e-9, A4 2.7e-13, A5 2.9e-14, B1 0, B2 0, B3 0, B4 0, B5 0, B6 3.5e-9, C1 0, C2 1.5e-13, C3 3.2e-13, C4 2.1e-12, D 2.8e-11
- Versauerungspotenzial von Boden und Wasser (AP) [kg SO_(2)-Äq.]: A1-A3 0.12, A4 0.00052, A5 1.1e-5, B1 0, B2 0, B3 0, B4 0, B5 0, B6 0.081, C1 0, C2 0.00028, C3 5.6e-5, C4 0.00024, D -0.029
- Eutrophierungspotenzial (EP) [kg PO_(4)^(3)-Äq.]: A1-A3 0.0093, A4 0.00013, A5 2e-6, B1 0, B2 0, B3 0, B4 0, B5 0, B6 0.0099, C1 0, C2 6.8e-5, C3 1.4e-5, C4 2.2e-5, D -0.0024
- Bildungspotential für troposphärisches Ozon (POCP) [kg Ethen-Äq.]: A1-A3 0.011, A4 -0.00018, A5 6.6e-7, B1 0, B2 0, B3 0, B4 0, B5 0, B6 0.0057, C1 0, C2 -9.5e-5, C3 4.3e-6, C4 1.4e-5, D -0.0043
- Potenzial für den abiotischen Abbau nicht fossiler Ressourcen (ADPE) [kg Sb-Äq.]: A1-A3 0.0018, A4 5.4e-9, A5 1.6e-9, B1 0, B2 0, B3 0, B4 0, B5 0, B6 8.3e-6, C1 0, C2 2.9e-9, C3 3.7e-8, C4 -5.8e-6, D -1.3e-5
- Potenzial für den abiotischen Abbau fossiler Brennstoffe (ADPF) [MJ]: A1-A3 300, A4 1.6, A5 0.011, B1 0, B2 0, B3 0, B4 0, B5 0, B6 440, C1 0, C2 0.84, C3 0.094, C4 0.41, D -76

## Use advice
Scope:
This document refers to the manufacture, transport, installation, operation and disposal of volume flow controllers with optional accessories for ventilation and air-conditioning systems. The products are produced exclusively at the Weener plant in Germany where production data for 2012 was recorded.
System boundary:
The “cradle to grave” EPD system boundary has a modular design according to /EN 15804/. The LCA for the products under review considers Modules A, B, C and D:

A1-A3 (Product stage): Raw material supply, transport to the manufacturer, production (incl. provision of energy and water, provision of ancillary materials, disposal of waste)

A4-A5 (Construction process): Transport to construction site, installation in the building, recycling packaging waste

B1-B5 (Use stage): Use of the installed product

B6-B7 (Use stage – building operation): Use of electrical energy for the product

C1-C4 (End-of-life stage): De-constructing the product, transport to waste processing, waste treatment, disposal

D (Credits): Recycling potential

## Data sources
- Volumenstromregler VKE, VK.pdf
- GaBi Database (all versions)
- GaBi database SP27 2015
