# Universal-Vorstrich VG 2

Dataset: ILCD process, EPD, average dataset
Geography: DE
Reference year: 2015
Valid until: 2020
Classification: OEKOBAU.DAT: Beschichtungen / Grundierungen / Grundierungen Farben und Putze
Classification: IBUCategories: 02 Bauprodukte / Bauklebstoffe und Beschichtungen / Beschichtungen mit organischen Bindemitteln
Method details: Beschichtungen mit organischen Bindemitteln.pdf
Owner: PCI Augsburg GmbH
Compliance: DIN EN 15804; ISO 14025
Review: Accredited third party review by IBU
Amounts: rows without a unit in brackets have none in this file; such an amount is in the reference unit of its flow, which a separate flow dataset defines
copyright: false

## General comment
Universal-Vorstrich VG 2 besteht aus organischen Bindemitteln auf der Basis von Kunststoffdispersionen, sowie Wasser und kleineren Mengen an Hilfsstoffen (Verdicker, Entschäumer, Netzmittel, Konservierungsstoffe u. a.), welches als gebrauchsfertige Mischung auf den Markt gebracht wird aber auch je nach Anwendung mit Wasser verdünnt werden kann. Universal-Vorstrich VG 2 trocknet physikalisch durch Verdunstung des enthaltenen Wassers.

Als repräsentatives Produkt wurde das Produkt mit den höchsten Umweltwirkungen zur Berechnung der Ökobilanzergebnisse herangezogen.

## Technology and included processes
wässriger Voranstrich zusammengesetzt aus Kunstharzdispersionen, Farbpigmenten und Additiven wie Entschäumer, topfkonserviert; hergestellt im diskontinuierlichen Chargenbetrieb
Technische Daten:
Universal-Vorstrich VG 2 wird durch keine Prüfnorm geregelt.
Deklarierte Einheit:
Die Verbands-EPD bezieht sich auf die deklarierte Einheit von 1 kg Universal-Vorstrich VG 2. Der Verbrauch der Produkte, die flächig aufgebracht werden, kann zwischen 50 und 3.000 g pro m2 liegen. Aus den Produktgruppen wurde das Produkt mit den höchsten Umweltwirkungen deklariert.

## Technical purpose
Universal-Vorstrich VG 2 wird im Innenbereich wie im Außenbereich im Roll- oder Streichverfahren als Haftgrundierung auf den unterschliedlichen Untergründen wie Betonuntergründe, Zement-, Anhydrit- und Magnesitestriche aber auch Gussasphaltestriche oder Holzuntergründe aufgetragen. Je nach Art und Beschaffenheit des Untergrundes kann das Produkt unverdünnt oder bis 1:2 mit Wasser verdünnt verwendet werden.

## Reference product
- 1 kg Universal-Vorstrich VG 2: 1

## Inputs
- Erneuerbare Primärenergie als Energieträger (PERE) [MJ]: A1-A3 2.77
- Erneuerbare Primärenergie zur stofflichen Nutzung (PERM) [MJ]: A1-A3 0
- Total erneuerbare Primärenergie (PERT) [MJ]: A1-A3 2.77, A4 0.02, A5 0.00291, D -0.114
- Nicht-erneuerbare Primärenergie als Energieträger (PENRE) [MJ]: A1-A3 43.8
- Nicht-erneuerbare Primärenergie zur stofflichen Nutzung (PENRM) [MJ]: A1-A3 6.4
- Total nicht erneuerbare Primärenergie (PENRT) [MJ]: A1-A3 50.2, A4 0.338, A5 0.033, D -1.2
- Einsatz von Sekundärstoffen (SM) [kg]: A1-A3 0
- Erneuerbare Sekundärbrennstoffe (RSF) [MJ]: A1-A3 0.00266, A4 2.51e-6, A5 5.11e-7, D -1.73e-5
- Nicht erneuerbare Sekundärbrennstoffe (NRSF) [MJ]: A1-A3 0.027, A4 2.63e-5, A5 5.34e-6, D -0.000182
- Einsatz von Süßwasserressourcen (FW) [m^3]: A1-A3 0.0124, A4 1.93e-5, A5 0.000381, D -0.000178

## Outputs
- Gefährlicher Abfall zur Deponie (HWD) [kg]: A1-A3 0.00834, A4 0, A5 0.000777, D 0
- Entsorgter nicht gefährlicher Abfall (NHWD) [kg]: A1-A3 0.362, A4 6.68e-5, A5 1.53e-5, D -0.00045
- Entsorgter radioaktiver Abfall (RWD) [kg]: A1-A3 0.00148, A4 4.85e-7, A5 1.76e-6, D -6.82e-5
- Komponenten für die Wiederverwendung (CRU) [kg]
- Stoffe zum Recycling (MFR) [kg]
- Stoffe für die Energierückgewinnung (MER) [kg]
- Exportierte elektrische Energie (EEE) [MJ]: A5 0.24
- Exportierte thermische Energie (EET) [MJ]: A5 0.577

## Impact indicators
- Globales Erwärmungspotenzial (GWP) [kg CO_(2)-Äq.]: A1-A3 2.29, A4 0.0246, A5 0.159, D -0.0786
- Abbau Potential der stratosphärischen Ozonschicht (ODP) [kg CFC11-Äq.]: A1-A3 5.72e-10, A4 5.14e-13, A5 1e-12, D -2.38e-11
- Versauerungspotenzial von Boden und Wasser (AP) [kg SO_(2)-Äq.]: A1-A3 0.0241, A4 0.000162, A5 1.68e-5, D -0.000109
- Eutrophierungspotenzial (EP) [kg PO_(4)^(3)-Äq.]: A1-A3 0.000714, A4 4.03e-5, A5 3.44e-6, D -1.22e-5
- Bildungspotential für troposphärisches Ozon (POCP) [kg Ethen-Äq.]: A1-A3 0.0017, A4 -6.81e-5, A5 0.028, D -9.99e-6
- Potenzial für den abiotischen Abbau nicht fossiler Ressourcen (ADPE) [kg Sb-Äq.]: A1-A3 3.09e-6, A4 1.14e-9, A5 2.09e-9, D -8.14e-9
- Potenzial für den abiotischen Abbau fossiler Brennstoffe (ADPF) [MJ]: A1-A3 46.6, A4 0.337, A5 0.0287, D -1.04

## Use advice
Gültigkeitsbereich:
Diese validierte Deklaration berechtigt zum Führen des Zeichens des Instituts Bauen und Umwelt e.V.. Sie gilt ausschließlich für das genannte Produkt Universal-Vorstrich VG 2 für Werke in Deutschland, für fünf Jahre ab Ausstellungsdatum. Diese Umwelt-Produktdeklaration (EPD) beruht auf einer Individualisierung der Muster-Deklaration EPD-DIV-20140090-IBG1-DE der Deutschen Bauchemie e.V., des Industrieverband Klebstoffe e.V. und des Verbandes der deutschen Lack- und Druckfarbenindustrie e.V., bei der für die Berechnung der Ökobilanz das Produkt einer Gruppe ausgewählt wurde, welches die höchsten Umweltlasten dieser Gruppe aufweist.
Systemgrenze:
In der Ökobilanz werden die Module A1/A2/A3, A4, A5 und D berücksichtigt:

A1 Herstellung der Vorprodukte

A2 Transport zum Werk

A3 Produktion inkl. Energiebereitstellung, Herstellung von Verpackung (Kunststoffgebinde) sowie Hilfs- und Betriebsstoffen und Abfallbehandlung

A4 Transport zur Baustelle

A5 Installation (Verpackungsentsorgung sowie Emissionen bei der Installation)

D Gutschriften aus der Verbrennung der Verpackungsmaterialien und Recycling des Metallgebindes

Es handelt sich also um eine Deklaration von der „Wiege bis zum Werkstor mit Optionen“.

## Data sources
- Universal-Vorstrich VG 2.pdf
- GaBi Database (all versions)
- GaBi database SP20 2013
