# Wood Fibre Insulating Boards

Dataset: ILCD process, EPD, average dataset
Geography: DE
Reference year: 2015
Valid until: 2020
Classification: OEKOBAU.DAT: Dämmstoffe / Holzfasern / Holzfaserdämmplatte
Classification: IBUCategories: 02 Bauprodukte / Holzwerkstoffe / Holzwerkstoffe
Method details: Holzwerkstoffe.pdf
Owner: GUTEX Holzfaserplattenwerk H. Henselmann GmbH + Co KG
Compliance: DIN EN 15804; ISO 14025
Review: Accredited third party review by IBU
Amounts: rows without a unit in brackets have none in this file; such an amount is in the reference unit of its flow, which a separate flow dataset defines
copyright: true

## General comment
GUTEX wood fibre insulating boards are board-shaped wood-based materials manufactured from wood fibres in accordance with /DIN EN 13171/. By adding low quantities of PUR resin, insulating boards are manufactured from wood fibres in a dry process. They are then cut online, and profiled and finished where necessary. Water-repellent and non-water-repellent single-layer insulation panels can be manufactured to a thickness of 240 mm.

## Technology and included processes
The manufacturing process is broken down into the following process steps: 1. Delivering the wood chips 2. Defibering the wood chips using the defibrator process 3. Hydrophobing the fibres with paraffin 4. Drying the fibres with PUR resin 5. Glueing the fibres with PUR resin 6. Scattering the fibres on the forming belt to form a mat 7. Curing the mat in the calibration and hardening unit 8. Dividing up, profiling and assembling The location is certified to /DIN EN ISO 9001:2008/.
Technical data:
The following technical (construction) data is of relevance for GUTEX wood fibre insulating boards on delivery.
Declared unit:
The unit taken as a basis for the Declaration is one cubic metre (1 m³) wood fibre insulating board with an average weighted density of 173 kg/m³ by production volume (m³/year).

## Technical purpose
GUTEX insulating materials can be used in both old and new buildings: as a thermal insulation composite system for the entire building facade, wall insulation for back-ventilated facades, on-roof and/or cavity insulation plus false ceilings, insulating ceilings between floors, interior insulation of external walls, insulation of installation levels and impact sound insulation for floors.

## Reference product
- 1 m³ Holzfaserdämmplatte: 1

## Inputs
- Erneuerbare Primärenergie als Energieträger (PERE) [MJ]: A1-A3 383
- Erneuerbare Primärenergie zur stofflichen Nutzung (PERM) [MJ]: A1-A3 2960, C3 -2960
- Total erneuerbare Primärenergie (PERT) [MJ]: A1-A3 3340, D -504
- Nicht-erneuerbare Primärenergie als Energieträger (PENRE) [MJ]: A1-A3 1830
- Nicht-erneuerbare Primärenergie zur stofflichen Nutzung (PENRM) [MJ]: A1-A3 254, C3 -254
- Total nicht erneuerbare Primärenergie (PENRT) [MJ]: A1-A3 2080, D -3210
- Einsatz von Sekundärstoffen (SM) [kg]: A1-A3 0, D 0
- Erneuerbare Sekundärbrennstoffe (RSF) [MJ]: A1-A3 0, D 2960
- Nicht erneuerbare Sekundärbrennstoffe (NRSF) [MJ]: A1-A3 0, D 254
- Einsatz von Süßwasserressourcen (FW) [m^3]: A1-A3 0.505, D -0.253

## Outputs
- Gefährlicher Abfall zur Deponie (HWD) [kg]: A1-A3 0.0361, D -0.722
- Entsorgter nicht gefährlicher Abfall (NHWD) [kg]: A1-A3 0.605, D 0.319
- Entsorgter radioaktiver Abfall (RWD) [kg]: A1-A3 0.0143, D -0.284
- Komponenten für die Wiederverwendung (CRU) [kg]: A1-A3 0
- Stoffe zum Recycling (MFR) [kg]: A1-A3 0
- Stoffe für die Energierückgewinnung (MER) [kg]: C3 173
- Exportierte elektrische Energie (EEE) [MJ]
- Exportierte thermische Energie (EET) [MJ]

## Impact indicators
- Globales Erwärmungspotenzial (GWP) [kg CO_(2)-Äq.]: A1-A3 -164, C3 271.1, D -225.7
- Abbau Potential der stratosphärischen Ozonschicht (ODP) [kg CFC11-Äq.]: A1-A3 8.75e-10, D -1.56e-8
- Versauerungspotenzial von Boden und Wasser (AP) [kg SO_(2)-Äq.]: A1-A3 0.196, D -0.235
- Eutrophierungspotenzial (EP) [kg PO_(4)^(3)-Äq.]: A1-A3 0.0316, D -0.0179
- Bildungspotential für troposphärisches Ozon (POCP) [kg Ethen-Äq.]: A1-A3 0.0281, D -0.00639
- Potenzial für den abiotischen Abbau nicht fossiler Ressourcen (ADPE) [kg Sb-Äq.]: A1-A3 0.000114, D -3.29e-5
- Potenzial für den abiotischen Abbau fossiler Brennstoffe (ADPF) [MJ]: A1-A3 2050, D -2500

## Use advice
Scope:
This Declaration applies for wood fibre insulating board manufactured in a dry process by GUTEX at its location in Waldshut-Tiengen.
This document is translated from the German Environmental Product Declaration into English. It is based on the German original version EPD-GTX-20140222-IBC2-DE. The verifier has no influence on the quality of the translation.
System boundary:
EPD type: cradle to gate – with options

This Environmental Product Declaration refers to the product stage (Modules A1-A3, including provision of raw materials, transport, manufacture and packaging materials). Furthermore, an end-of-life scenario (Module D) was also calculated: incineration in a biomass power plant with energy recovery. The utilisation of packaging materials is not taken into consideration as Module A5 is not declared.

## Data sources
- Holzfaserdämmplatten.pdf
- GaBi Database (all versions)
- GaBi database SP20 2013
