# eLCA Luftschicht

Dataset: ILCD process, EPD
Classification: oekobau.dat: Sonstige / eLCA Intern / eLCA Intern
Owner: Stephan Rössig
Amounts: rows without a unit in brackets have none in this file; such an amount is in the reference unit of its flow, which a separate flow dataset defines

## Reference product
- eLCA Luftschicht: 1

## Inputs
- Einsatz von Süßwasserressourcen (FW) [m3]: C3 0, A1-A3 0, C4 0
- Nicht-erneuerbare Primärenergie als Energieträger (PENRE) [MJ]: C3 0, A1-A3 0, C4 0
- Nicht-erneuerbare Primärenergie zur stofflichen Nutzung (PENRM) [MJ]: C3 0, A1-A3 0, C4 0
- Nicht erneuerbare Sekundärbrennstoffe (NRSF) [MJ]: C3 0, A1-A3 0, C4 0
- Erneuerbare Primärenergie als Energieträger (PERE) [MJ]: C3 0, A1-A3 0, C4 0
- Erneuerbare Primärenergie zur stofflichen Nutzung (PERM) [MJ]: C3 0, A1-A3 0, C4 0
- Erneuerbare Sekundärbrennstoffe (RSF) [MJ]: C3 0, A1-A3 0, C4 0
- Einsatz von Sekundärstoffen (SM) [kg]: C3 0, A1-A3 0, C4 0
- Total nicht erneuerbare Primärenergie (PENRT) [MJ]: C3 0, A1-A3 0, C4 0
- Total erneuerbare Primärenergie (PERT) [MJ]: C3 0, A1-A3 0, C4 0

## Outputs
- Komponenten für die Wiederverwendung (CRU) [kg]: C3 0, A1-A3 0, C4 0
- Exportierte elektrische Energie (EEE) [MJ]: C3 0, A1-A3 0, C4 0
- Exportierte thermische Energie (EET) [MJ]: C3 0, A1-A3 0, C4 0
- Gefährlicher Abfall zur Deponie (HWD) [kg]: C3 0, A1-A3 0, C4 0
- Stoffe für die Energierückgewinnung (MER) [kg]: C3 0, A1-A3 0, C4 0
- Stoffe zum Recycling (MFR) [kg]: C3 0, A1-A3 0, C4 0
- Entsorgter nicht gefährlicher Abfall (NHWD) [kg]: C3 0, A1-A3 0, C4 0
- Entsorgter radioaktiver Abfall (RWD) [kg]: C3 0, A1-A3 0, C4 0

## Impact indicators
- Potenzial für den abiotischen Abbau nicht fossiler Ressourcen (ADPE) [kg Sb-Äqv.]: C3 0, A1-A3 0, C4 0
- Potenzial für den abiotischen Abbau fossiler Brennstoffe (ADPF) [MJ]: C3 0, A1-A3 0, C4 0
- Versauerungspotenzial von Boden und Wasser (AP) [kg SO2-Äqv.]: C3 0, A1-A3 0, C4 0
- Eutrophierungspotenzial (EP) [kg Phosphat-Äqv.]: C3 0, A1-A3 0, C4 0
- Globales Erwärmungspotenzial (GWP) [kg CO2-Äqv.]: C3 0, A1-A3 0, C4 0
- Abbau Potential der stratosphärischen Ozonschicht (ODP) [kg R11-Äqv.]: C3 0, A1-A3 0, C4 0
- Bildungspotential für troposphärisches Ozon (POCP) [kg Ethen-Äqv.]: C3 0, A1-A3 0, C4 0
