# SWISS KRONO OSB

Dataset: ILCD process, EPD, specific dataset
Geography: EU-25
Reference year: 2015
Valid until: 2020
Classification: OEKOBAU.DAT: Holz / Holzwerkstoffe / OSB-Platte
Classification: IBUCategories: 02 Bauprodukte / Holzwerkstoffe / Holzwerkstoffe
Method details: Holzwerkstoffe.pdf
Owner: KRONOTEC AG
Compliance: DIN EN 15804; ISO 14025
Review: Accredited third party review by IBU
Amounts: rows without a unit in brackets have none in this file; such an amount is in the reference unit of its flow, which a separate flow dataset defines
copyright: false

## General comment
OSB panels (Oriented Strand Board – SWISS KRONO OSB) are adhesive-bound, three-ply wooden panels (pressed panels) made from oriented long, slender wood chips (pinewood veneer 120 - 160 mm in length), so-called strands in accordance with /EN13986/ and /EN 300 “OSB”/. “Strands” from a defined thickness and shape primarily comprising roundwoods are glued at several layers. The core layer is oriented at a 90° angle to the surface layers. The OSB panels are glued using PMDI resin and manufactured in thicknesses of 8 to 40 mm.

A flame retardant is used for flame resistant SWISS KRONO OSB/SF-B.

The declared product represents a mass-weighted average of the ranges manufactured. In calculating the average, consideration is taken of the fact that different volumes with different densities are produced in each of the plants.

## Technology and included processes
OSB panels (Oriented Strand Board – SWISS KRONO OSB) are adhesive-bound, three-ply wooden panels (pressed panels) made from oriented long, slender wood chips (pinewood veneer 120 - 160 mm in length), so-called strands in accordance with EN13986 and EN 300. “Strands” from a defined thickness and shape primarily comprising roundwoods are glued at several layers. The core layer is oriented at a 90° angle to the surface layers. The OSB panels are glued using PMDI resin and manufactured in thicknesses of 8 to 40 mm. A flame retardant is used for flame resistant SWISS KRONO OSB flameproof stop fire.
Declared unit:
The Declaration refers to the manufacture of 1 m³ OSB panel weighing 617 kg/m³.

## Technical purpose
SWISS KRONO OSB correspond with utilisation classes 1 and 2 according to EC5 and may therefore be used in moist areas and/or non-weathered outdoor areas. OSB panels can be used for load-bearing and stiffening purposes.

## Reference product
- 1 m³ OSB Platte (617 kg): 1

## Inputs
- Erneuerbare Primärenergie als Energieträger (PERE) [MJ]: A1-A3 899.286, C3 0, D 10400
- Erneuerbare Primärenergie zur stofflichen Nutzung (PERM) [MJ]: A1-A3 11866.7, C3 -11900, D 0
- Total erneuerbare Primärenergie (PERT) [MJ]: A1-A3 12766, C3 -11900, D 10400
- Nicht-erneuerbare Primärenergie als Energieträger (PENRE) [MJ]: A1-A3 4270.32, C3 0, D -10500
- Nicht-erneuerbare Primärenergie zur stofflichen Nutzung (PENRM) [MJ]: A1-A3 537.218, C3 -537, D 0
- Total nicht erneuerbare Primärenergie (PENRT) [MJ]: A1-A3 4807.54, C3 -537, D -10500
- Einsatz von Sekundärstoffen (SM) [kg]: A1-A3 0, C3 0, D 0
- Erneuerbare Sekundärbrennstoffe (RSF) [MJ]: A1-A3 211.653, C3 0, D 11400
- Nicht erneuerbare Sekundärbrennstoffe (NRSF) [MJ]: A1-A3 0, C3 0, D 0
- Einsatz von Süßwasserressourcen (FW) [m^3]: A1-A3 0.720711, C3 0, D -2.16477

## Outputs
- Gefährlicher Abfall zur Deponie (HWD) [kg]: A1-A3 0.00169974, C3 0, D -0.00389204
- Entsorgter nicht gefährlicher Abfall (NHWD) [kg]: A1-A3 3.06443, C3 0, D 1.26622
- Entsorgter radioaktiver Abfall (RWD) [kg]: A1-A3 0.0812574, C3 0, D -1.06505
- Komponenten für die Wiederverwendung (CRU) [kg]: A1-A3 0, C3 0
- Stoffe zum Recycling (MFR) [kg]: A1-A3 0, C3 0
- Stoffe für die Energierückgewinnung (MER) [kg]: C3 605.122
- Exportierte elektrische Energie (EEE) [MJ]: C3 0
- Exportierte thermische Energie (EET) [MJ]: C3 0

## Impact indicators
- Globales Erwärmungspotenzial (GWP) [kg CO_(2)-Äq.]: A1-A3 -760.457, C3 1040, D -649
- Abbau Potential der stratosphärischen Ozonschicht (ODP) [kg CFC11-Äq.]: A1-A3 0.000135803, C3 0, D -2.97194e-7
- Versauerungspotenzial von Boden und Wasser (AP) [kg SO_(2)-Äq.]: A1-A3 1.03862, C3 0, D -0.386339
- Eutrophierungspotenzial (EP) [kg PO_(4)^(3)-Äq.]: A1-A3 0.139179, C3 0, D 0.000288361
- Bildungspotential für troposphärisches Ozon (POCP) [kg Ethen-Äq.]: A1-A3 0.150304, C3 0, D 0.0521005
- Potenzial für den abiotischen Abbau nicht fossiler Ressourcen (ADPE) [kg Sb-Äq.]: A1-A3 0.00012848, C3 0, D -7.81874e-5
- Potenzial für den abiotischen Abbau fossiler Brennstoffe (ADPF) [MJ]: A1-A3 4605.09, C3 0, D -8411.1

## Use advice
Scope:
This document refers to all OSB panels produced in the following SWISS KRONO GROUP plants:
SWISS KRONO GmbH, Heiligengrabe, Germany

SWISS KRONO Sp. z o.o, Zary, Poland.
System boundary:
The Declaration is from the "cradle to plant gate, with options". The Life Cycle Assessment for the products under review comprises the “Product stage” and “Benefits and loads beyond the system boundary” life cycle phases. The systems include the following stages in accordance with /EN 15804/: Product stage (Modules A1-A3):

- A1 Raw material supply, processing and processing stages associated with secondary substances serving as input
- A2 Transport to the manufacturer
- A3 Manufacture
Module C3 indicates the net flow and emissions of biogenic CO2.

Once the product has achieved end-of-waste status as chipped waste wood, it is assumed that the product is directed to biomass incineration which produces thermal energy and electricity. The ensuing effects and credits are declared in Module D.

## Data sources
- SWISS KRONO OSB.pdf
- GaBi Database (all versions)
- GaBi database SP27 2015
