# MDF (raw)

Dataset: ILCD process, EPD, average dataset
Geography: DE
Reference year: 2015
Valid until: 2020
Classification: OEKOBAU.DAT: Holz / Holzwerkstoffe / Spanplatten
Classification: IBUCategories: 02 Bauprodukte / Holzwerkstoffe / Holzwerkstoffe
Method details: Holzwerkstoffe.pdf
Owner: Fritz EGGER GmbH & Co. OG Holzwerkstoffe
Compliance: DIN EN 15804; ISO 14025
Review: Accredited third party review by IBU
Amounts: rows without a unit in brackets have none in this file; such an amount is in the reference unit of its flow, which a separate flow dataset defines
copyright: true

## General comment
Raw MDF boards are panel-shaped materials in accordance with /EN 622-5/ for dry furniture construction and interior design.

## Technology and included processes
1. Peeling logs 2. Chipping the wood to produce chips 3. Cooking the chips 4. Defibration in the refiner 5. Drying the fibres to approximately 2 – 3 % residual moisture 6. Application of resin to the fibres 7. Spreading the glue-coated fibres onto a forming belt 8. Compression of the fibre mat in a continuously operating hot press 9. Cutting and trimming the fibre strand into rawboard formats 10. Cooling the rawboards in star coolers 11. Piling into large stacks 12. Sanding the upper and lower sides after the acclimatisation phase
Technical data:
Technical data for EGGER MDF-ST E1CE
Declared unit:
The declaration relates to the manufacture of one cubic meter of uncoated MDF board. Uncoated MDF boards have an average density of 720 kg/m³.

## Technical purpose
Due to their homogeneous structure, MDF boards can be milled three-dimensionally and then painted or faced with a foil in a membrane press. They are predominantly used coated and as furniture boards. They are used, for example, as deep drawer fronts in the kitchen area.

## Reference product
- 1 m³ MDF Platte unbeschichtet: 1

## Inputs
- Erneuerbare Primärenergie als Energieträger (PERE) [MJ]: A1-A3 6056.18
- Erneuerbare Primärenergie zur stofflichen Nutzung (PERM) [MJ]: A1-A3 11477.4
- Total erneuerbare Primärenergie (PERT) [MJ]: A1-A3 17533.6, D -770.408
- Nicht-erneuerbare Primärenergie als Energieträger (PENRE) [MJ]: A1-A3 5674.94
- Nicht-erneuerbare Primärenergie zur stofflichen Nutzung (PENRM) [MJ]: A1-A3 1855.87
- Total nicht erneuerbare Primärenergie (PENRT) [MJ]: A1-A3 7530.81, D -6488.06
- Einsatz von Sekundärstoffen (SM) [kg]: A1-A3 0, D 0
- Erneuerbare Sekundärbrennstoffe (RSF) [MJ]: A1-A3 6604.5, D 11500
- Nicht erneuerbare Sekundärbrennstoffe (NRSF) [MJ]: A1-A3 0, D 1860
- Einsatz von Süßwasserressourcen (FW) [m^3]: A1-A3 1.65553, D -1.48031

## Outputs
- Gefährlicher Abfall zur Deponie (HWD) [kg]: A1-A3 0.205969, D -0.583562
- Entsorgter nicht gefährlicher Abfall (NHWD) [kg]: A1-A3 7.34824, D 4.43357
- Entsorgter radioaktiver Abfall (RWD) [kg]: A1-A3 0.144977, D -0.607377
- Komponenten für die Wiederverwendung (CRU) [kg]: A1-A3 0
- Stoffe zum Recycling (MFR) [kg]: A1-A3 0
- Stoffe für die Energierückgewinnung (MER) [kg]: C3 342.453
- Exportierte elektrische Energie (EEE) [MJ]
- Exportierte thermische Energie (EET) [MJ]

## Impact indicators
- Globales Erwärmungspotenzial (GWP) [kg CO_(2)-Äq.]: A1-A3 -668.631, C3 633.538, D -357
- Abbau Potential der stratosphärischen Ozonschicht (ODP) [kg CFC11-Äq.]: A1-A3 3.58046e-8, D -1.62253e-7
- Versauerungspotenzial von Boden und Wasser (AP) [kg SO_(2)-Äq.]: A1-A3 1.2764, D -0.210438
- Eutrophierungspotenzial (EP) [kg PO_(4)^(3)-Äq.]: A1-A3 0.484365, D 0.00822176
- Bildungspotential für troposphärisches Ozon (POCP) [kg Ethen-Äq.]: A1-A3 0.378049, D 0.0375392
- Potenzial für den abiotischen Abbau nicht fossiler Ressourcen (ADPE) [kg Sb-Äq.]: A1-A3 0.000212202, D -3.70666e-5
- Potenzial für den abiotischen Abbau fossiler Brennstoffe (ADPF) [MJ]: A1-A3 7174.43, D -4962.97

## Use advice
Scope:
This document relates to uncoated medium density EGGER MDF fibreboards (average), which are produced in the group's following plant:

Egger Holzwerkstoffe Wismar GmbH & Co. KG, Am Haffeld 1, 23970 Wismar, Germany

The production conditions in Wismar are representative for the other plants. They correspond to the technologies and standards used in all locations. This document is translated from the German Environmental Product Declaration into English. It is based on the German original version EPD-EGG-20150046-IBA1-DE. The verifier has no influence on the quality of the translation.
System boundary:
This is a "from cradle to gate, with options" EPD. The life cycle analysis for the products under consideration encompasses the following segments of the life cycle: “Product stage” and “Credits and charges beyond the limits of the product system”. The systems therefore encompass the following stages according to /EN 15804/: Product stage (module A1-A3):

A1 Procurement and processing of raw materials as well as processing of secondary raw materials serving as inputs
A2 Transportation to the manufacturer
A3 Production

Credits and debits beyond the limits of the product system (module D):

D Reuse, recovery or recycling potential

## Data sources
- MDF (Roh).pdf
- GaBi Database (all versions)
- GaBi database SP26 2014
