# pladur®

Dataset: ILCD process, EPD, specific dataset
Geography: DE
Reference year: 2015
Valid until: 2020
Classification: OEKOBAU.DAT: Metalle / Stahl und Eisen / Stahlbleche
Classification: IBUCategories: 02 Bauprodukte / Metallbauprodukte und Zubehör / Dünnwandige Profile und Profiltafeln aus Metall
Method details: Dünnwandige Profile und Profiltafeln aus Metall.pdf
Owner: ThyssenKrupp
Compliance: DIN EN 15804; ISO 14025
Review: Accredited third party review by IBU
Amounts: rows without a unit in brackets have none in this file; such an amount is in the reference unit of its flow, which a separate flow dataset defines
copyright: true

## General comment
Hot-dip coated sheet in accordance with DIN EN 10346 and SEW 022 with optimum mechanical and physical properties for structural steel qualities with common hot-dip coverings of:

Zinc (Z), zinc magnesium (ZM) and galfan® (ZA).

Additional possible hot-dip coatings: Zinc-iron (ZF), galvalume® (AZ) and aluminum-silicon (AS).

In addition, provided with an organic coating in accordance with DIN 55634 and DIN EN 10169.

The organic coated coils and sheets are sold under the brand name pladur®.

## Technology and included processes
This EPD relates to the production process and the process for continuous metal plates and strips which are coated with an organic coating.
Technical data:
Technological values: acc. to DIN EN 10346: 2009, see table.
Declared unit:
The declaration relates to 1 m² organic coated steel sheet (reference thickness 0.78 mm). The declared unit relates to "product at the plant gate". Installation material and losses in the installation phase are not considered. The table below shows the configuration for 1 m² steel sheet.

For pladur® products in thicknesses other than the reference thickness, it is necessary to carry out the linear conversion of the life cycle assessment results by kg.

## Technical purpose
The organic coated coils and sheets are used in numerous construction applications and other applications:

Roof coverings (trapezoidal sheets, roof tiles)

Facade covering (trapezoidal sheets, sandwich elements, liner trays)

Interior coverings (trapezoidal sheets, sandwich elements, linert trays

Facade sheets (covers, constructional sheets, wall closures, roof flashings)

Roof drainage systems (roof gutters, downpipes, eaves flashings and accessories)

Automotive (vehicle construction, trailers, refrigerated bodies)

Garage industry

White goods (domestic appliances)

Brown goods (domestic appliances, housings for entertainment electronics)

## Reference product
- 1 m² pladur®: 1

## Inputs
- Erneuerbare Primärenergie als Energieträger (PERE) [MJ]: A1-A3 6.5114
- Erneuerbare Primärenergie zur stofflichen Nutzung (PERM) [MJ]: A1-A3 0
- Total erneuerbare Primärenergie (PERT) [MJ]: A1-A3 6.5114, C2 0.028025, C4 0.0093521, D 1.7552
- Nicht-erneuerbare Primärenergie als Energieträger (PENRE) [MJ]: A1-A3 219.22
- Nicht-erneuerbare Primärenergie zur stofflichen Nutzung (PENRM) [MJ]: A1-A3 0
- Total nicht erneuerbare Primärenergie (PENRT) [MJ]: A1-A3 219.22, C2 0.7135, C4 0.11338, D -81.912
- Einsatz von Sekundärstoffen (SM) [kg]: A1-A3 0.71914, C2 0, C4 0, D 0
- Erneuerbare Sekundärbrennstoffe (RSF) [MJ]: A1-A3 0, C2 0, C4 0, D 0
- Nicht erneuerbare Sekundärbrennstoffe (NRSF) [MJ]: A1-A3 0, C2 0, C4 0, D 0
- Einsatz von Süßwasserressourcen (FW) [m^3]: A1-A3 0.025451, C2 1.9776e-5, C4 -0.00034228, D -0.0048705

## Outputs
- Gefährlicher Abfall zur Deponie (HWD) [kg]: A1-A3 0.0038832, C2 1.6254e-6, C4 5.1378e-6, D 0.0064635
- Entsorgter nicht gefährlicher Abfall (NHWD) [kg]: A1-A3 0.095502, C2 8.9727e-5, C4 0.60923, D -0.13453
- Entsorgter radioaktiver Abfall (RWD) [kg]: A1-A3 0.0019217, C2 9.3419e-7, C4 1.9751e-6, D 0.0022265
- Komponenten für die Wiederverwendung (CRU) [kg]: A1-A3 0, C2 0, C4 0
- Stoffe zum Recycling (MFR) [kg]: A1-A3 0, C2 0, C4 0
- Stoffe für die Energierückgewinnung (MER) [kg]: A1-A3 0, C2 0, C4 0
- Exportierte elektrische Energie (EEE) [MJ]: A1-A3 0, C2 0, C4 0
- Exportierte thermische Energie (EET) [MJ]: A1-A3 0, C2 0, C4 0

## Impact indicators
- Globales Erwärmungspotenzial (GWP) [kg CO_(2)-Äq.]: A1-A3 15.592, C2 0.0048692, C4 0.008246, D -9.4048
- Abbau Potential der stratosphärischen Ozonschicht (ODP) [kg CFC11-Äq.]: A1-A3 4.5763e-11, C2 2.4678e-13, C4 1.0341e-13, D 6.7339e-11
- Versauerungspotenzial von Boden und Wasser (AP) [kg SO_(2)-Äq.]: A1-A3 0.044998, C2 5.4676e-5, C4 5.2389e-5, D -0.035973
- Eutrophierungspotenzial (EP) [kg PO_(4)^(3)-Äq.]: A1-A3 0.0048758, C2 6.305e-6, C4 7.1888e-6, D -0.0029928
- Bildungspotential für troposphärisches Ozon (POCP) [kg Ethen-Äq.]: A1-A3 0.0070445, C2 6.7903e-6, C4 4.9964e-6, D -0.0054019
- Potenzial für den abiotischen Abbau nicht fossiler Ressourcen (ADPE) [kg Sb-Äq.]: A1-A3 0.00046413, C2 1.9426e-9, C4 3.1032e-9, D -1.8595e-7
- Potenzial für den abiotischen Abbau fossiler Brennstoffe (ADPF) [MJ]: A1-A3 214.39, C2 0.71116, C4 0.1084, D -87.529

## Use advice
Scope:
This environmental product declaration relates to hot-dip coated sheets and coils from the production facilities of thyssenkrupp Steel Europe AG in Duisburg, Kreuztal-Eichen and Kreuztal-Ferndorf. The holder of the declaration is liable for the underlying assumptions and validations; Liability of the IBU in relation to the manufacturer's information, life cycle assessment data and validations is excluded. This document is translated from the German Environmental Product Declaration into English. It is based on the German original version EPD-TKS-20140214-IBD1-DE. The verifier has no influence on the quality of the translation.
System boundary:
Type of EPD: Cradle to plant gate – with options.

The calculated life cycle assessment addresses the life cycle stage of the product manufacture as well as a recycling scenario. Product manufacturing comprises modules A1 (raw material provision and primary project manufacture), A2 (transport) and A3 (manufacture). The application scenario comprises modules C2 (transport to disposal/recycling) and C4 (disposal). In module D, credits and debits are represented outside the system limits in accordance with /EN 15804/.

## Data sources
- pladur®.pdf
- GaBi Database (all versions)
- GaBi database SP25 2014
