# Chipboard (average); 700 kg/m3

Dataset: ILCD process, EPD, generic dataset
Geography: DE
Reference year: 2018
Valid until: 2022
Classification: oekobau.dat: Holz / Holzwerkstoffe / Spanplatten
Owner: thinkstep
Compliance: DIN EN 15804
Review: Dependent internal review by thinkstep, IABP-GaBi, IBP-GaBi; Independent external review by GaBi user forum, GaBi bug forum, GaBi user community
Amounts: rows without a unit in brackets have none in this file; such an amount is in the reference unit of its flow, which a separate flow dataset defines
copyright: true

## General comment
This data set has been modeled according to the European Standard EN 15804 for Sustainable Building. Results are depicted in modules that allow the structured expression of results over the entire life cycle.

## Geography
The data set represents the country specific situation in Germany, focusing on the main technologies, the region specific characteristics and / or import statistics.

## Time period
Annual average

## Technology and included processes
Wood of different sortings (mainly wood scraps) is cut mechanically. The following drying of the wood shavings is carried out with the help of a drying cylinder. When they have reached their working moisture, they are sticked together. In a hollow the different wood chips sortings are piled up in boards. Due to the compression under the influence of heat and pressure the primary boards are produced. The boards are processed application-specifically with cutter and sawing machine. The primary processing of the plates is finished with a smoothing. The boards can be further processed depending on their purpose. They are stacked and sealed with PE foil. Production residues (e.g. from smoothing and cutting) are reentered into the production production (e.g. for heat production)

## Technical purpose
This product can be used in construction.

## Safety margin
20 %. Product system depicted except for a few missing processes / flows. Technological, temporal and geographic representativeness partly given.

## Reference product
- Particle board P5 (8.5% moisture): 1

## Inputs
- Use of renewable primary energy (PERE) [MJ]: A1-A3 5520.74, C1 0, C2 1.52544, C3 13243.3, D -1684.16
- Primary energy resources used as raw materials (PERM) [MJ]: A1-A3 13234.1, C1 0, C2 0, C3 -13234.1, D 0
- Total use of renewable primary energy resources (PERT) [MJ]: A1-A3 18754.8, C1 0, C2 1.52544, C3 9.23214, D -1684.16
- Use of non-renewable primary energy (PENRE) [MJ]: A1-A3 4827.19, C1 0, C2 26.2031, C3 16.0518, D -5619.22
- Non-renewable primary energy resources used as raw materials (PENRM) [MJ]: A1-A3 0, C1 0, C2 0, C3 0, D 0
- Total use of non-renewable primary energy resources (PENRT) [MJ]: A1-A3 4827.19, C1 0, C2 26.2031, C3 16.0518, D -5619.22
- Input of secondary material (SM) [kg]: A1-A3 0, C1 0, C2 0, C3 0, D 0
- Use of renewable secondary fuels (RSF) [MJ]: A1-A3 0, C1 0, C2 0, C3 0, D 0
- Use of non renewable secondary fuels (NRSF) [MJ]: A1-A3 0, C1 0, C2 0, C3 0, D 0
- Use of net fresh water (FW) [m3]: A1-A3 2.82005, C1 0, C2 0.00136616, C3 0.00499804, D 2.50938

## Outputs
- Hazardous waste disposed (HWD) [kg]: A1-A3 1.84728e-5, C1 0, C2 9.79183e-7, C3 1.0795e-8, D -2.89693e-6
- Non-hazardous waste disposed (NHWD) [kg]: A1-A3 6.97949, C1 0, C2 0.0045991, C3 0.012354, D 7.01273
- Radioactive waste disposed (RWD) [kg]: A1-A3 0.0731339, C1 0, C2 2.75865e-5, C3 0.00134175, D -0.201546
- Components for re-use (CRU) [kg]: A1-A3 0, C1 0, C2 0, C3 0, D 0
- Materials for Recycling (MFR) [kg]: A1-A3 0, C1 0, C2 0, C3 0, D 0
- Material for Energy Recovery (MER) [kg]: A1-A3 0, C1 840, C2 0, C3 0, D 0
- Exported electrical energy (EEE) [MJ]: A1-A3 0.624994, C1 0, C2 0, C3 0, D 1410.04
- Exported thermal energy (EET) [MJ]: A1-A3 1.43494, C1 0, C2 0, C3 0, D 3154.54

## Impact indicators
- Global warming potential (GWP) [kg CO2 eq.]: A1-A3 -873.594, C1 0, C2 1.94954, C3 1268.47, D -2.93429
- Ozone Depletion Potential (ODP) [kg R11 eq.]: A1-A3 4.50705e-11, C1 0, C2 6.45307e-16, C3 5.26892e-14, D -9.30294e-12
- Acidification potential (AP) [kg SO2 eq.]: A1-A3 0.723474, C1 0, C2 0.00393787, C3 0.00150815, D 0.176811
- Eutrophication potential (EP) [kg Phosphate eq.]: A1-A3 0.234774, C1 0, C2 0.00093614, C3 0.000297874, D 0.0667507
- Photochemical Ozone Creation Potential (POCP) [kg Ethene eq.]: A1-A3 0.109813, C1 0, C2 -0.00117978, C3 0.000124184, D -0.00366537
- Abiotic depletion potential for non fossil resources (ADPE) [kg Sb eq.]: A1-A3 0, C1 0, C2 1.64056e-7, C3 4.92695e-7, D -9.92091e-5
- Abiotic depletion potential for fossil resources (ADPF) [MJ]: A1-A3 4642.04, C1 0, C2 26.1326, C3 12.6651, D -5110.42

## Use advice
The data set represents a cradle to gate inventory. It can be used to characterise the supply chain situation of the respective commodity in a representative manner. Combination with individual unit processes using this commodity enables the generation of user-specific (product) LCAs.

## Data sources
- IBU-Deklaration Egger: Egger EUROSPAN (EPD-EHW-2008511-D), 2009
- IBU-Deklaration Pfleiderer: Living Board Spanplatte (EPD-PFL-2009111-D), 2009
- GaBi Database Edition 2020, SP40
- GaBi database (all versions)
