# TECU Gold

Dataset: ILCD process, EPD, specific dataset
Geography: DE
Reference year: 2019
Valid until: 2024
Classification: OEKOBAU.DAT: Metalle / Kupfer / Kupferbleche
Classification: IBUCategories: 02 Bauprodukte / Metallbauprodukte und Zubehör / Baumetalle
Method details: Baumetalle.pdf
Registration number: 10475
Owner: KME Germany GmbH & Co. KG
Compliance: DIN EN 15804; ISO 14025
Review: Accredited third party review by Institut Bauen und Umwelt e. V.
Amounts: rows without a unit in brackets have none in this file; such an amount is in the reference unit of its flow, which a separate flow dataset defines
copyright: true

## General comment
Die Kupferlegierung TECU® Gold besteht aus Cu-DHP, Aluminium, Zink und Zinn. Sie wird nach /EN 1172/ gefertigt und trägt die Werkstoffbezeichnung CuAl5Zn5Sn1 CW309G.

Die ursprünglich glänzende goldene Oberfläche entwickelt sich durch Bewitterung zu einer matten goldbraunen Oberfläche weiter.

## Technology and included processes
TECU® Gold Kupferlegierungen werden in 9 Prozessschritten anwendungsfertig produziert: Abgießen TECU® Gold wird auf speziellen Legierungslinien zu Brammen, das sind stranggegossene Blöcke, abgegossen. Anwärmen Die Brammen werden in einem Ofen auf eine Warmwalztemperatur von ca. 900 °C gebracht. Warmwalzen Auf einem Walzgerüst mit Ober- und Unterwalze (Revesier-Duo) werden die Brammen in mehreren Stichen, d.h. Verringern der Dicke durch jeweils verringerten Abstand der Walzen, heruntergewalzt und am Schluss zu einem Band aufgewickelt. Fräsen Durch die hohe Temperatur beim Anwärmen und Warmwalzen entsteht auf der Oberfläche durch Wärmeoxidation eine Zunderschicht, die vor den weiteren Arbeitsschritten durch einen Fräsvorgang entfernt wird. Dabei werden auf jeder Seite einige Zehntelmillimeter des Materials abgenommen. Kalt vorwalzen Auf einem Reversier-Quarto (Vierwalzengerüst) werden die TECU® Gold Bänder anschließend kalt in weiteren Stichen heruntergewalzt, dabei verfestigen sie sich durch die Umformung. Zwischenglühen Zur Weiterbearbeitung wird deshalb eine Wärmebehandlung durch Zwischenglühen durchgeführt, die eine gezielte Entfestigung der Kupferlegierung bewirkt. Dieser Vorgang erfolgt in einer Schutzgasatmosphäre, um eine erneute Wärmeoxidation der Oberfläche auszuschließen. Fertigwalzen Die Enddicke von TECU® Gold wird in der Festigkeits- oder Zustandswalzung erreicht. Streckrichten Auf einer Streckricht-Anlage werden die Toleranzen bzgl. Geradheit und Planheit weiter eingeengt. Verpackung In Querrichtung kann durch Tafelscheren eine Teilung der großen Bänder/Coils in z.B. Kleincoils oder Tafeln erfolgen. Anschließend werden die TECU® Gold-Erzeugnisse verpackt.
Technische Daten:
Es gelten die Leistungswerte des Produkts entsprechend der Leistungserklärung in Bezug auf dessen Wesentliche Merkmale gemäß /DIN EN 14783:2013/ sowie die folgenden technischen Daten und Prüfnormen für die TECU® Gold:

/ISO 6507-1/, /ISO 6507-2/, /ISO 6892-1/, /ISO 1811-2/, /ISO 4739/.
Deklarierte Einheit:
Die Deklaration bezieht sich auf TECU® Gold Kupferlegierungen.

Die deklarierte Einheit ist 1 kg Kupferblech legiert (TECU® Gold).

## Technical purpose
TECU® Gold Kupferlegierungen in Tafeln und Bändern werden für die Fassadengestaltung und Dachdeckung verwendet. Systeme zur Dachentwässerung (Dachrinnen, Fallrohre und Zubehör) sind möglich.

## Reference product
- TECU Gold Kupferlegierung: 1

## Inputs
- Erneuerbare Primärenergie als Energieträger (PERE) [MJ]: A1-A3 7.1473, C2 0.00666, C3 0, D 0.064
- Erneuerbare Primärenergie zur stofflichen Nutzung (PERM) [MJ]: A1-A3 0, C2 0, C3 0, D 0
- Total erneuerbare Primärenergie (PERT) [MJ]: A1-A3 7.1473, C2 0.00666, C3 0, D 0.064
- Nicht-erneuerbare Primärenergie als Energieträger (PENRE) [MJ]: A1-A3 21.561, C2 0.0988, C3 0, D 0.386
- Nicht-erneuerbare Primärenergie zur stofflichen Nutzung (PENRM) [MJ]: A1-A3 0, C2 0, C3 0, D 0
- Total nicht erneuerbare Primärenergie (PENRT) [MJ]: A1-A3 21.561, C2 0.0988, C3 0, D 0.386
- Einsatz von Sekundärstoffen (SM) [kg]: A1-A3 1.02, C2 0, C3 0, D 0
- Erneuerbare Sekundärbrennstoffe (RSF) [MJ]: A1-A3 0, C2 0, C3 0, D 0
- Nicht erneuerbare Sekundärbrennstoffe (NRSF) [MJ]: A1-A3 0, C2 0, C3 0, D 0
- Einsatz von Süßwasserressourcen (FW) [m^3]: A1-A3 0.0099201, C2 7.72e-6, C3 0, D 0.000542

## Outputs
- Gefährlicher Abfall zur Deponie (HWD) [kg]: A1-A3 3.08882e-8, C2 0, C3 0, D 2.48286e-9
- Entsorgter nicht gefährlicher Abfall (NHWD) [kg]: A1-A3 5.50111, C2 0.000532769, C3 0, D 2.78569
- Entsorgter radioaktiver Abfall (RWD) [kg]: A1-A3 0.00173268, C2 1.19334e-7, C3 0, D 5.99465e-6
- Komponenten für die Wiederverwendung (CRU) [kg]: A1-A3 0, C2 0, C3 0, D 0
- Stoffe zum Recycling (MFR) [kg]: A1-A3 0, C2 0, C3 -0.008985, D 0
- Stoffe für die Energierückgewinnung (MER) [kg]: A1-A3 0, C2 0, C3 0, D 0
- Exportierte elektrische Energie (EEE) [MJ]: A1-A3 0, C2 0, C3 0, D 0
- Exportierte thermische Energie (EET) [MJ]: A1-A3 0, C2 0, C3 0, D 0

## Impact indicators
- Globales Erwärmungspotenzial (GWP) [kg CO_(2)-Äq.]: A1-A3 1.5233, C2 0.00731, C3 0, D 0.0331
- Abbau Potential der stratosphärischen Ozonschicht (ODP) [kg CFC11-Äq.]: A1-A3 2.2844e-12, C2 1.55e-16, C3 0, D 7.65e-15
- Versauerungspotenzial von Boden und Wasser (AP) [kg SO_(2)-Äq.]: A1-A3 0.0037497, C2 2.8e-5, C3 0, D 0.000232
- Eutrophierungspotenzial (EP) [kg PO_(4)^(3)-Äq.]: A1-A3 0.0003831, C2 7.1e-6, C3 0, D 1.39e-5
- Bildungspotential für troposphärisches Ozon (POCP) [kg Ethen-Äq.]: A1-A3 0.0002017, C2 -1.05e-5, C3 0, D 1.27e-5
- Potenzial für den abiotischen Abbau nicht fossiler Ressourcen (ADPE) [kg Sb-Äq.]: A1-A3 0.000255412, C2 7.63e-10, C3 0, D 3.67e-5
- Potenzial für den abiotischen Abbau fossiler Brennstoffe (ADPF) [MJ]: A1-A3 17.22, C2 0.0985, C3 0, D 0.371

## Use advice
Gültigkeitsbereich:
Dieses Dokument bezieht sich auf TECU® Gold der Firma KME Germany GmbH & Co. KG, hergestellt in Osnabrück, Deutschland. Die deklarierte Einheit bezieht sich auf 1 kg Kupferblech, legiert. Die Datenerhebung für die Herstellung des deklarierten Produktes erfolgte werksspezifisch mit aktuellen Jahresdaten von 2017. Der Deklarationsinhaber ist verantwortlich für die zugrunde liegenden Daten und deren Verifizierung.
Systemgrenze:
Die Ökobilanz betrachtet die Systemgrenzen "Wiege bis Werkstor - mit Optionen" und folgt dem modularen Aufbau nach /EN 15804/. Die Ökobilanz berücksichtigt folgende Module:

A1-A3: Rohstoffversorgung, Transport, Herstellung
C2: Transport
C3: Abfallbehandlung
D: Wiederverwendungs-, Rückgewinnungs- oder Recyclingpotenzial

## Data sources
- TECU Gold.pdf
- GaBi Database (all versions)
- GaBi database SP36 2018
