# Brillux Sensocryl ELF 268

Dataset: ILCD process, EPD, specific dataset
Geography: DE
Reference year: 2015
Valid until: 2020
Classification: OEKOBAU.DAT: Beschichtungen / Innenbeschichtungen / Innenfarben
Classification: IBUCategories: 02 Bauprodukte / Bauklebstoffe und Beschichtungen / Beschichtungen mit organischen Bindemitteln
Method details: Beschichtungen mit organischen Bindemitteln.pdf
Owner: Brillux GmbH & Co. KG
Compliance: DIN EN 15804; ISO 14025
Review: Accredited third party review by IBU
Amounts: rows without a unit in brackets have none in this file; such an amount is in the reference unit of its flow, which a separate flow dataset defines
copyright: true

## General comment
Brillux Sensocryl ELF 268 ist eine seidenglänzende, emissionsarme, lösemittel- und weichmacherfreie Reinacrylat-Innendispersionsfarbe. Sie ist geruchsneutral, gut deckend und diffusionsfähig. Das WKI Fraunhofer-Institut hat die Desinfektionsmittel- beständigkeit in Anlehnung der /DIN EN ISO 2812-1/ attestiert. Die Reinigungsfähigkeit ist nach /KIMW 004/ vom Kunststoff Institut Lüdenscheid auf verschiedenen Untergründen geprüft. Ausgezeichnet vom /TÜV Süd/ mit dem TÜV Gütezeichen >> Emissionsarm, Schadstoffgeprüft und Produktion überwacht <<.

Es handelt sich um ein werkseitig hergestelltes flüssiges Gemisch mit organischen Bindemitteln, mineralischen Füllstoffen, Pigmenten, Wasser und Zusatzstoffen. Die Verfestigung erfolgt durch Trocknung und Verfilmung des Polymerbindemittels.

## Technology and included processes
Brillux Sensocryl ELF 268 ist eine seidenglänzende, emissionsarme, lösemittel- und weichmacherfreie Reinacrylat-Innendispersionsfarbe. Sie ist geruchsneutral, gut deckend und diffusionsfähig. Das WKI Fraunhofer-Institut hat die Desinfektionsmittelbeständigkeit in Anlehnung der /DIN EN ISO 2812-1/ attestiert. Die Reinigungsfähigkeit ist nach /KIMW 004/ vom Kunststoff Institut Lüdenscheid auf verschiedenen Untergründen geprüft. Ausgezeichnet vom /TÜV Süd/ mit dem TÜV Gütezeichen >> Emissionsarm, Schadstoffgeprüft und Produktion überwacht <<. Es handelt sich um ein werkseitig hergestelltes flüssiges Gemisch mit organischen Bindemitteln, mineralischen Füllstoffen, Pigmenten, Wasser und Zusatzstoffen. Die Verfestigung erfolgt durch Trocknung und Verfilmung des Polymerbindemittels.
Deklarierte Einheit:
Die Deklaration bezieht sich auf 1 kg Brillux Sensocryl ELF 268. Da Farben nach Volumen (Liter) verkauft werden, ist nachfolgend der Verbrauch volumenbezogen angegeben.

## Technical purpose
Für gut verlaufende, hochstrapazierfähige Decken- und Wandanstriche im Innenbereich, wie z. B. CreaGlas Gewebe, Brillux Relief 3490, CreaGlas Glasvlies, Brillux Rapidvlies 1525, Raufaser, Schaumvinyl- und Prägetapeten, Innenputz, Beton und Gipskarton. Geeignet für Krankenhäuser, Schulen, Kindergärten, Hotels, Kantinen, Büro- und Wohnräume. Der Verbrauch beträgt ca. 0,130 - 0,150 l/m².

## Reference product
- 1 kg Brillux Sensocryl ELF 268: 1

## Inputs
- Erneuerbare Primärenergie als Energieträger (PERE) [MJ]: A1-A3 2.18
- Erneuerbare Primärenergie zur stofflichen Nutzung (PERM) [MJ]: A1-A3 0
- Total erneuerbare Primärenergie (PERT) [MJ]: A1-A3 2.18
- Nicht-erneuerbare Primärenergie als Energieträger (PENRE) [MJ]: A1-A3 35.56
- Nicht-erneuerbare Primärenergie zur stofflichen Nutzung (PENRM) [MJ]: A1-A3 6.24
- Total nicht erneuerbare Primärenergie (PENRT) [MJ]: A1-A3 41.8
- Einsatz von Sekundärstoffen (SM) [kg]: A1-A3 0
- Erneuerbare Sekundärbrennstoffe (RSF) [MJ]: A1-A3 0
- Nicht erneuerbare Sekundärbrennstoffe (NRSF) [MJ]: A1-A3 0
- Einsatz von Süßwasserressourcen (FW) [m^3]: A1-A3 0.0129

## Outputs
- Gefährlicher Abfall zur Deponie (HWD) [kg]: A1-A3 0.00637
- Entsorgter nicht gefährlicher Abfall (NHWD) [kg]: A1-A3 0.0536
- Entsorgter radioaktiver Abfall (RWD) [kg]: A1-A3 0.00128
- Komponenten für die Wiederverwendung (CRU) [kg]
- Stoffe zum Recycling (MFR) [kg]
- Stoffe für die Energierückgewinnung (MER) [kg]
- Exportierte elektrische Energie (EEE) [MJ]
- Exportierte thermische Energie (EET) [MJ]

## Impact indicators
- Globales Erwärmungspotenzial (GWP) [kg CO_(2)-Äq.]: A1-A3 2.19
- Abbau Potential der stratosphärischen Ozonschicht (ODP) [kg CFC11-Äq.]: A1-A3 4.85e-10
- Versauerungspotenzial von Boden und Wasser (AP) [kg SO_(2)-Äq.]: A1-A3 0.0447
- Eutrophierungspotenzial (EP) [kg PO_(4)^(3)-Äq.]: A1-A3 0.000669
- Bildungspotential für troposphärisches Ozon (POCP) [kg Ethen-Äq.]: A1-A3 0.00191
- Potenzial für den abiotischen Abbau nicht fossiler Ressourcen (ADPE) [kg Sb-Äq.]: A1-A3 3.79e-6
- Potenzial für den abiotischen Abbau fossiler Brennstoffe (ADPF) [MJ]: A1-A3 38.7

## Use advice
Gültigkeitsbereich:
In dieser Produktdeklaration wird die Innendispersionsfarbe Brillux Sensocryl ELF 268 betrachtet, die am Standort Münster/Westfalen hergestellt wird.
Systemgrenze:
Diese Ökobilanz adressiert das Lebenszyklusstadium der Produktherstellung (Wiege bis Werktor). Das Produktstadium umfasst die Module A1 (Rohstoffbereitstellung), A2 (Transport), A3 (Herstellung) gemäß der /DIN EN 15804/.

## Data sources
- Brillux Sensocryl ELF 268.pdf
- GaBi Database (all versions)
- GaBi database SP28 2015
