# PCI Lastogum

Dataset: ILCD process, EPD, average dataset
Geography: DE
Reference year: 2015
Valid until: 2020
Classification: OEKOBAU.DAT: Beschichtungen / Grundierungen / Grundierungen Farben und Putze
Classification: IBUCategories: 02 Bauprodukte / Bauklebstoffe und Beschichtungen / Beschichtungen mit organischen Bindemitteln
Method details: Beschichtungen mit organischen Bindemitteln.pdf
Owner: PCI Augsburg GmbH
Compliance: DIN EN 15804; ISO 14025
Review: Accredited third party review by IBU
Amounts: rows without a unit in brackets have none in this file; such an amount is in the reference unit of its flow, which a separate flow dataset defines
copyright: false

## General comment
PCI Lastogum besteht aus organischen Bindemitteln auf der Basis von Kunststoffdispersionen, mineralischen Füllstoffen, wie z. B. Kreide sowie Wasser und kleineren Mengen an Hilfsstoffen (Verdicker, Entschäumer, Netzmittel, Konservierungsstoffe u. a.) welches als gebrauchsfertige Mischung in den Verkehr gebracht wird. Mit diesem Produkt werden Flächenabdichtungen unter Fliesen bei nicht drückendem Wasser hergestellt. PCI Lastogum trocknet physikalisch durch Verdunstung des enthaltenen Wassers.

Als repräsentatives Produkt wurde das Produkt mit den höchsten Umweltwirkungen zur Berechnung der Ökobilanzergebnisse herangezogen.

## Technology and included processes
wässrige Flächenabdichtung zusammengesetzt aus Kunstharzdispersionen, Füllstoffen wie Quarzsand und Kalksteinmehl, Farbpigmenten und Additiven wie Entschäumer, topfkonserviert; hergestellt im diskontinuierlichen Chargenbetrieb
Technische Daten:
Die Flächenabdichtung PCI Lastogum erfüllt die Anforderungen der /PG-AIV-F:2010/ Beanspruchungsklasse A.
Deklarierte Einheit:
Die Verbands-EPD bezieht sich auf die deklarierte Einheit von 1 kg dispersionsbasiertes Produkt. Der Verbrauch der Produkte, die flächig aufgebracht werden, kann zwischen 1.100 – 1.200 g/m² liegen. Aus den Produktgruppen wurde das Produkt mit den höchsten Umweltwirkungen deklariert.

## Technical purpose
PCI Lastogum wird im Innenbereich im Roll-, Streich- oder Spachtelverfahren als Flächenabdichtung auf saugfähigen, feuchtigkeitsempfindlichen wie auch - unempflindlichen Untergründen unter keramischen Belägen eingesetzt. Dabei schützt es feuchtigkeitsempfindliche Untergründe wie Gipskartonplatten oder Holzspanplatten vor der Einwirkung von nicht drückendem Wasser.

## Reference product
- 1 kg PCI Lastogum: 1

## Inputs
- Erneuerbare Primärenergie als Energieträger (PERE) [MJ]: A1-A3 1.48
- Erneuerbare Primärenergie zur stofflichen Nutzung (PERM) [MJ]: A1-A3 0
- Total erneuerbare Primärenergie (PERT) [MJ]: A1-A3 1.48, A4 0.02, A5 0.00291, D -0.114
- Nicht-erneuerbare Primärenergie als Energieträger (PENRE) [MJ]: A1-A3 14.3
- Nicht-erneuerbare Primärenergie zur stofflichen Nutzung (PENRM) [MJ]: A1-A3 12.4
- Total nicht erneuerbare Primärenergie (PENRT) [MJ]: A1-A3 26.7, A4 0.338, A5 0.033, D -1.2
- Einsatz von Sekundärstoffen (SM) [kg]: A1-A3 0
- Erneuerbare Sekundärbrennstoffe (RSF) [MJ]: A1-A3 0.000327, A4 2.51e-6, A5 5.11e-7, D -1.73e-5
- Nicht erneuerbare Sekundärbrennstoffe (NRSF) [MJ]: A1-A3 0.00343, A4 2.63e-5, A5 5.34e-6, D -0.000182
- Einsatz von Süßwasserressourcen (FW) [m^3]: A1-A3 0.00758, A4 1.93e-5, A5 0.000381, D -0.000178

## Outputs
- Gefährlicher Abfall zur Deponie (HWD) [kg]: A1-A3 0.00199, A4 0, A5 0.000777, D 0
- Entsorgter nicht gefährlicher Abfall (NHWD) [kg]: A1-A3 0.00607, A4 6.68e-5, A5 1.53e-5, D -0.00045
- Entsorgter radioaktiver Abfall (RWD) [kg]: A1-A3 0.00066, A4 4.85e-7, A5 1.76e-6, D -6.82e-5
- Komponenten für die Wiederverwendung (CRU) [kg]
- Stoffe zum Recycling (MFR) [kg]
- Stoffe für die Energierückgewinnung (MER) [kg]
- Exportierte elektrische Energie (EEE) [MJ]: A5 0.24
- Exportierte thermische Energie (EET) [MJ]: A5 0.577

## Impact indicators
- Globales Erwärmungspotenzial (GWP) [kg CO_(2)-Äq.]: A1-A3 0.955, A4 0.0246, A5 0.159, D -0.0786
- Abbau Potential der stratosphärischen Ozonschicht (ODP) [kg CFC11-Äq.]: A1-A3 2.34e-10, A4 5.14e-13, A5 1e-12, D -2.38e-11
- Versauerungspotenzial von Boden und Wasser (AP) [kg SO_(2)-Äq.]: A1-A3 0.00254, A4 0.000162, A5 1.68e-5, D -0.000109
- Eutrophierungspotenzial (EP) [kg PO_(4)^(3)-Äq.]: A1-A3 0.000304, A4 4.03e-5, A5 3.44e-6, D -1.22e-5
- Bildungspotential für troposphärisches Ozon (POCP) [kg Ethen-Äq.]: A1-A3 0.000588, A4 -6.81e-5, A5 0.000366, D -9.99e-6
- Potenzial für den abiotischen Abbau nicht fossiler Ressourcen (ADPE) [kg Sb-Äq.]: A1-A3 4.15e-7, A4 1.14e-9, A5 2.09e-9, D -8.14e-9
- Potenzial für den abiotischen Abbau fossiler Brennstoffe (ADPF) [MJ]: A1-A3 25.1, A4 0.337, A5 0.0287, D -1.04

## Use advice
Gültigkeitsbereich:
Diese validierte Deklaration berechtigt zum Führen des Zeichens des Instituts Bauen und Umwelt e.V. Sie gilt ausschließlich für das genannte Produkt PCI Lastogum für Werke in Deutschland, fünf Jahre vom Ausstellungsdatum an. Diese Umwelt-Produktdeklaration (EPD) beruht auf einer Individualisierung der Muster-Deklaration EPD-DIV-20140058-IBG1-DE der Deutschen Bauchemie e.V., des Industrieverband Klebstoffe e.V. und des Verbandes der deutschen Lack- und Druckfarbenindustrie e.V., bei der für die Berechnung der Ökobilanz das Produkt einer Gruppe ausgewählt wurde, welches die höchsten Umweltlasten dieser Gruppe aufweist.
Systemgrenze:
In der Ökobilanz werden die Module A1/A2/A3, A4, A5 und D berücksichtigt:

A1 Herstellung der Vorprodukte

A2 Transport zum Werk

A3 Produktion inkl. Energiebereitstellung, Herstellung von Verpackung (Kunststoffgebinde) sowie Hilfs- und Betriebsstoffen und Abfallbehandlung

A4 Transport zur Baustelle

A5 Installation (Verpackungsentsorgung sowie Emissionen bei der Installation)

D Gutschriften aus der Verbrennung der Verpackungsmaterialien und Recycling des Metallgebindes

Es handelt sich also um eine Deklaration von der „Wiege bis zum Werkstor mit Optionen“.

## Data sources
- PCI Lastogum.pdf
- GaBi Database (all versions)
- GaBi database SP20 2013
