# Innenverzinnte Kupfer-Hausinstallationsrohre

Dataset: ILCD process, EPD, average dataset
Geography: DE
Reference year: 2015
Valid until: 2020
Classification: OEKOBAU.DAT: Metalle / Kupfer / Kupferrohre
Classification: IBUCategories: 02 Bauprodukte / Metallbauprodukte und Zubehör / Metallrohre für Hausinstallationen
Method details: Metallrohre für Hausinstallationen.pdf
Owner: KME
Compliance: DIN EN 15804; ISO 14025
Review: Accredited third party review by IBU
Amounts: rows without a unit in brackets have none in this file; such an amount is in the reference unit of its flow, which a separate flow dataset defines
copyright: true

## General comment
Dieses Dokument bezieht sich auf innenverzinnte KME-Markenkupferrohre für Hausinstallationen.

Für die Herstellung von Installationsrohren wird bei KME Kupfer der sauerstofffreien Qualität Cu-DHP nach /DIN EN1057/ eingesetzt. Bei Cu-DHP handelt es sich um desoxidiertes Kupfer mit begrenzt hohem Phosphorgehalt (maximal 0,04%), welches sich durch seine sehr gute Schweiß- und Lötbarkeit auszeichnet.

Der Reinheitsgrad beträgt mindestens 99,90% Kupfer.

Folgende Marke wird von KME angeboten:

COPATIN® innenverzinntes Kupferrohr

Die Masse der Rohre ist in kg deklariert.

Zur Umrechnung sind das Gewicht, und für eine mögliche spätere Berechnung von Wärmeverlusten der Installation die Außenfläche des Rohres pro Meter unter Lieferzustand/ Eigenschaften angegeben.

Basis für die Berechnung der Ergebnisse sind die jeweils angegebenen produzierten Jahresmengen innenverzinnter Kupferrohre. Die Ergebnisse basieren dabei auf gemittelten Werten, die sich anhand der Jahresproduktionsmengen zusammensetzen.

Die Umweltdeklaration bezieht sich auf 1kg Rohr in durchschnittlicher Länge und Wandstärke.

## Technology and included processes
Die Hausinstallationsrohre bestehen zu 100 Masse-% aus Cu-DHP, d.h. sauerstofffreiem phosphor- 4 Umwelt Produktdeklaration KME Germany GmbH &amp; Co. KG – Innenverzinnte Kupfer-Hausinstallationsrohre desoxidiertem Kupfer mit begrenztem Restphosphor- gehalt. Der Reinheitsgrad beträgt mindestens 99,90 % Kupfer (Cu-DHP; EN-Nr. CW 024A). Zusammensetzung 99,90% Cu + Ag, Phosphor 0,015-0,040%. Bei der Verzinnung der Rohre wird Zinn mit einem Reinheitsgrad von 99,92 % eingesetzt. Hilfsstoffe: Eingesetzte Ziehmittel: 2,6 g/kg Kupfer. Ziehmittel bestehen aus hochtemperaturbeständigen mineralölhaltigen und synthetischen Ölen, die als Kühl- und Schmiermittel während des Ziehprozesses dienen. Eingesetzte Verzinnungslösung:43,6 g/kg Kupfer. Die Lösungen zum Verzinnen bestehen aus einer wässrigen Lösung von anorganischen Zinnsalzen. Aus diesen Lösungen wird auf chemischem Weg reines Zinn auf der Innenoberfläche der COPATIN-Rohre fest angelagert.
Technische Daten:
Prüfnormen/Produktnormen/Zulassungen:

/DIN EN 1057/, /DVGW - GW 392/, /RAL-Gütezeichen der Gütegemeinschaft Kupferrohre /
Deklarierte Einheit:
Die Deklaration bezieht sich auf die Herstellung von und das Recycling von einem Kilogramm Kupferrohr (innenverzinnt).

Tabelle 3: Überblick zu den Produktgruppen, Firmennamen, Produktionsstätten und Art der Durchschnittsbildung

Der Durchschnitt wurde auf Basis der jährlichen Produktionsmenge gebildet.

## Technical purpose
Die Einsatzzwecke der deklarierten Markenkupferrohre sind Transport von:
Trinkwasser kalt, warm, Zirkulation
Regenwasser
Grauwasser
Gas und Flüssiggas

## Reference product
- Innenverzinnte Kupfer-Hausinstallationsrohre / 1kg Kupferrohr (Innenverzinnte Kupfer-Hausinstallationsrohre / 1kg Kupferrohr ): 1

## Inputs
- Erneuerbare Primärenergie als Energieträger (PERE) [MJ]: A1-A3 5.33, C4 0.00108, D -1.14
- Erneuerbare Primärenergie zur stofflichen Nutzung (PERM) [MJ]: A1-A3 0
- Total erneuerbare Primärenergie (PERT) [MJ]: A1-A3 5.33, C4 0.00108, D -1.14
- Nicht-erneuerbare Primärenergie als Energieträger (PENRE) [MJ]: A1-A3 45.5, C4 0.013, D -6.52
- Nicht-erneuerbare Primärenergie zur stofflichen Nutzung (PENRM) [MJ]: A1-A3 0
- Total nicht erneuerbare Primärenergie (PENRT) [MJ]: A1-A3 45.5, C4 0.013, D -6.52
- Einsatz von Sekundärstoffen (SM) [kg]: A1-A3 0, C4 0, D 0
- Erneuerbare Sekundärbrennstoffe (RSF) [MJ]: A1-A3 0, C4 0, D 0
- Nicht erneuerbare Sekundärbrennstoffe (NRSF) [MJ]: A1-A3 0, C4 0, D 0
- Einsatz von Süßwasserressourcen (FW) [m^3]: A1-A3 0.0161, C4 -3.94e-5, D -0.00534

## Outputs
- Gefährlicher Abfall zur Deponie (HWD) [kg]: A1-A3 0.00448, C4 5.91e-7, D -0.000215
- Entsorgter nicht gefährlicher Abfall (NHWD) [kg]: A1-A3 0.03, C4 0.0701, D -0.00444
- Entsorgter radioaktiver Abfall (RWD) [kg]: A1-A3 0.00193, C4 2.27e-7, D -0.0002
- Komponenten für die Wiederverwendung (CRU) [kg]: A1-A3 0, C4 0
- Stoffe zum Recycling (MFR) [kg]: A1-A3 0, C4 0
- Stoffe für die Energierückgewinnung (MER) [kg]: A1-A3 0, C4 0
- Exportierte elektrische Energie (EEE) [MJ]: A1-A3 0, C4 0
- Exportierte thermische Energie (EET) [MJ]: A1-A3 0, C4 0

## Impact indicators
- Globales Erwärmungspotenzial (GWP) [kg CO_(2)-Äq.]: A1-A3 3.5, C4 0.000949, D -0.729
- Abbau Potential der stratosphärischen Ozonschicht (OPD) [kg CFC11-Äq.]: A1-A3 8.67e-11, C4 1.19e-14, D -3.86e-12
- Versauerungspotenzial von Boden und Wasser (AP) [kg SO_(2)-Äq.]: A1-A3 0.0101, C4 6.03e-6, D -0.0039
- Eutrophierungspotenzial (EP) [kg PO_(4)^(3)-Äq.]: A1-A3 0.00103, C4 8.27e-7, D -0.000336
- Bildungspotential für troposphärisches Ozon (POCP) [kg Ethen-Äq.]: A1-A3 0.000709, C4 5.75e-7, D -0.000219
- Potenzial für den abiotischen Abbau nicht fossiler Ressourcen (ADPE) [kg Sb-Äq.]: A1-A3 1.56e-5, C4 3.57e-10, D -8.43e-6
- Potenzial für den abiotischen Abbau fossiler Brennstoffe (ADPF) [MJ]: A1-A3 40.6, C4 0.0125, D -5.96

## Use advice
Gültigkeitsbereich:
Die vorliegende EPD ist eine Durchschnitts-EPD.

Die für die Berechnung der Ökobilanz verwendeten Werte stammen von zwei Herstellern. Die Produktionsstandorte sind Osnabrück und Ulm.
Systemgrenze:
Die Lebenszyklusanalyse für die Herstellung der betrachteten Kupferrohre umfasst die Lebenswegabschnitte „von der Wiege bis zum Werkstor&quot; (cradle to gate) mit Option.

Produktionsstadium

Module A1-A3 betrachtet: Die Bereitstellung von Rohmaterialen, Hilfsstoffen und Energien, Transport von Rohmaterialien und Hilfsstoffen Herstellprozess im Werk inklusive energetischen Aufwendungen, Herstellung von Hilfsstoffen, Entsorgung von anfallenden Reststoffen und der Berücksichtigung von auftretenden Werksemissionen. Kreislaufführung von Produktionsschrotten.

Module C4 beinhaltet die Emissionen im End-of-Life bei der Verbrennung und Deponierung.

Für Kupferschrott wird angenommen, dass der &quot;end-of-waste&quot; Status nach dem Sortieren und Schreddern beim Abriss oder in den Abfallbehandlungsanlagen erreicht ist.

In Modul D werden Wiederverwendung und Recycling von Kupferschrott auf Basis der Netto-Schrottmenge im End-of-Life betrachtet.

## Data sources
- Innenverzinnte Kupfer-Hausinstallationsrohre.pdf
