# Mehrschichtparkett

Dataset: ILCD process, EPD, average dataset
Geography: DE
Reference year: 2015
Valid until: 2020
Classification: OEKOBAU.DAT: Holz / Holzböden / Parkett
Classification: IBUCategories: 02 Bauprodukte / Bodenbeläge / Bodenbeläge
Method details: Bodenbeläge.pdf
Owner: Verband der Deutschen Parkettindustrie e.V.
Compliance: DIN EN 15804; ISO 14025
Review: Accredited third party review by IBU
Amounts: rows without a unit in brackets have none in this file; such an amount is in the reference unit of its flow, which a separate flow dataset defines
copyright: false

## General comment
Mehrschichtige Parkettböden sind in Lagen aufgebaute Holzböden, die eine Deckschicht von mindestens 2,5 mm Dicke haben. Sie können 2-lagig mit Trägerplatte aus Vollholz oder Holzwerkstoffen und einer dekorativen Deckschicht, oder 3-lagig mit einer zusätzlichen Gegenzuglage ausgestattet sein. Die Produkte entsprechen den Anforderungen der unter 2.4 angegebenen Produktnormen.
Die Durchschnittsbildung der hier deklarierten Produkte richtet sich nach dem gewichteten Produktionsvolumen der Hersteller.

## Technology and included processes
Zwei- und mehrschichtigen Parkettböden; Mehrschichtparkett. Mehrschichtige Parkettböden sind in Lagen aufgebaute Holzböden, die eine Deckschicht von mindestens 2,5 mm Dicke haben. Sie können 2-lagig mit Trägerplatte aus Vollholz oder Holzwerkstoffen und einer dekorativen Deckschicht, oder 3-lagig mit einer zusätzlichen Gegenzuglage ausgestattet sein. Mehrschichtparkette sind Holzbodenbeläge für die private und gewerbliche Nutzung im Innenbereich, die entweder auf Estrich, oder auf bestehenden anderen Unterböden wie Holz, Fliesen, PVC schwimmend verlegt oder verklebt oder mit sonstigen Befestigungsmitteln fixiert sind. Zur Herstellung von Mehrschichtparkett werden Rundhölzer, frische Schnitthölzer, kammergetrocknete Schnitthölzer oder Hobelware eingesetzt. Daneben kommen teilweise Sperrhölzer und HDF Platten zum Einsatz. Die Schichten werden zunächst getrennt hergestellt. Die Deckschicht wird aus Vollholzelementen zusammengesetzt. Die Mittellage kann aus Holzwerkstoffen oder massiven Einzelteilen bestehen. Im Falle des 3-lagigen Aufbaus wird ein Gegenzug genutzt. Die einzelnen Lagen werden nach Aufbringung von Klebstoffen zusammengepresst und aufgetrennt.
Technische Daten:
Folgende technische Daten für Mehrschichtparkette sind zu nennen:
Deklarierte Einheit:
Die deklarierte Einheit ist 1m² Schichtparkett bis zum Werkstor der Herstellung. Es wird ein durchschnittliches Produkt gemittelt aus mehreren Werken der Unternehmen des Verbandes deklariert.

## Technical purpose
Mehrschichtparkette sind Holzbodenbeläge für die private und gewerbliche Nutzung im Innenbereich, die entweder auf Estrich, oder auf bestehenden anderen Unterböden wie Holz, Fliesen, PVC schwimmend verlegt oder verklebt oder mit sonstigen Befestigungsmitteln fixiert sind. In jedem Fall sind die Herstellerangaben zu beachten.

## Reference product
- 1 m² Schichtparkett: 1

## Inputs
- Erneuerbare Primärenergie als Energieträger (PERE) [MJ]: A1 50.9036, A2 0.10792, A3 278.882, C2 0.000150684, C3 0.0599093, C4 0, D 147.493
- Erneuerbare Primärenergie zur stofflichen Nutzung (PERM) [MJ]: A1 152.954, A2 0, A3 0.665662, C2 0, C3 -153.62, C4 0, D 0
- Total erneuerbare Primärenergie (PERT) [MJ]: A1 203.857, A2 0.10792, A3 279.548, C2 0.000150684, C3 -153.56, C4 0, D 147.493
- Nicht-erneuerbare Primärenergie als Energieträger (PENRE) [MJ]: A1 36.6972, A2 6.40321, A3 122.639, C2 0.11432, C3 1.14563, C4 0, D -127.689
- Nicht-erneuerbare Primärenergie zur stofflichen Nutzung (PENRM) [MJ]: A1 3.54586, A2 0, A3 0, C2 0, C3 -3.54586, C4 0, D 0
- Total nicht erneuerbare Primärenergie (PENRT) [MJ]: A1 40.2431, A2 6.40321, A3 122.639, C2 0.11432, C3 -2.40023, C4 0, D -127.689
- Einsatz von Sekundärstoffen (SM) [kg]: A1 0, A2 0, A3 0, C2 0, C3 0, C4 0, D 0
- Erneuerbare Sekundärbrennstoffe (RSF) [MJ]: A1 5.96058, A2 0, A3 5.26016, C2 0, C3 0, C4 0, D 153.62
- Nicht erneuerbare Sekundärbrennstoffe (NRSF) [MJ]: A1 0, A2 0, A3 0, C2 0, C3 0, C4 0, D 3.54586
- Einsatz von Süßwasserressourcen (FW) [m^3]: A1 0.103474, A2 0.00638441, A3 2.69793, C2 2.14373e-6, C3 0.0424864, C4 0, D 0.0633793

## Outputs
- Gefährlicher Abfall zur Deponie (HWD) [kg]: A1 0.00286001, A2 0, A3 0.00201395, C2 0, C3 0, C4 0, D 0.0254305
- Entsorgter nicht gefährlicher Abfall (NHWD) [kg]: A1 0.000704769, A2 0, A3 0.000971565, C2 0, C3 0, C4 0, D 7.72531e-7
- Entsorgter radioaktiver Abfall (RWD) [kg]: A1 0.00286027, A2 1.07e-5, A3 0.016249, C2 2.01251e-7, C3 0.000198042, C4 0, D -0.0177772
- Komponenten für die Wiederverwendung (CRU) [kg]: A1 0, A2 0, A3 0, C2 0, C3 0, C4 0, D 0
- Stoffe zum Recycling (MFR) [kg]: A1 0, A2 0, A3 0, C2 0, C3 8.9542, C4 0, D 0
- Stoffe für die Energierückgewinnung (MER) [kg]: A1 0, A2 0, A3 0.0345422, C2 0, C3 8.9542, C4 0, D -8.98874
- Exportierte elektrische Energie (EEE) [MJ]: A1 0, A2 0, A3 0, C2 0, C3 0, C4 0, D 0
- Exportierte thermische Energie (EET) [MJ]: A1 0, A2 0, A3 0, C2 0, C3 0, C4 0, D 0

## Impact indicators
- Globales Erwärmungspotenzial (GWP) [kg CO_(2)-Äq.]: A1 -12.5632, A2 0.456343, A3 6.87451, C2 0.00806051, C3 14.5999, C4 0, D -6.13364
- Abbau Potential der stratosphärischen Ozonschicht (ODP) [kg CFC11-Äq.]: A1 2.28837e-7, A2 7.15468e-10, A3 1.30549e-6, C2 1.61106e-11, C3 1.57067e-8, C4 0, D -1.43699e-6
- Versauerungspotenzial von Boden und Wasser (AP) [kg SO_(2)-Äq.]: A1 0.00795076, A2 0.00239496, A3 0.0340846, C2 3.46131e-5, C3 8.19789e-5, C4 0, D -0.00648288
- Eutrophierungspotenzial (EP) [kg PO_(4)^(3)-Äq.]: A1 0.0021345, A2 0.000566388, A3 0.00713928, C2 8.01862e-6, C3 9.56353e-6, C4 0, D -6.72977e-5
- Bildungspotential für troposphärisches Ozon (POCP) [kg Ethen-Äq.]: A1 0.00174437, A2 0.000266982, A3 0.00483009, C2 3.80098e-6, C3 6.17123e-6, C4 0, D -0.00043657
- Potenzial für den abiotischen Abbau nicht fossiler Ressourcen (ADPE) [kg Sb-Äq.]: A1 1.65909e-5, A2 1.26314e-8, A3 2.50972e-5, C2 1.71584e-10, C3 1.54233e-9, C4 0, D -1.09528e-7
- Potenzial für den abiotischen Abbau fossiler Brennstoffe (ADPF) [MJ]: A1 31.0287, A2 6.35675, A3 76.5245, C2 0.113374, C3 0.597287, C4 0, D -71.2332

## Use advice
Gültigkeitsbereich:
Die in dieser EPD beschriebenen zwei- und mehrschichtigen Parkettböden werden von den Mitgliedern des Verbands der Deutschen Parkettindustrie e.V. (vdp) hergestellt. Die Deklaration basiert auf den Angaben von annähernd 100% der Verbandsmitglieder, wobei die hier vertretene Technologie für alle Mitglieder repräsentativ ist. Die ermittelten Ökobilanzergebnisse sind gemittelte Werte eines durchschnittlichen Produkts aus mehreren Werken mehrerer Hersteller. Aufgrund der Mannigfaltigkeit der möglichen Oberflächenbeschichtungen wurden diese bei den hier betrachteten Mehrschichtparketten nicht berücksichtigt. Da hinter dem Werkstor der Produktherstellung nur wenige bis keine Aussagen über die Verwendung bzw. Nutzung der Produkte gemacht werden können, sind die Phasen A4 bis C1 nach /EN 15804/ ausgeklammert. Die Umweltwirkung des jeweiligen Entsorgungsstadiums der Module C2 bis D wurde berücksichtigt.
Systemgrenze:
Der Deklarationstyp entspricht einer EPD „von der Wiege bis Werkstor mit Optionen“. Inhalte sind das Stadium der Produktion, also von der Bereitstellung der Rohstoffe bis zum Werkstor der Produktion (cradle-to-gate, Module A1 bis A3) sowie Teile des Ende des Lebensweges (Modul C2 bis C4). Darüber hinaus erfolgt eine Betrachtung der Nutzen und Lasten über den Lebensweg des Produktes hinaus (Modul D).

Im Einzelnen werden in Modul A1 die Bereitstellung des Holzes aus dem Forst und die Bereitstellung weiterer vorveredelter Holzprodukte bilanziert. Die Transporte dieser Stoffe werden in Modul A2 berücksichtigt. Modul A3 umfasst die Bereitstellung der Brennstoffe, Betriebsmittel und Strom sowie die Herstellungsprozesse vor Ort. Diese sind im Wesentlichen die Entrindung, der Einschnitt und die Trocknung. Modul C2 berücksichtigt den Transport zum Entsorger, Modul C3 die Aufbereitung und Sortierung des Altholzes, Modul D bilanziert die thermische Verwertung sowie Nutzen und Lasten außerhalb der Systemgrenze.

## Data sources
- Mehrschichtparkett.pdf
- GaBi Database (all versions)
- GaBi database SP28 2015
