# PCI Nanofug, PCI Nanofug Premium

Dataset: ILCD process, EPD, average dataset
Geography: DE
Reference year: 2015
Valid until: 2020
Classification: OEKOBAU.DAT: Mineralische Baustoffe / Mörtel und Beton / Kleber und Klebemörtel
Classification: IBUCategories: 02 Bauprodukte / Mauerwerk und Mörtel / Mineralische Werkmörtel
Method details: Mineralische Werkmörtel.pdf
Owner: PCI Augsburg GmbH
Compliance: DIN EN 15804; ISO 14025
Review: Accredited third party review by IBU
Amounts: rows without a unit in brackets have none in this file; such an amount is in the reference unit of its flow, which a separate flow dataset defines
copyright: false

## General comment
PCI Nanofug und PCI Nanofug Premium sind Gemische aus einem oder mehreren anorganischen Bindemitteln, Zuschlägen und Zusatzstoffen (Additive), welche an der Baustelle mit Wasser angemischt werden. Mit diesen Produkten können die verschiedenen keramischen Beläge, unter anderem erstellt aus Steingutfliesen, Steinzeugfliesen, Feinsteinzeugfliesen oder auch Glasfliesen, verfugt werden.

Als repräsentative Produkte wurden die Produkte mit den höchsten Umweltwirkungen zur Berechnung der Ökobilanzergebnisse herangezogen.

## Technology and included processes
flexibilisierter Fugenmörtel zusammengesetzt aus verschiedenen Zementen, Füllstoffen wie Quarzsand und Kalksteinmehl, Dispersionspulver zur Flexibilisierung, Farbpigmente sowie Additiven wie Stabilisierungsmittel und Abbinderegler; hergestellt im diskontinuierlichen Chargenbetrieb
Technische Daten:
Die Fugenmörtel PCI Nanofug und PCI Nanofug Premium entsprechen den Anforderungen der /DIN EN 13888/.
Deklarierte Einheit:
Die Verbands-EPD bezieht sich auf die deklarierte Einheit von 1 kg modifizierten, mineralischen Mörteln. Die Auswertungen beziehen sich auf das repräsentative (worst-case) Produkt je Gruppe, wobei die Daten für den Herstellungsprozess Durchschnittswerte verschiedener Hersteller und Werke sind.

Auf die Angabe eines Verbrauchs pro Flächeneinheit wurde auf Grund der extrem unterschiedlichen Anwendungsbereiche und Rezepturen in dieser EPD verzichtet. Genaue Angaben dazu können in produktspezifischen Datenblättern der Hersteller entnommen werden.

## Technical purpose
PCI Nanofug und PCI Nanofug Premium sind

Produkte zum Verfugen keramischer Beläge aus Steingutfliesen, Steinzeugfliesen und Feinsteinzeugfliesen wie auch Glasmosaik mit Fugenbreiten von 1 bis 10 mm an Wänden und Böden im Innenbereich wie auch im Außenbereich.

## Reference product
- PCI Nanofug, PCI Nanofug Premium / 1kg: 1

## Inputs
- Erneuerbare Primärenergie als Energieträger (PERE) [MJ]: A1-A3 1.2
- Erneuerbare Primärenergie zur stofflichen Nutzung (PERM) [MJ]: A1-A3 0
- Total erneuerbare Primärenergie (PERT) [MJ]: A1-A3 1.2, A4 0.0198, A5 0.00226, D -0.0609
- Nicht-erneuerbare Primärenergie als Energieträger (PENRE) [MJ]: A1-A3 7.02
- Nicht-erneuerbare Primärenergie zur stofflichen Nutzung (PENRM) [MJ]: A1-A3 0.6
- Total nicht erneuerbare Primärenergie (PENRT) [MJ]: A1-A3 7.62, A4 0.334, A5 0.0263, D -0.641
- Einsatz von Sekundärstoffen (SM) [kg]
- Erneuerbare Sekundärbrennstoffe (RSF) [MJ]: A1-A3 0.0111, A4 2.49e-6, A5 6.29e-6, D -9.25e-6
- Nicht erneuerbare Sekundärbrennstoffe (NRSF) [MJ]: A1-A3 0.117, A4 2.6e-5, A5 2.98e-5, D -9.69e-5
- Einsatz von Süßwasserressourcen (FW) [m^3]

## Outputs
- Gefährlicher Abfall zur Deponie (HWD) [kg]
- Entsorgter nicht gefährlicher Abfall (NHWD) [kg]
- Entsorgter radioaktiver Abfall (RWD) [kg]
- Komponenten für die Wiederverwendung (CRU) [kg]
- Stoffe zum Recycling (MFR) [kg]
- Stoffe für die Energierückgewinnung (MER) [kg]
- Exportierte elektrische Energie (EEE) [MJ]: A5 0.128
- Exportierte thermische Energie (EET) [MJ]: A5 0.309

## Impact indicators
- Globales Erwärmungspotenzial (GWP) [kg CO_(2)-Äq.]: A1-A3 0.465, A4 0.0244, A5 0.1, D -0.042
- Abbau Potential der stratosphärischen Ozonschicht (ODP) [kg CFC11-Äq.]: A1-A3 5.16e-9, A4 5.09e-13, A5 8.34e-13, D -1.27e-11
- Versauerungspotenzial von Boden und Wasser (AP) [kg SO_(2)-Äq.]: A1-A3 0.00172, A4 0.00016, A5 1.21e-5, D -5.81e-5
- Eutrophierungspotenzial (EP) [kg PO_(4)^(3)-Äq.]: A1-A3 0.000175, A4 3.98e-5, A5 2.42e-6, D -6.53e-6
- Bildungspotential für troposphärisches Ozon (POCP) [kg Ethen-Äq.]: A1-A3 0.000146, A4 -6.73e-5, A5 1.28e-6, D -5.34e-6
- Potenzial für den abiotischen Abbau nicht fossiler Ressourcen (ADPE) [kg Sb-Äq.]: A1-A3 1.63e-6, A4 1.12e-9, A5 1.29e-9, D -4.34e-9
- Potenzial für den abiotischen Abbau fossiler Brennstoffe (ADPF) [MJ]: A1-A3 6.85, A4 0.333, A5 0.0232, D -0.553

## Use advice
Gültigkeitsbereich:
Diese validierte Deklaration berechtigt zum Führen des Zeichens des Instituts Bauen und Umwelt e.V. Sie gilt ausschließlich für die Produkte PCI Nanofug und PCI Nanofug Premium für Werke in Deutschland, fünf Jahre vom Ausstellungsdatum an.

Diese Umwelt-Produktdeklaration (EPD) beruht auf einer Individualisierung der Muster-EPD der Deutschen Bauchemie e.V., des Industrieverband Klebstoffe e.V. und des Verbandes der deutschen Lack- und Druckfarbenindustrie e.V. bei der für die Berechnung der Ökobilanz das Produkt einer Gruppe ausgewählt wurde, welches die höchsten Umweltlasten dieser Gruppe aufweist.
Systemgrenze:
In der Ökobilanz werden die Module A1/A2/A3, A4, A5 und D berücksichtigt:

- A1 Herstellung der Vorprodukte

- A2 Transport zum Werk

- A3 Produktion inkl. Energiebereitstellung, Herstellung von Verpackung sowie Hilfs- und Betriebsstoffen und Abfallbehandlung

- A4 Transport zur Baustelle

- A5 Installation (Verpackungsentsorgung sowie Emissionen bei der Installation)

- D Gutschriften aus der Verbrennung der Verpackungsmaterialien

Es handelt sich also um eine Deklaration von der „Wiege bis zum Werkstor mit Optionen“.

## Data sources
- PCI Nanofug, PCI Nanofug Premium.pdf
- GaBi Database (all versions)
- GaBi database SP20 2013
