# CALCIUM SULPHATE FLOWING SCREED AND CONVENTIONAL CALCIUM SULPHATE SCREED

Dataset: ILCD process, EPD, average dataset
Geography: DE
Reference year: 2015
Valid until: 2020
Classification: OEKOBAU.DAT: Mineralische Baustoffe / Bindemittel / Gips
Classification: IBUCategories: 02 Bauprodukte / Mauerwerk und Mörtel / Mineralische Werkmörtel
Method details: Mineralische Werkmörtel.pdf
Owner: Bundesverband der Gipsindustrie
Compliance: DIN EN 15804; ISO 14025
Review: Accredited third party review by IBU
Amounts: rows without a unit in brackets have none in this file; such an amount is in the reference unit of its flow, which a separate flow dataset defines
copyright: false

## General comment
This declaration refers to calcium sulphate flowing screed and conventional calcium sulphate screed.

1 kg of the dry mixture prior to adding water on the construction site is used as the declared unit. This dry mixture displays a dry bulk density > 1500 kg/m3.

The primary binding agent is represented by bindable calcium sulphate which is hydrated as flowing screed (liquid) or conventional screed (moist) by adding water on the construction site, independent of the processing consistency.

The declaration is independent of delivery as a premixed dry mortar, ready-mixed mortar or binder compound only requiring the addition of aggregate or water.

Regardless of the fact that cement can also be added as an aggregate, this declaration does not apply for cement screed where cement is used as the primary binding agent.

This declaration only applies for screed and binding compounds delivered loose in transport containers,
i.e. not in bags.

## Technology and included processes
Various manufacturing processes can be used for the products. The plant with the greatest capacity for using natural anhydrite, alpha-hemihydrate, thermal anhydrite and HF anhydrite, respectively, as primary binding agents was modelled for this EPD. The following (simplified) manufacturing processes were selected: 1. Screed made from natural anhydrite 2. Screed made from alpha-hemihydrate 3. Screed made from thermal anhydrite 4. Screed made from HF anhydrite * New LCA by KIWA GmbH TBU /KIWA screed/ [Legend:] Alpha-Halbhydrat* - Alpha-hemihydrate* Naturanhydrit - Natural anhydrite Thermischer Anhydrit - Thermal anhydrite Zement - Cement Transport - Transport Strom Mix - Electricity mix Mischer - Mixer Sondermüll - Hazardous waste Staub - Dust Hausmüll - Household waste Estrich Naturanhydrit - Screed made from natural anhydrite HF-Anhydrit - HF-anhydrite Kalksteinsplitt - Limestone grit Gesteinskörnungen - Aggregate particles Gipsabfall - Gypsum waste Estrich Alpha-Halbhydrat - Screed made from alpha-hemihydrate Estrich Thermischer Anhydrit - Screed made from thermal anhydrite Estrich HF-Anhydrit - Screed made from HF anhydrite
Technical data:
Technical construction data can be derived from information supplied by the manufacturers and the designated screed constructions, e.g. regarding the nominal screed thickness. As the declaration applies only until delivery to the construction site, this technical data is not listed here. Reference is made to the leaflet “Calciumsulfat-Fließestriche” (Calcium sulphate flowing screeds) which provides information for planning /IGE Planning/.
Declared unit:
These calculations refer to the arithmetic mean of data initially recorded separately for:
- 1 kg natural anhydrite screed
- 1 kg alpha-hemihydrate screed
- 1 kg thermal anhydrite screed
- 1 kg HF anhydrite screed

## Technical purpose
Calcium sulphate flowing screed and conventional calcium sulphate screeds are used in the installation of large screed surfaces without joints.

These products can be used for various screed constructions, e.g. as compound screed /DIN 18560-3/, screed on separation layer /DIN 18560-4/, screed on insulation layer /DIN 18560-2/, heated screed /DIN 18560-2/, screed on hollow floors /DIN EN 13213/.

## Reference product
- 1 kg Estrich (trocken, vor Wasserzugabe): 1

## Inputs
- Erneuerbare Primärenergie als Energieträger (PERE) [MJ]: A1-A3 0.165, A4 0.00474, A5 0.000104
- Erneuerbare Primärenergie zur stofflichen Nutzung (PERM) [MJ]
- Total erneuerbare Primärenergie (PERT) [MJ]: A1-A3 0.165, A4 0.00474, A5 0.000104
- Nicht-erneuerbare Primärenergie als Energieträger (PENRE) [MJ]: A1-A3 0.913, A4 0.0622, A5 0.000378
- Nicht-erneuerbare Primärenergie zur stofflichen Nutzung (PENRM) [MJ]
- Total nicht erneuerbare Primärenergie (PENRT) [MJ]: A1-A3 0.913, A4 0.0622, A5 0.000378
- Einsatz von Sekundärstoffen (SM) [kg]
- Erneuerbare Sekundärbrennstoffe (RSF) [MJ]
- Nicht erneuerbare Sekundärbrennstoffe (NRSF) [MJ]
- Einsatz von Süßwasserressourcen (FW) [m^3]: A1-A3 0.168, A4 0.000297, A5 5.46e-5

## Outputs
- Gefährlicher Abfall zur Deponie (HWD) [kg]: A1-A3 6.32e-7, A4 5.01e-8, A5 3.64e-10
- Entsorgter nicht gefährlicher Abfall (NHWD) [kg]: A1-A3 0.352, A4 0.000417, A5 1.64e-8
- Entsorgter radioaktiver Abfall (RWD) [kg]: A1-A3 5.9e-5, A4 8.27e-8, A5 3.44e-8
- Komponenten für die Wiederverwendung (CRU) [kg]
- Stoffe zum Recycling (MFR) [kg]
- Stoffe für die Energierückgewinnung (MER) [kg]
- Exportierte elektrische Energie (EEE) [MJ]
- Exportierte thermische Energie (EET) [MJ]

## Impact indicators
- Globales Erwärmungspotenzial (GWP) [kg CO_(2)-Äq.]: A1-A3 0.111, A4 0.00455, A5 2.88e-5
- Abbau Potential der stratosphärischen Ozonschicht (ODP) [kg CFC11-Äq.]: A1-A3 7.08e-12, A4 5.61e-15, A5 3.26e-16
- Versauerungspotenzial von Boden und Wasser (AP) [kg SO_(2)-Äq.]: A1-A3 0.000173, A4 1.15e-5, A5 4.4e-8
- Eutrophierungspotenzial (EP) [kg PO_(4)^(3)-Äq.]: A1-A3 2.52e-5, A4 3.23e-6, A5 6.39e-9
- Bildungspotential für troposphärisches Ozon (POCP) [kg Ethen-Äq.]: A1-A3 1.18e-5, A4 -3.3e-6, A5 3.43e-9
- Potenzial für den abiotischen Abbau nicht fossiler Ressourcen (ADPE) [kg Sb-Äq.]: A1-A3 3.75e-8, A4 2.35e-10, A5 1.93e-11
- Potenzial für den abiotischen Abbau fossiler Brennstoffe (ADPF) [MJ]: A1-A3 1.18, A4 0.062, A5 0.000292

## Use advice
Scope:
This EPD is an association EPD for all member companies of the Bundesverband der Gipsindustrie e.V. and the Industriegruppe Estrichstoffe in accordance with the list of members on www.gips.de.

The LCA result comprises the manufacture of screed with calcium sulphate binding agents in Germany and can be used in particular for planning purposes prior to awarding contracts. The market for screeds with calcium sulphate as a binding agent is well covered by the members of the Bundesverband der Gipsindustrie e.V. and the Industriegruppe Estrichstoffe. The technical data was taken from the publications of the Bundesverband der Gipsindustrie e.V. and the Industriegruppe Estrichstoffe currently available as well as the manufacturers represented there. This document is translated from the German Environmental Product Declaration into English. It is based on the German original version EPD-BVG-20150175-IAG1-DE. The verifier has no influence on the quality of the translation.
System boundary:
The declaration type corresponds with an EPD from the cradle to construction of the building structure.

The following information modules have been considered according to DIN EN 15804: raw material supply (Module A1), transport (Module A2) and manufacture (Module A3), including supply of all substances, products and energy.

Information for Modules A4 and A5 is taken from the product declaration of the Industrieverband Werkmörtel e.V. (IWM).

## Data sources
- Calciumsulfat-Fließestrich und Konventioneller Calciumsulfatestrich.pdf
- GaBi Database (all versions)
- GaBi database SP26 2014
