# Thermofloc

Dataset: ILCD process, EPD, average dataset
Geography: AT
Reference year: 2015
Valid until: 2020
Classification: OEKOBAU.DAT: Dämmstoffe / Zellulosefaser / Zellulose-Einblas-Dämmstoff
Classification: IBUCategories: 02 Bauprodukte / Wärmedämmungsprodukte / Dämmstoffe aus Zellulosefasern
Method details: Dämmstoffe aus Zellulosefasern.pdf
Owner: Peter Seppele Gesellschaft m.b.H.
Compliance: DIN EN 15804; ISO 14025
Review: Accredited third party review by IBU
Amounts: rows without a unit in brackets have none in this file; such an amount is in the reference unit of its flow, which a separate flow dataset defines
copyright: false

## General comment
Thermofloc cellulose insulation is manufactured from unmixed paper from daily newspapers plus additives to protect against fire and mould. The cellulose insulation is installed by certified workers with blowing machines specifically equipped for the job.

## Technology and included processes
1) Unmixed newspaper of class 2.01 and/or 2012 in accordance with EN 643 is taken to the facility with the help of a forklift. The base and auxiliary materials for Thermofloc cellulose insulation are delivered to the plant by truck and stored there until production. The Thermofloc cellulose insulation is manufactured in the production site in Feistritz an der Drau (Austria). The production process is described in the following points. 2) The newspapers reach the shredder via conveyor belt, where the paper is shredded. 3) The shredded newspaper is transported further to the preliminary container by a bucket conveyor via a magnetic separator and non-ferrous metal separator from where it reaches the refiner via weighing belts. 4) In the refiners, the paper is defibered and impregnated in order to protect the cellulose insulation against fire, mould and pests. 5) The cellulose insulation is blown into a filter preliminary container via pipelines and blowers. From there, it is transported further for sacking with the help of augers, where the cellulose insulation is pressed into shape in the pressing chamber by means of a press punch and packaged airtight in sacks. The sacks are placed on disposable pallets with the help of a robot and finally wrapped with Power-Stretch film for export.
Technical data:
The technical data of the product can be seen in the following table.
Declared unit:
The required modules were selected in accordance with EN 15804 for a life cycle assessment of the Thermofloc product "from the cradle to the factory gate with options." The considered modules A1-A3, A4-A5, C1-C4 and D were selected and declared in accordance with the PCR for insulation made of cellulose fibres for 1 kg of insulation.

## Technical purpose
- Blow-on insulation that cannot be walked on for ceilings under undeveloped lofts (insulation in between or above the primary structure)
Blow-in insulation between the flooring sleepers of floor constructions as cavity insulation or alternatively damping
Application area ceiling/floor:

- Blow-in insulation for flat roofs with the top cover and unventilated cavities under the roof seal - Blow-in insulation for inclined and unventilated cavities under the roof seal
(full rafter insulation)
Application area roof:

- Blow-in insulation for cavities between walls in wooden frame construction

- Blow-in insulation for outside wall cavities in wooden frame construction

Application area walls and facade:
Thermofloc cellulose insulation can be used for purposes where the unloaded insulation is mainly blown into vertical or horizontal cavities to fill the space or blown onto horizontal, slightly curved or slightly inclined (≤ 10°) exposed surfaces as an open layer.

## Reference product
- 1 kg Thermofloc Zellulosedämmstoff: 1

## Inputs
- Erneuerbare Primärenergie als Energieträger (PERE) [MJ]: A1 0.038, A2 0.015, A3 0.596, A4 0.034, A5 0.0004, C1 0, C2 0.008, C3 0, C4 13, D -1.645
- Erneuerbare Primärenergie zur stofflichen Nutzung (PERM) [MJ]: A1 12.934, A2 0, A3 0, A4 0, A5 0, C1 0, C2 0, C3 0, C4 -12.9, D 0
- Total erneuerbare Primärenergie (PERT) [MJ]: A1 12.972, A2 0.015, A3 0.596, A4 0.034, A5 0.0004, C1 0, C2 0.008, C3 0, C4 0.04, D -1.645
- Nicht-erneuerbare Primärenergie als Energieträger (PENRE) [MJ]: A1 0.752, A2 0.263, A3 0.607, A4 0.445, A5 0.003, C1 0, C2 0.105, C3 0, C4 0.422, D -9.094
- Nicht-erneuerbare Primärenergie zur stofflichen Nutzung (PENRM) [MJ]: A1 0, A2 0, A3 0, A4 0, A5 0, C1 0, C2 0, C3 0, C4 0, D 0
- Total nicht erneuerbare Primärenergie (PENRT) [MJ]: A1 0.752, A2 0.263, A3 0.607, A4 0.445, A5 0.003, C1 0, C2 0.105, C3 0, C4 0.422, D -9.094
- Einsatz von Sekundärstoffen (SM) [kg]: A1 0.916, A2 0, A3 0, A4 0, A5 0, C1 0, C2 0, C3 0, C4 0, D 0
- Erneuerbare Sekundärbrennstoffe (RSF) [MJ]: A1 0, A2 0, A3 0, A4 0, A5 0, C1 0, C2 0, C3 0, C4 0, D 0
- Nicht erneuerbare Sekundärbrennstoffe (NRSF) [MJ]: A1 0, A2 0, A3 0, A4 0, A5 0, C1 0, C2 0, C3 0, C4 0, D 0
- Einsatz von Süßwasserressourcen (FW) [m^3]: A1 0.00015, A2 2.48e-5, A3 0.000451, A4 2e-5, A5 4.85e-5, C1 0, C2 4.72e-6, C3 0, C4 0.00379, D -0.00194

## Outputs
- Gefährlicher Abfall zur Deponie (HWD) [kg]: A1 7.56e-7, A2 1.33e-7, A3 2.97e-5, A4 3.57e-7, A5 1.27e-10, C1 0, C2 8.43e-8, C3 0, C4 0, D -3.22e-6
- Entsorgter nicht gefährlicher Abfall (NHWD) [kg]: A1 0.0617, A2 0.0025, A3 0.0245, A4 0.0045, A5 2.08e-5, C1 0, C2 0.00106, C3 0, C4 2.11e-5, D -0.753
- Entsorgter radioaktiver Abfall (RWD) [kg]: A1 3.34e-5, A2 5.41e-7, A3 1.02e-6, A4 7.84e-7, A5 2.38e-7, C1 0, C2 1.85e-7, C3 0, C4 9.25e-6, D -9.17e-5
- Komponenten für die Wiederverwendung (CRU) [kg]: A1 0, A2 0, A3 0, A4 0, A5 0, C1 0, C2 0, C3 0, C4 0, D 0
- Stoffe zum Recycling (MFR) [kg]: A1 0, A2 0, A3 0, A4 0, A5 0, C1 0, C2 0, C3 0, C4 0, D 0
- Stoffe für die Energierückgewinnung (MER) [kg]: A1 0, A2 0, A3 0, A4 0, A5 0, C1 0, C2 0, C3 0, C4 0, D 0
- Exportierte elektrische Energie (EEE) [MJ]: A1 0, A2 0, A3 0, A4 0, A5 0.041, C1 0, C2 0, C3 0, C4 1.7, D 0
- Exportierte thermische Energie (EET) [MJ]: A1 0, A2 0, A3 0, A4 0, A5 0.092, C1 0, C2 0, C3 0, C4 4.01, D 0

## Impact indicators
- Globales Erwärmungspotenzial (GWP) [kg CO_(2)-Äq.]: A1 0.043, A2 0.019, A3 0.018, A4 0.033, A5 0.022, C1 0, C2 0.00787, C3 0, C4 0.031, D -0.826
- Abbau Potential der stratosphärischen Ozonschicht (ODP) [kg CFC11-Äq.]: A1 2.69e-9, A2 1.21e-13, A3 2.33e-13, A4 6.19e-14, A5 5.09e-14, C1 0, C2 1.46e-14, C3 0, C4 6.46e-12, D -5.95e-12
- Versauerungspotenzial von Boden und Wasser (AP) [kg SO_(2)-Äq.]: A1 0.000477, A2 8.63e-5, A3 9.8e-5, A4 0.000148, A5 1.67e-6, C1 0, C2 3.5e-5, C3 0, C4 0.000295, D -0.00518
- Eutrophierungspotenzial (EP) [kg PO_(4)^(3)-Äq.]: A1 5.87e-5, A2 2.2e-5, A3 8.2e-6, A4 4e-5, A5 3.14e-7, C1 0, C2 9.45e-6, C3 0, C4 5.18e-5, D -0.000543
- Bildungspotential für troposphärisches Ozon (POCP) [kg Ethen-Äq.]: A1 2.94e-5, A2 -2.88e-5, A3 1.13e-5, A4 -5.03e-5, A5 1.94e-7, C1 0, C2 -1.19e-5, C3 0, C4 2.1e-5, D -0.000394
- Potenzial für den abiotischen Abbau nicht fossiler Ressourcen (ADPE) [kg Sb-Äq.]: A1 2.19e-6, A2 8.94e-10, A3 2.01e-8, A4 1.72e-9, A5 1.15e-10, C1 0, C2 4.07e-10, C3 0, C4 2.37e-8, D -6.71e-8
- Potenzial für den abiotischen Abbau fossiler Brennstoffe (ADPF) [MJ]: A1 0.656, A2 0.261, A3 0.559, A4 0.443, A5 0.00251, C1 0, C2 0.105, C3 0, C4 0.358, D -8.705

## Use advice
Scope:
Thermofloc – borate-free cellulose insulation from the factory of Peter Seppele Gesellschaft m.b.H., Bahnhofstraße 79, 9710-Feistritz/Drau, in Austria
System boundary:
Assessment from the cradle to the grave. The life cycle assessment refers to the provision (module A1), transport (module A2), manufacture (module A3), delivery (module A4), installation (module A5), disposal phase (modules C1-C4) as well as the credits and debits (module D).

## Data sources
- Thermofloc.pdf
- GaBi Database (all versions)
- GaBi database SP20 2013
