# Eurolight decor lightweight boards

Dataset: ILCD process, EPD, specific dataset
Geography: EU-27
Reference year: 2015
Valid until: 2020
Classification: OEKOBAU.DAT: Holz / Holzwerkstoffe / Spanplatten
Classification: IBUCategories: 02 Bauprodukte / Holzwerkstoffe / Holzwerkstoffe
Method details: Holzwerkstoffe.pdf
Owner: Fritz EGGER GmbH & Co. OG Holzwerkstoffe
Compliance: DIN EN 15804; ISO 14025
Review: Accredited third party review by IBU
Amounts: rows without a unit in brackets have none in this file; such an amount is in the reference unit of its flow, which a separate flow dataset defines
copyright: true

## General comment
EUROLIGHT Decor is a lightweight board with a melamine-faced chipboard as top layer and a cardboard comb core inside. This sandwich board offers maximum weight reduction without loss of load capacity and rigidity.

An average product with an overall thickness of 42.6 mm and an area weight of 12.4 kg/m² is being considered. The overall thickness and the area weight of the product represent average values, which were weighted with the production volumes of the various thicknesses.

## Technology and included processes
Production of rawboards (top layer) in Wörgl 1. Roundwood cutting 2. Wood chip preparation 3. Waste wood treatment 4. Drying the chips to approximately 2 – 3 % residual moisture 5. Applying glue to the chips 6. Spreading the glue-coated chips onto a forming belt 7. Compression of the chip cake in a continuously operating calander hot press 8. Sanding the upper and lower sides 9. Cutting and trimming the board strand into rawboard formats 10. Piling into large stacks Production of lightweight boards in St. Johann 1. Separation of both connected laminated boards via longitudinal circular saws and cross cutting blades 2. Glue-coating of both top layers with the PUR adhesive system 3. Expansion of the hexagonal honeycomb in a tunnel dryer 4. Connection of glue-coated top layer with the medium layer 5. Calibration of the calibration element in a continuous calibration press 6. Trimming and setting of separating cuts 7. Stacking and packing the plates Production of impregnates for lamination in St. Johann 1. Processing the base paper 2. Addition of impregnation resins (MUF) in the plant 3. Drying the impregnated paper in heated dryers 4. Formatting the endless paper by means of a crosscutter 5. Stacking the formatted sheets on pallets
Declared unit:
The declaration relates to the manufacture of one cubic meter of laminated EUROLIGHT board.
Unlaminated Eurolight boards display an average thickness of 12.4 kg/m² and an average overall thickness of 42.6 mm. The average was weighted according to the production volumes of the individual thicknesses.

## Technical purpose
Melamine-faced lightweight boards are used in decorative interior design, furniture, as well as door construction. They are employed, for example, in the kitchen area as worktop or as interior door. Lightweight boards are used where a massive look with low weight is desired.

## Reference product
- 1 m² beschichtete Leichtbauplatte: 1

## Inputs
- Erneuerbare Primärenergie als Energieträger (PERE) [MJ]: A1-A3 49.0862
- Erneuerbare Primärenergie zur stofflichen Nutzung (PERM) [MJ]: A1-A3 187.623
- Total erneuerbare Primärenergie (PERT) [MJ]: A1-A3 236.709, D -29.3125
- Nicht-erneuerbare Primärenergie als Energieträger (PENRE) [MJ]: A1-A3 148.811
- Nicht-erneuerbare Primärenergie zur stofflichen Nutzung (PENRM) [MJ]: A1-A3 30.7499
- Total nicht erneuerbare Primärenergie (PENRT) [MJ]: A1-A3 179.561, D -217.097
- Einsatz von Sekundärstoffen (SM) [kg]: A1-A3 0.383, D 0
- Erneuerbare Sekundärbrennstoffe (RSF) [MJ]: A1-A3 0, D 187.623
- Nicht erneuerbare Sekundärbrennstoffe (NRSF) [MJ]: A1-A3 0, D 30.7499
- Einsatz von Süßwasserressourcen (FW) [m^3]: A1-A3 0.039696, D -0.0423975

## Outputs
- Gefährlicher Abfall zur Deponie (HWD) [kg]: A1-A3 0.00017976, D -7.62263e-5
- Entsorgter nicht gefährlicher Abfall (NHWD) [kg]: A1-A3 0.0627962, D 0.0247992
- Entsorgter radioaktiver Abfall (RWD) [kg]: A1-A3 0.00282977, D -0.0208592
- Komponenten für die Wiederverwendung (CRU) [kg]: A1-A3 0
- Stoffe zum Recycling (MFR) [kg]: A1-A3 0
- Stoffe für die Energierückgewinnung (MER) [kg]: C3 12.7
- Exportierte elektrische Energie (EEE) [MJ]
- Exportierte thermische Energie (EET) [MJ]

## Impact indicators
- Globales Erwärmungspotenzial (GWP) [kg CO_(2)-Äq.]: A1-A3 -7.85918, C3 20.4395, D -12.2991
- Abbau Potential der stratosphärischen Ozonschicht (ODP) [kg CFC11-Äq.]: A1-A3 2.74331e-10, D -5.82061e-9
- Versauerungspotenzial von Boden und Wasser (AP) [kg SO_(2)-Äq.]: A1-A3 0.0276847, D -0.00756651
- Eutrophierungspotenzial (EP) [kg PO_(4)^(3)-Äq.]: A1-A3 0.00733512, D 5.64761e-6
- Bildungspotential für troposphärisches Ozon (POCP) [kg Ethen-Äq.]: A1-A3 0.00660221, D 0.0010204
- Potenzial für den abiotischen Abbau nicht fossiler Ressourcen (ADPE) [kg Sb-Äq.]: A1-A3 7.26507e-6, D -1.40057e-6
- Potenzial für den abiotischen Abbau fossiler Brennstoffe (ADPF) [MJ]: A1-A3 172.421, D -164.733

## Use advice
Scope:
This document refers to laminated lightweight boards manufactured by Holzwerkstoffe GmbH & Co. OG in the Wörgl and St. Johann in Tirol (Austria) plants. This document is translated from the German Environmental Product Declaration into English. It is based on the German original version EPD-EGG-20150313-IBD1-DE. The verifier has no influence on the quality of the translation.
System boundary:
This is a "from cradle to factory gate, with options" EPD. The life cycle analysis for the products under consideration encompasses the following segments of the life cycle: “Product stage” and “Credits and charges beyond the limits of the product system”. The systems therefore encompass the following stages according to /EN 15804/: Product stage (module A1-A3):
Module A1 Procurement and processing of raw materials as well as processing of secondary raw materials serving as inputs
Module A2 Transportation to the manufacturer
Module A3 Production

Disposal stage (C3)
Module C3: in the sense of climate neutrality, biogenic carbon dioxide emissions are declared in C3

Credits and debits beyond the limits of the product system (module D): Module D includes the recovery potential of the net flows leaving the system border at the end of the life cycle. The product reaches the end-of-waste status after being removed from the building and 100% of it is thermally utilised in a biomass facility. The effects of the thermal utilisation and the credits of the generated energy are declared in Module D.

## Data sources
- Eurolight beschichtet.pdf
- GaBi Database (all versions)
- GaBi database SP27 2015
