# Sanitary ceramics

Dataset: ILCD process, EPD, average dataset
Geography: DE
Reference year: 2015
Valid until: 2020
Classification: OEKOBAU.DAT: Gebäudetechnik / Sanitär / Sanitärkeramik
Classification: IBUCategories: 03 Gebäudetechnik / Sanitäreinrichtungen / Sanitärkeramik
Method details: Sanitärkeramik.pdf
Owner: DURAVIT AG
Compliance: DIN EN 15804; ISO 14025
Review: Accredited third party review by IBU
Amounts: rows without a unit in brackets have none in this file; such an amount is in the reference unit of its flow, which a separate flow dataset defines
copyright: true

## General comment
Sanitary ceramic comprises in particular washbasins, bidets, toilets, urinals, cisterns and kitchen sinks. The products are primarily made of materials such as clay, kaolin, quartz and fireclay. A representative average sanitary ceramic product based on the overall mass volume by mass of the respective products for 2013 was formed for calculating the environmental impacts. After preparation of the slurry, sanitary ceramic is cast or pressed, dried, glazed and then fired.

## Technology and included processes
The raw materials supplied are dried where necessary before storage in silos. Smaller volumes of components are supplied in sacks. Slurry Some of the raw materials require mechanical treatment in a grinding process. This is followed by preparation of the slurry by mixing the raw materials with water and passing them through a sieve. Glaze The raw material mix is agitated adding water before being sieved and then ground. Glue is added shortly before processing. Mould construction The casting moulds required for production are made of either plaster or a porous plastic. Casting Small series are manufactured exclusively with plaster moulds in a manual hand mould process. Another production method involves the battery casting method, also with plaster moulds. The porous plastic moulds are used for high-pressure casting. Drying After casting, the ceramic products are directed to various drying processes depending on the respective complexity. Glazing The glaze is applied to the dry blank either manually or fully-automatically using robots. The overspray is collected, redirected and re-used in both methods. Firing In order to achieve a maximum stocking density, the glazed blanks are positioned manually on the firing trolley. The blanks are fired at over 1250 °C in a tunnel kiln for approx. 17-20 hours. Sorting After firing, each product is subject to extensive individual examination. The Duravit brand logo is applied by laser to perfect parts before the following processes are carried out: => At the customer's request, the surface is refined (Wondergliss coating). => Depending on assembly, e.g. integration in bathroom furnishings or on glass panels etc., some products may require polishing. => Packing, storage and shipping Products which do not meet the quality requirements can often be touched up and fired again in a shuttle kiln or directed to material recycling as waste. Comments => In order to ensure consistently high quality, extensive inspections are carried out, starting at delivery of the raw materials, and during all process stages. => Vibration plates are required for many products during the firing process. These are largely manufactured from the filter cake incurred in the internal waste water treatment plant. => As a general rule, the aim is to achieve a high recycling rate among waste and to increase this rate continuously. In accordance with the criteria of the Recycling Law, the rate during the period under review was 76%. => The production facility in Hornberg is certified to /ISO 9001/ and /ISO 14001/ as well as /DIN EN ISO 50001/. => Within the framework of energy management, optimisations are continuously striven towards in terms of energy consumption. In 2014, a micro gas turbine was commissioned with a firing output of 330 kW. By generating 200 kW heat and max. 100 kW electricity, a significant contribution is made towards decentralised energy supply.
Technical data:
Sanitary ceramic is subject to the following (structural) technical data (details as L x W x H):
Other technical data in accordance with the PCR Part B are not of relevance for the sanitary ceramic product group.
Declared unit:
A declared unit of 1 tonne is taken as a basis for calculating the LCA for sanitary ceramic. All environmental impacts by the product relate to one tonne (t) of sanitary ceramic. Section 2.5 provides an overview of the mass per product.

A manufacturer declaration for an average product at a DURAVIT sanitary ceramic location is drawn up as a basis for the environmental impacts. On account of comparable manufacturing methods, an average product representing washbasins, bidets, toilets, urinals, cisterns and kitchen sinks is formed on the basis of the overall sales volume of the respective products for 2013.

Packaging is defined with an average weight of 61.2 kg per declared unit.

## Technical purpose
The group of sanitary ceramic comprises in particular washbasins, bidets, toilets, urinals and cisterns. These products represent bathroom furnishings and are used for personal hygiene in particular. On account of the comparable manufacturing process, kitchen sinks can also be allocated to this group. Kitchen sinks also represent furnishing products.

## Reference product
- Sanitärkeramik: 1000

## Inputs
- Erneuerbare Primärenergie als Energieträger (PERE) [MJ]: A1-A3 3841
- Erneuerbare Primärenergie zur stofflichen Nutzung (PERM) [MJ]: A1-A3 0
- Total erneuerbare Primärenergie (PERT) [MJ]: A1-A3 3841
- Nicht-erneuerbare Primärenergie als Energieträger (PENRE) [MJ]: A1-A3 23522
- Nicht-erneuerbare Primärenergie zur stofflichen Nutzung (PENRM) [MJ]: A1-A3 0
- Total nicht erneuerbare Primärenergie (PENRT) [MJ]: A1-A3 23522
- Einsatz von Sekundärstoffen (SM) [kg]: A1-A3 0
- Erneuerbare Sekundärbrennstoffe (RSF) [MJ]: A1-A3 0
- Nicht erneuerbare Sekundärbrennstoffe (NRSF) [MJ]: A1-A3 0
- Einsatz von Süßwasserressourcen (FW) [m^3]: A1-A3 155

## Outputs
- Gefährlicher Abfall zur Deponie (HWD) [kg]
- Entsorgter nicht gefährlicher Abfall (NHWD) [kg]: A1-A3 85
- Entsorgter radioaktiver Abfall (RWD) [kg]
- Komponenten für die Wiederverwendung (CRU) [kg]
- Stoffe zum Recycling (MFR) [kg]
- Stoffe für die Energierückgewinnung (MER) [kg]
- Exportierte elektrische Energie (EEE) [MJ]
- Exportierte thermische Energie (EET) [MJ]

## Impact indicators
- Globales Erwärmungspotenzial (GWP) [kg CO_(2)-Äq.]: A1-A3 746.06
- Abbau Potential der stratosphärischen Ozonschicht (ODP) [kg CFC11-Äq.]: A1-A3 7.06e-6
- Versauerungspotenzial von Boden und Wasser (AP) [kg SO_(2)-Äq.]: A1-A3 1.49
- Eutrophierungspotenzial (EP) [kg PO_(4)^(3)-Äq.]: A1-A3 0.28
- Bildungspotential für troposphärisches Ozon (POCP) [kg Ethen-Äq.]: A1-A3 0.22
- Potenzial für den abiotischen Abbau nicht fossiler Ressourcen (ADPE) [kg Sb-Äq.]: A1-A3 0.00187
- Potenzial für den abiotischen Abbau fossiler Brennstoffe (ADPF) [MJ]: A1-A3 22189.3

## Use advice
Scope:
The object of this study is to draw up an LCA for DURAVIT AG sanitary ceramic, including packaging, produced at the Hornberg location in Germany. Owing to comparable manufacturing methods, an average product representing washbasins, bidets, toilets, urinals, cisterns and kitchen sinks is formed on the basis of the overall sales volume of the respective products for 2013.
System boundary:
The system boundaries contain all relevant process steps during the manufacture of sanitary ceramic within a cradle-to-gate review. This means that in accordance with the PCR document on which they are based, all processes to the factory gate are considered (Product stage A1-A3). Subsequent transport of the product to the construction site is no longer included in the calculation.

As a general rule, the system can be divided into three main processes:

· Provision and production of preliminary products and packaging materials (Module A1)

· Transport of preliminary products and packaging materials to the plant (Module A2)

· Production of sanitary ceramic as well as processing and disposal of production waste (Module A3)

The following graphic depicts a summarising overview of the system boundaries in this study:

## Data sources
- Sanitärkeramik.pdf
- GaBi Database (all versions)
- GaBi database SP26 2014
