# PE - Schaum ummantelte Kupfer-Hausinstallationsrohre

Dataset: ILCD process, EPD, average dataset
Geography: DE
Reference year: 2015
Valid until: 2020
Classification: OEKOBAU.DAT: Metalle / Kupfer / Kupferrohre
Classification: IBUCategories: 02 Bauprodukte / Metallbauprodukte und Zubehör / Metallrohre für Hausinstallationen
Method details: Metallrohre für Hausinstallationen.pdf
Owner: KME
Compliance: DIN EN 15804; ISO 14025
Review: Accredited third party review by IBU
Amounts: rows without a unit in brackets have none in this file; such an amount is in the reference unit of its flow, which a separate flow dataset defines
copyright: true

## General comment
Dieses Dokument bezieht sich auf wärmegedämmte KME-Markenkupferrohre. Für die Herstellung von Installationsrohren wird bei KME Kupfer der sauerstofffreien Qualität Cu-DHP nach /DIN EN1057/EN 1057:2006+A1:2010 Kupfer und Kupferlegierungen — Nahtlose Rundrohre aus Kupfer für Wasser- und Gasleitungen für Sanitärinstallationen und Heizungsanlagen eingesetzt. Bei Cu-DHP handelt es sich um desoxidiertes Kupfer mit begrenzt hohem Phosphorgehalt (maximal 0,040 %), welches sich durch seine sehr gute Schweiß- und Lötbarkeit auszeichnet. Der Reinheitsgrad beträgt

mindestens 99,90 % Kupfer.

Folgende Marken werden von KME angeboten:

Tabelle 1: Ummantelte Markenkupfer – Hausinstallationsrohre

Die deklarierte Einheit umfasst die Herstellung und Aufbereitung von einem Kilogramm ummanteltem Kupferrohr (PE-Schaum Ummantelung) mit durchschnittlichem Ummantelungsanteil. Basis für die Berechnung der Ergebnisse sind die jeweils angegebenen produzierten Jahresmengen an ummantelten Kupferrohren. Die Ergebnisse basieren dabei auf gemittelten Werten, die sich anhand der Jahresproduktionsmengen zusammensetzen.

Zur Umrechnung der Bezugsgröße sind in den Tabellen 4 das Gewicht, und für eine mögliche spätere Berechnung von Wärmeverlusten der Installation die Außenfläche des Rohres pro Meter im Lieferzustand angegeben.

## Technology and included processes
Grundstoffe Vorprodukte Die Hausinstallationsrohre bestehen aus 100 Masse-% aus Cu-DHP, d.h. sauerstofffreiem phosphor- desoxidiertem Kupfer mit begrenztem Restphospho- rgehalt. Der Reinheitsgrad beträgt mindestens 99,90 % Kupfer. Bei den eingesetzten Kunststoff- Ummantelungen handelt es sich um Polyethylen (PE). Hilfsstoffe / Zusatzmittel Nachfolgend sind alle Hilfsstoffe/ Zusatzmaterialien, die während der Produktion eingesetzt werden, aufgeführt. Hilfsstoffe: Eingesetzte Ziehmittel: 2,6 g/kg Kupfer 5 Umwelt Produktdeklaration KME Germany GmbH & Co. KG – PE - Schaum ummantelte Kupfer-Hausinstallationsrohre Stofferläuterung: Stoffzusammensetzung der verwendeten Materialien (Grundstoffe/ Vorprodukte und Hilfsstoffe/Zusatzmittel). Kupfer Cu-DHP; EN-Nr. CW 024A - Werkstoff Reinkupfer Cu-DHP; EN-Nr. CW 024A - Zusammensetzung 99,90 % Cu + Ag - Phosphor 0,015-0,040 % Ziehmittel bestehen aus hochtemperaturbeständigen mineralölhaltigen und synthetischen Ölen, die als Kühl- und Schmiermittel während des Ziehprozesses dienen. Ummantelung: Die eingesetzten PE-Ummantelungen basieren auf folgender Rezeptur: - 94-99 % LDPE - 1-4 %Additive: o Farbgranulat o Stabilisator o Flammschutz o UV-Schutz Fertigung von ummantelten KME-Kupferrohren: KME –Kupferrohre mit PE-Wärmedämmung: WICU® Flex, WICU® Clim, WICU® Frio In der ersten Stufe der Kupferrohrproduktion wird aus einem Rundbolzen durch Warmumformen ein Vorrohr erstellt. Dieses wird im Anschluss im Ziehverfahren kalt weitergearbeitet. Das Glühen und Fertigziehen erfolgt je nach Festigkeitsstufe. Harte und halbharte Rohre durchlaufen zusätzlich eine Richtanlage. Nach einer abschließenden Prüfung werden die Rohre gekennzeichnet. Zur Ummantelung wird PE Granulat mit einer bestimmten Dichte unter Beigabe von Flamm- und UV- Schutz Zusätzen unter Verwendung eines Schäum- gases zu aufgeschäumtem Band extrudiert. Anschließend wird der Dämmschaum um das Kupferrohr gewickelt und verklebt. Nach einer abschließenden Prüfung werden die Rohre gekennzeichnet, abgelängt und verpackt. Gütesicherung: Eigenüberwachung durch den Hersteller mit Qualitätsmanagementsystem nach /DIN EN ISO 9001/ sowie Fremdüberwachung durch Lloyds Register, Gütegemeinschaft Kupferrohre e.V., DVGW und andere nationale europäische Überwachungsinstitutionen, wie KIWA, CSTB, etc.
Technische Daten:
Prüfnormen/Produktnormen/Zulassungen:

/DIN EN 1057/, , /DIN EN 12735/1/, /DVGW-GW 392/, /RAL-Gütezeichen der Gütegemeinschaft Kupferrohre/, /Energie-einsparverordnung/.

Tabelle 2: Physikalische Eigenschaften von Ummantelungen bei KME-Kupferrohren
Deklarierte Einheit:
Die Deklaration bezieht sich auf die Herstellung und das Recycling von einem Kilogramm Kupferrohr (PU-Schaum ummantelt).

Tabelle 5: Überblick zu den Produktgruppen, Firmennamen, Produktionsstätten und Art der Durchschnittsbildung

Der Durchschnitt wurde auf Basis der jährlichen Produktionsmenge gebildet.

## Technical purpose
Die Einsatzzwecke der deklarierten Markenkupferrohre sind Transport von:

- Trinkwasser kalt, warm, Zirkulation

- Regenwasser

- Grauwasser

- Wärmeträgern in Heizung, Flächenheizung, Flächenkühlung und Solarthermie

- Kältemittel

- Gas und Flüssiggas

- Öl

## Reference product
- 1 kg PE-Schaum ummanteltes Kupferrohr: 1

## Inputs
- Erneuerbare Primärenergie als Energieträger (PERE) [MJ]: A1-A3 4.36, C4 0.0193, D -1.33
- Erneuerbare Primärenergie zur stofflichen Nutzung (PERM) [MJ]: A1-A3 0
- Total erneuerbare Primärenergie (PERT) [MJ]: A1-A3 4.36, C4 0.0193, D -1.33
- Nicht-erneuerbare Primärenergie als Energieträger (PENRE) [MJ]: A1-A3 38.7, C4 0.212, D -9.41
- Nicht-erneuerbare Primärenergie zur stofflichen Nutzung (PENRM) [MJ]: A1-A3 0
- Total nicht erneuerbare Primärenergie (PENRT) [MJ]: A1-A3 38.7, C4 0.212, D -9.41
- Einsatz von Sekundärstoffen (SM) [kg]: A1-A3 0, C4 0, D 0
- Erneuerbare Sekundärbrennstoffe (RSF) [MJ]: A1-A3 0, C4 0, D 0
- Nicht erneuerbare Sekundärbrennstoffe (NRSF) [MJ]: A1-A3 0, C4 0, D 0
- Einsatz von Süßwasserressourcen (FW) [m^3]: A1-A3 0.0128, C4 0.000882, D -0.00499

## Outputs
- Gefährlicher Abfall zur Deponie (HWD) [kg]: A1-A3 0.00325, C4 2.56e-5, D -0.000717
- Entsorgter nicht gefährlicher Abfall (NHWD) [kg]: A1-A3 0.029, C4 0.108, D -0.00463
- Entsorgter radioaktiver Abfall (RWD) [kg]: A1-A3 0.00147, C4 9.84e-6, D -0.000373
- Komponenten für die Wiederverwendung (CRU) [kg]: A1-A3 0, C4 0
- Stoffe zum Recycling (MFR) [kg]: A1-A3 0, C4 0
- Stoffe für die Energierückgewinnung (MER) [kg]: A1-A3 0, C4 0
- Exportierte elektrische Energie (EEE) [MJ]: A1-A3 0, C4 0
- Exportierte thermische Energie (EET) [MJ]: A1-A3 0, C4 0

## Impact indicators
- Globales Erwärmungspotenzial (GWP) [kg CO_(2)-Äq.]: A1-A3 2.29, C4 0.377, D -0.868
- Abbau Potential der stratosphärischen Ozonschicht (ODP) [kg CFC11-Äq.]: A1-A3 9.51e-11, C4 4.65e-13, D -1.29e-11
- Versauerungspotenzial von Boden und Wasser (AP) [kg SO_(2)-Äq.]: A1-A3 0.00816, C4 9.82e-5, D -0.00363
- Eutrophierungspotenzial (EP) [kg PO_(4)^(3)-Äq.]: A1-A3 0.000745, C4 8.19e-6, D -0.000324
- Bildungspotential für troposphärisches Ozon (POCP) [kg Ethen-Äq.]: A1-A3 0.000652, C4 5.58e-6, D -0.000218
- Potenzial für den abiotischen Abbau nicht fossiler Ressourcen (ADPE) [kg Sb-Äq.]: A1-A3 1.25e-5, C4 5.44e-8, D -7.11e-6
- Potenzial für den abiotischen Abbau fossiler Brennstoffe (ADPF) [MJ]: A1-A3 34.9, C4 0.187, D -8.43

## Use advice
Gültigkeitsbereich:
Die vorliegende EPD ist eine Durchschnitts - EPD. Die für die Berechnung der Ökobilanz verwendeten Werte stammen von zwei Herstellern. Die Produktionsstandorte sind Osnabrück und Ulm.
Systemgrenze:
Die Lebenszyklusanalyse für die Herstellung der betrachteten Kupferrohre umfasst die Lebenswegabschnitte „von der Wiege bis zum Werkstor" (cradle to gate) mit Option.

Produktionsstadium

Module A1-A3 betrachtet: Die Bereitstellung von Rohmaterialen, Hilfsstoffen und Energien, Transport von Rohmaterialien und Hilfsstoffen Herstellprozess im Werk inklusive energetischen Aufwendungen, Herstellung von Hilfsstoffen, Entsorgung von anfallenden Reststoffen und der Berücksichtigung von auftretenden Werksemissionen. Kreislaufführung von Produktionsschrotten.

Module C4 beinhaltet die Emissionen im End-of-Life bei der Verbrennung und Deponierung.

Für Kupferschrott wird angenommen, dass der "end-of-waste" Status nach dem Sortieren und Schreddern beim Abriss oder in den Abfallbehandlungsanlagen erreicht ist.

In Modul D werden Wiederverwendung und Recycling von Kupferschrott auf Basis der Netto-Schrottmenge im End-of-Life betrachtet.

## Data sources
- PE - Schaum ummantelte Kupfer-Hausinstallationsrohre.pdf
- GaBi Database (all versions)
- GaBi database SP20 2013
