# EPS-Hartschaum (grau) mit Wärmestrahlungsabsorber

Dataset: ILCD process, EPD, average dataset
Geography: DE
Reference year: 2015
Valid until: 2020
Classification: OEKOBAU.DAT: Dämmstoffe / Expandiertes Polystyrol (EPS) / EPS grau
Classification: IBUCategories: 02 Bauprodukte / Wärmedämmungsprodukte / Dämmstoffe aus Schaumkunststoffen
Method details: Dämmstoffe aus Schaumkunststoffen.pdf
Owner: IVH
Compliance: DIN EN 15804; ISO 14025
Review: Accredited third party review by IBU
Amounts: rows without a unit in brackets have none in this file; such an amount is in the reference unit of its flow, which a separate flow dataset defines
copyright: true

## General comment
In dieser Umwelt-Produktdeklaration (EPD) werden Hartschaum-Dämmstoffprodukte aus expandiertem Polystyrol (EPS) der IVH-Mitglieder beschrieben.

Das Verbandszeichen für EPS-Produkte der IVH-Mitglieder ist Styropor®. Diese Produkte werden für den Wärme- und Schallschutz von Gebäuden eingesetzt.

Hergestellt werden sie werkmäßig in Form von Platten oder als loser, wärmedämmender Füllstoff. Die vorlie-gende EPD beschreibt silbergraue EPS-Hartschaum-produkte zur Wärme- und Schalldämmung. Die silber-grauen Dämmstoffe sind mit Infrarotstrahlungsabsor-bern ausgestattet, die eine erhebliche Steigerung der Dämmleistung bewirken.

EPS-Hartschaum ist ein fester Dämmstoff mit Zell-struktur, der aus verschweißtem, geblähtem Polystyrol oder einem seiner Co-Polymere hergestellt wird. Er hat eine geschlossenzellige, mit Luft gefüllte Struktur (98 % Luft).

EPS-Platten sind harte Dämmstoffprodukte (geschnit-ten, geformt oder kontinuierlich geschäumt) mit recht-winkliger Form. Die Plattenkanten können mit Stufen-falz oder Nut und Feder ausgestattet sein. EPS als loser Füllstoff wird in Form luftgefüllter Perlen (Ø ca. 6 mm) werkmäßig hergestellt.

Diese Umwelt-Produktdeklaration betrachtet den homogenen EPS-Dämmstoff ohne Materialkombi-nation zu Verbundplatten oder kaschierten Dämm-platten.

Wesentliche kennzeichnende Eigenschaften sind die Wärmeleitfähigkeit, die Druckfestigkeit und die Schalldämmung

## Technology and included processes
EPS-Hartschaum / Styropor mit dem Flammschutzmittel Polymer-FR ist ein fester, HBCD-freier Dämmstoff mit Zellstruktur, der aus verschweißtem, geblähtem Polystyrol oder einem seiner Co-Polymere hergestellt wird. Er hat eine geschlossenzellige, mit Luft gefüllte Struktur (98 % Luft). EPS-Platten sind harte Dämmstoffprodukte (geschnitten, geformt oder kontinuierlich geschäumt) mit rechtwinkliger Form. Die Plattenkanten können mit Stufenfalz oder Nut und Feder ausgestattet sein. EPS als loser Füllstoff wird in Form luftgefüllter Perlen (Ø ca. 6 mm) werkmäßig hergestellt.
Technische Daten:
Folgende (bau)technische Daten im Lieferzustand sind für das deklarierte Produkt relevant.
Deklarierte Einheit:
Die deklarierte Einheit ist 1 m³ expandierter, unverpackter Polystyrol-Hartschaum (grau) mit Wärmestrahlungsabsorber mit Polymer-FR als Flammschutzmitel. Die durchschnittliche Rohdichte beträgt 16,6 kg/m³.

Die gemittelte Rohdichte für die Produktgruppe ergibt sich aus der Aufteilung der Herstellerdaten für die einzelnen Rohdichten und der Zusammenführung mittels Anwendungsbereichen und Marktanteilen der berücksichtigten Unternehmen.

## Technical purpose
Hauptanwendungsgebiet für die hier deklarierten Produkte ist die Fassadendämmung mit Wärmedämm-Verbundsystemen (WDVS).

Die außenseitige Fassadendämmung der Gebäude-hülle durch Wärmedämm-Verbundsysteme umfasst ca. 40 % der Gesamtdämmung der Gebäude.

## Reference product
- 1m3 EPS-Hartschaum Strahlungsabsorber: 1

## Inputs
- Erneuerbare Primärenergie als Energieträger (PERE) [MJ]: A1-A3 21.8
- Erneuerbare Primärenergie zur stofflichen Nutzung (PERM) [MJ]: A1-A3 0
- Total erneuerbare Primärenergie (PERT) [MJ]: A1-A3 21.8, A4 0.664, C4 0.597, D -42
- Nicht-erneuerbare Primärenergie als Energieträger (PENRE) [MJ]: A1-A3 762.64
- Nicht-erneuerbare Primärenergie zur stofflichen Nutzung (PENRM) [MJ]: A1-A3 657.36
- Total nicht erneuerbare Primärenergie (PENRT) [MJ]: A1-A3 1420, A4 11.2, C4 6.48, D -438
- Einsatz von Sekundärstoffen (SM) [kg]: A1-A3 0, A4 0, C4 0
- Erneuerbare Sekundärbrennstoffe (RSF) [MJ]: A1-A3 0, A4 0, C4 0, D 0
- Nicht erneuerbare Sekundärbrennstoffe (NRSF) [MJ]: A1-A3 0, A4 0, C4 0, D 0
- Einsatz von Süßwasserressourcen (FW) [m^3]: A1-A3 0.216, A4 0.00064, C4 0.105, D -0.0653

## Outputs
- Gefährlicher Abfall zur Deponie (HWD) [kg]: A1-A3 0.0114, A4 0, C4 0.0531, D 0
- Entsorgter nicht gefährlicher Abfall (NHWD) [kg]: A1-A3 2.19, A4 0.00222, C4 0.0199, D -0.165
- Entsorgter radioaktiver Abfall (RWD) [kg]: A1-A3 0.0164, A4 1.61e-5, C4 0.000358, D -0.025
- Komponenten für die Wiederverwendung (CRU) [kg]: A1-A3 0, A4 0, C4 0
- Stoffe zum Recycling (MFR) [kg]: A1-A3 0, A4 0, C4 0
- Stoffe für die Energierückgewinnung (MER) [kg]: A1-A3 0, A4 0, C4 0
- Exportierte elektrische Energie (EEE) [MJ]: A1-A3 0, A4 0, C4 88
- Exportierte thermische Energie (EET) [MJ]: A1-A3 0, A4 0, C4 210

## Impact indicators
- Globales Erwärmungspotenzial (GWP) [kg CO_(2)-Äq.]: A1-A3 49.7, A4 0.819, C4 55.6, D -28.7
- Abbau Potential der stratosphärischen Ozonschicht (ODP) [kg CFC11-Äq.]: A1-A3 2.5e-7, A4 1.71e-11, C4 1.94e-10, D -8.72e-9
- Versauerungspotenzial von Boden und Wasser (AP) [kg SO_(2)-Äq.]: A1-A3 0.113, A4 0.00225, C4 0.00312, D -0.0398
- Eutrophierungspotenzial (EP) [kg PO_(4)^(3)-Äq.]: A1-A3 0.0105, A4 0.000517, C4 0.000661, D -0.00447
- Bildungspotential für troposphärisches Ozon (POCP) [kg Ethen-Äq.]: A1-A3 0.384, A4 -0.00067, C4 0.000387, D -0.00365
- Potenzial für den abiotischen Abbau nicht fossiler Ressourcen (ADPE) [kg Sb-Äq.]: A1-A3 1.88e-5, A4 3.77e-8, C4 3.16e-7, D -2.98e-6
- Potenzial für den abiotischen Abbau fossiler Brennstoffe (ADPF) [MJ]: A1-A3 1380, A4 11.2, C4 5.62, D -378

## Use advice
Gültigkeitsbereich:
Die vorliegende EPD beschreibt die EPS-Hartschaumprodukte mit Wärmestrahlungsabsorber zur Wärme- und Schalldämmung von Wänden und Dächern. Die teilnehmenden Mitgliedsunternehmen repräsentieren für das Jahr 2012 mit ihrer Produktion 54 % (nach Masse) der Gesamtmenge aller IVH-Mitgliedsunternehmen. Diese EPD ist nur gültig für Produkte mit dem Flammschutzmittel Polymer-FR. Der Inhaber der Deklaration haftet für die zugrundeliegenden Angaben und Nachweise; eine Haftung des IBU in Bezug auf Herstellerinformationen, Ökobilanzdaten und Nachweise ist ausgeschlossen.
Systemgrenze:
Typ der EPD: Wiege-bis-Werkstor mit Optionen

Die Umweltproduktdeklaration bezieht sich auf die folgenden Lebenszyklusabschnitte

Rohstoffbereitstellung (A1)
Transport (A2)
Herstellung (A3)
Transporte zur Baustelle (A4)
Thermische Verwertung des Produktes (C4)
Gutschriften für das nächste Produktsystem (D): Gutschriften für elektrische und thermische Energie aus der energetischen Verwertung des Produktes

## Data sources
- EPS-Hartschaum (grau) mit Wärmestrahlungsabsorber.pdf
- GaBi Database (all versions)
- GaBi database SP20 2013
