# Tageslichtsysteme - LAMILUX Heinrich Strunz GmbH - Flachdach Fenster F100

Dataset: ILCD process, EPD, specific dataset
Geography: DE
Reference year: 2018
Valid until: 2024
Classification: Komponenten von Fenstern und Vorhangfassaden / Füllungen / Transparente Füllungen
Classification: OEKOBAU.DAT: Komponenten von Fenstern und Vorhangfassaden / Füllungen / Transparente Füllungen
Method details: EN 15804; EPD Flachdach Fenster FE, Flachdach Fenster F100, Flachdach Fenster FE Passivhaus und Rauchlift ME
Owner: LAMILUX Heinrich Strunz GmbH
Compliance: EN 15804
Review: Independent external review by Dr.-Ing. Carolin Roth
Amounts: rows without a unit in brackets have none in this file; such an amount is in the reference unit of its flow, which a separate flow dataset defines
copyright: true

## General comment
Dieser Datensatz beinhaltet die Ergebnisse für die Module A1-A3 sowie die Module A4, A5, B2, B3, C2, C3, C4, D gemäß EN 15804. Ein Vergleich mit anderen Produkten ist nur mit einer vergleichbaren Anwendung im Gebäude zulässig. Grundsätzlich ist eine Gegenüberstellung oder die Bewertung von EPD Daten nur möglich, wenn alle zu vergleichenden Datensätze nach EN 15804 erstellt wurden und der Gebäudekontext, bzw. die produktspezifischen Leistungsmerkmale berücksichtigt werden.

## Geography
Dieser Datensatz repräsentiert die Situation des Unternehmens LAMILUX Heinrich Strunz GmbH in 95111 Rehau, im Hinblick auf die wichtigsten Technologien und die gesetzlichen Rahmenbedingungen.

## Time period
jährlicher Durchschnitt

## Technology and included processes
Die Ökobilanzergebnisse umfassen die Lebenszyklusstadien der Herstellung der Vorprodukte bis hin zur Rohstoffgewinnung und Verarbeitungsprozesse von als Input dienenden Sekundärstoffen (z.B. Recyclingprozesse), deren Transporte zum Werk sowie die Produktion selbst, einschließlich der Bereitstellung von allen Hilfs- und Betriebsstoffen, Energie, sowie die vollständige Abfallbehandlung oder die Deponierung der Restabfälle während des Stadiums der Produktion. Die Module A1, A2 und A3 sind hier als ein aggregiertes Modul A1-A3 ausgewiesen. Falls für diesen Datensatz weitere Module berechnet wurden, sind diese separat zu finden und können für eine Betrachtung des gesamten Lebenszyklus zusammengeführt werden.

## Technical purpose
Tageslichtsysteme zur Erhöhung des Tageslichteinfalls und zur natürlichen Be- und Entlüftung.

## Reference product
- Tageslichtsysteme - LAMILUX Heinrich Strunz GmbH - Flachdach Fenster F100: 1

## Inputs
- Use of net fresh water (FW) [m3]: A1-A3 3.55, A4 0.00806, A5 0.13, B2 0.000593, B3 0.0392, C2 0.000213, C3 15.5, C4 -6.95e-5, D -0.19
- Use of non renewable primary energy (PENRE) [MJ]: A1-A3 1750, A4 103, A5 23.7, B2 13.5, B3 106, C2 2.73, C3 644, C4 0.77, D -966
- Use of non renewable primary energy resources used as raw materials (PENRM) [MJ]: A1-A3 600, A4 0, A5 -8, B2 0, B3 0, C2 0, C3 -592, C4 0, D 0
- Use of non renewable secondary fuels (NRSF) [MJ]: A1-A3 0, A4 0, A5 0, B2 0, B3 0, C2 0, C3 0, C4 0, D 0
- Use of renewable primary energy (PERE) [MJ]: A1-A3 106, A4 6.95, A5 651, B2 0.2, B3 5.53, C2 0.18, C3 4.61, C4 0.0865, D -103
- Use of renewable primary energy resources used as raw materials (PERM) [MJ]: A1-A3 649, A4 0, A5 -649, B2 0, B3 0, C2 0, C3 0, C4 0, D 0
- Use of renewable secondary fuels (RSF) [MJ]: A1-A3 0, A4 0, A5 0, B2 0, B3 0, C2 0, C3 0, C4 0, D 0
- Use of secondary material (SM) [kg]: A1-A3 0, A4 0, A5 0, B2 0, B3 0, C2 0, C3 0, C4 0, D -25.3
- Total use of non renewable primary energy resource (PENRT) [MJ]: A1-A3 2350, A4 103, A5 15.7, B2 13.5, B3 106, C2 2.73, C3 52.2, C4 0.77, D -966
- Total use of renewable primary energy resources (PERT) [MJ]: A1-A3 755, A4 6.95, A5 2.48, B2 0.2, B3 5.53, C2 0.18, C3 4.61, C4 0.0865, D -103

## Outputs
- Components for re-use (CRU) [kg]: A1-A3 0, A4 0, A5 0, B2 0, B3 0, C2 0, C3 0, C4 0, D 0
- Exported electrical energy (EEE) [MJ]: A1-A3 0, A4 0, A5 64.8, B2 0, B3 0, C2 0, C3 52.6, C4 0, D 0
- Exported thermal energy (EET) [MJ]: A1-A3 0, A4 0, A5 152, B2 0, B3 0, C2 0, C3 125, C4 0, D 0
- Hazardous waste disposed (HWD) [kg]: A1-A3 7.81e-6, A4 6.62e-6, A5 2.43e-8, B2 0.00417, B3 8.12e-6, C2 1.75e-7, C3 3.92e-6, C4 1.07e-8, D -2.99e-7
- Materials for energy recovery (MER) [kg]: A1-A3 0, A4 0, A5 0, B2 0, B3 0, C2 0, C3 0, C4 0, D 0
- Materials for recycling (MFR) [kg]: A1-A3 0, A4 0, A5 0, B2 0, B3 0, C2 0, C3 29.9, C4 0, D 0
- Non hazardous waste dispose (NHWD) [kg]: A1-A3 4.8, A4 0.0077, A5 2.09, B2 0.00846, B3 0.67, C2 0.000204, C3 1.52, C4 3.4, D -0.86
- Radioactive waste disposed (RWD) [kg]: A1-A3 0.0544, A4 0.000125, A5 0.000518, B2 5.11e-5, B3 0.00264, C2 3.3e-6, C3 0.000607, C4 1.14e-5, D -0.0492

## Impact indicators
- Abiotic depletion potential for non fossil resources (ADPE) [kg Sb-Äqv.]: A1-A3 0.00115, A4 7.97e-7, A5 7.54e-7, B2 6.68e-8, B3 0.000228, C2 2.11e-8, C3 9.05e-6, C4 2.06e-8, D -0.000148
- Abiotic depletion potential for fossil resources (ADPF) [MJ]: A1-A3 2210, A4 103, A5 14.4, B2 13.4, B3 98.7, C2 2.73, C3 35.9, C4 0.74, D -843
- Acidification potential of soil and water (AP) [kg SO2-Äqv.]: A1-A3 0.37, A4 0.0322, A5 0.00732, B2 0.000697, B3 0.0221, C2 0.000816, C3 0.0465, C4 0.00032, D -0.29
- Eutrophication potential (EP) [kg Phosphat-Äqv.]: A1-A3 0.0579, A4 0.00819, A5 0.00195, B2 0.00012, B3 0.00111, C2 0.000207, C3 0.00775, C4 4.46e-5, D -0.0309
- Global warming potential (GWP) [kg CO2-Äqv.]: A1-A3 74.4, A4 7.64, A5 58.4, B2 0.32, B3 6.36, C2 0.2, C3 37.6, C4 0.0795, D -59
- Depletion potential of the stratospheric ozone layer (ODP) [kg CFC 11 eq.]: A1-A3 2.79e-7, A4 1.61e-13, A5 5.98e-13, B2 1.26e-11, B3 6.33e-8, C2 4.28e-15, C3 1.48e-7, C4 6.15e-12, D -1.86e-7
- Formation potential of tropospheric ozone (POCP) [kg Ethen-Äqv.]: A1-A3 0.0366, A4 -0.0123, A5 0.00173, B2 9.05e-5, B3 0.00188, C2 -0.000311, C3 0.00102, C4 3.19e-5, D -0.0173

## Use advice
A1-A3 sowie Module A4, A5, B2, B3, C2, C3, C4, D. Das Umweltprofil beinhaltet die Aufwendungen für die Lebenszyklus-Stadien cradle to gate mit Optionen (Modul A1-A3). Die Herstellung der Verpackung wurde innerhalb der Module A1-A3 berücksichtigt.

## Review details
Die angewendete LCI Methode ist in Übereinstimmung mit ISO 14040 und 14044. Die Dokumentation enthält alle relevanten Informationen im Hinblick auf die Datenqualität und den Umfang der Anwendung der jeweiligen LCI Ergebnisse bzw. der Datensätze. Der Datensatz repräsentiert den Stand der Technik bezogen auf die funktionelle Einheit.

## Data sources
- GaBi database (all versions)
- EPD Flachdach Fenster FE, Flachdach Fenster F100, Flachdach Fenster FE Passivhaus und Rauchlift ME
