# Tageslichtsysteme - LAMILUX Heinrich Strunz GmbH - Flachdach Fenster FE

Dataset: ILCD process, EPD, specific dataset
Geography: DE
Reference year: 2018
Valid until: 2024
Classification: Komponenten von Fenstern und Vorhangfassaden / Füllungen / Transparente Füllungen
Classification: OEKOBAU.DAT: Komponenten von Fenstern und Vorhangfassaden / Füllungen / Transparente Füllungen
Synonyms: Glaselement
Method details: EN 15804; EPD Flachdach Fenster FE, Flachdach Fenster F100, Flachdach Fenster FE Passivhaus und Rauchlift ME
Owner: LAMILUX Heinrich Strunz GmbH
Compliance: EN 15804
Review: Independent external review by Dr.-Ing. Carolin Roth
Amounts: rows without a unit in brackets have none in this file; such an amount is in the reference unit of its flow, which a separate flow dataset defines
copyright: true

## General comment
Dieser Datensatz beinhaltet die Ergebnisse für die Module A1-A3 sowie die Module A4, A5, B2, B3, C2, C3, C4, D gemäß EN 15804. Ein Vergleich mit anderen Produkten ist nur mit einer vergleichbaren Anwendung im Gebäude zulässig. Grundsätzlich ist eine Gegenüberstellung oder die Bewertung von EPD Daten nur möglich, wenn alle zu vergleichenden Datensätze nach EN 15804 erstellt wurden und der Gebäudekontext, bzw. die produktspezifischen Leistungsmerkmale berücksichtigt werden.

## Geography
Dieser Datensatz repräsentiert die Situation des Unternehmens LAMILUX Heinrich Strunz GmbH in 95111 Rehau, im Hinblick auf die wichtigsten Technologien und die gesetzlichen Rahmenbedingungen.

## Time period
jährlicher Durchschnitt

## Technology and included processes
Die Ökobilanzergebnisse umfassen die Lebenszyklusstadien der Herstellung der Vorprodukte bis hin zur Rohstoffgewinnung und Verarbeitungsprozesse von als Input dienenden Sekundärstoffen (z.B. Recyclingprozesse), deren Transporte zum Werk sowie die Produktion selbst, einschließlich der Bereitstellung von allen Hilfs- und Betriebsstoffen, Energie, sowie die vollständige Abfallbehandlung oder die Deponierung der Restabfälle während des Stadiums der Produktion. Die Module A1, A2 und A3 sind hier als ein aggregiertes Modul A1-A3 ausgewiesen. Falls für diesen Datensatz weitere Module berechnet wurden, sind diese separat zu finden und können für eine Betrachtung des gesamten Lebenszyklus zusammengeführt werden.

## Technical purpose
Tageslichtsysteme zur Erhöhung des Tageslichteinfalls und zur natürlichen Be- und Entlüftung.

## Reference product
- Tageslichtsysteme - LAMILUX Heinrich Strunz GmbH - Flachdach Fenster FE: 1

## Inputs
- Use of net fresh water (FW) [m3]: A1-A3 5.32, A4 0.009, A5 0.128, B2 0.000707, B3 0.0391, C2 0.000154, C3 18.4, C4 -0.00011, D -1.03
- Use of non renewable primary energy (PENRE) [MJ]: A1-A3 3720, A4 115, A5 23.6, B2 16.1, B3 106, C2 1.97, C3 539, C4 2.65, D -2140
- Use of non renewable primary energy resources used as raw materials (PENRM) [MJ]: A1-A3 584, A4 0, A5 -8, B2 0, B3 0, C2 0, C3 627, C4 0, D 0
- Use of non renewable secondary fuels (NRSF) [MJ]: A1-A3 0, A4 0, A5 0, B2 0, B3 0, C2 0, C3 0, C4 0, D 0
- Use of renewable primary energy (PERE) [MJ]: A1-A3 596, A4 7.76, A5 650, B2 0.24, B3 5.53, C2 0.13, C3 3.98, C4 0.23, D -483
- Use of renewable primary energy resources used as raw materials (PERM) [MJ]: A1-A3 648, A4 0, A5 -648, B2 0, B3 0, C2 0, C3 0, C4 0, D 0
- Use of renewable secondary fuels (RSF) [MJ]: A1-A3 0, A4 0, A5 0, B2 0, B3 0, C2 0, C3 0, C4 0, D 0
- Use of secondary material (SM) [kg]: A1-A3 0, A4 0, A5 0, B2 0, B3 0, C2 0, C3 50.9, C4 0, D -37.2
- Total use of non renewable primary energy resource (PENRT) [MJ]: A1-A3 4310, A4 115, A5 15.6, B2 16.1, B3 106, C2 1.97, C3 -576, C4 2.65, D -2140
- Total use of renewable primary energy resources (PERT) [MJ]: A1-A3 1240, A4 7.76, A5 2.48, B2 0.24, B3 5.53, C2 0.13, C3 3.98, C4 0.23, D -483

## Outputs
- Components for re-use (CRU) [kg]: A1-A3 0, A4 0, A5 0, B2 0, B3 0, C2 0, C3 0, C4 0, D 0
- Exported electrical energy (EEE) [MJ]: A1-A3 0, A4 0, A5 64.8, B2 0, B3 0, C2 0, C3 19.9, C4 0, D 0
- Exported thermal energy (EET) [MJ]: A1-A3 0, A4 0, A5 152, B2 0, B3 0, C2 0, C3 42.4, C4 0, D 0
- Hazardous waste disposed (HWD) [kg]: A1-A3 0.000481, A4 7.39e-6, A5 2.42e-8, B2 0.00498, B3 8.12e-6, C2 1.26e-7, C3 4.94e-7, C4 1.88e-8, D -3.95e-6
- Materials for energy recovery (MER) [kg]: A1-A3 0, A4 0, A5 0, B2 0, B3 0, C2 0, C3 0, C4 0, D 0
- Materials for recycling (MFR) [kg]: A1-A3 0, A4 0, A5 0, B2 0, B3 0, C2 0, C3 41.8, C4 0, D 0
- Non hazardous waste dispose (NHWD) [kg]: A1-A3 34.7, A4 0.0086, A5 2.07, B2 0.0101, B3 0.67, C2 0.000147, C3 0.2, C4 5.33, D -24.7
- Radioactive waste disposed (RWD) [kg]: A1-A3 0.2, A4 0.000139, A5 0.000518, B2 6.09e-5, B3 0.00264, C2 2.38e-6, C3 0.00016, C4 3.82e-5, D -0.15

## Impact indicators
- Abiotic depletion potential for non fossil resources (ADPE) [kg Sb-Äqv.]: A1-A3 0.00172, A4 8.91e-7, A5 7.53e-7, B2 7.96e-8, B3 0.000228, C2 1.52e-8, C3 9.1e-6, C4 4.82e-8, D -0.000427
- Abiotic depletion potential for fossil resources (ADPF) [MJ]: A1-A3 3810, A4 115, A5 14.3, B2 15.9, B3 98.7, C2 1.97, C3 33, C4 2.56, D -1770
- Acidification potential of soil and water (AP) [kg SO2-Äqv.]: A1-A3 1.08, A4 0.0359, A5 0.00731, B2 0.000831, B3 0.0221, C2 0.000589, C3 0.0151, C4 0.000667, D -0.64
- Eutrophication potential (EP) [kg Phosphat-Äqv.]: A1-A3 0.11, A4 0.00915, A5 0.00194, B2 0.000144, B3 0.00111, C2 0.000149, C3 0.00877, C4 0.000364, D -0.0535
- Global warming potential (GWP) [kg CO2-Äqv.]: A1-A3 226, A4 8.54, A5 58.4, B2 0.39, B3 6.36, C2 0.15, C3 15.1, C4 0.21, D -148
- Depletion potential of the stratospheric ozone layer (ODP) [kg CFC 11 eq.]: A1-A3 4.64e-7, A4 1.8e-13, A5 5.97e-13, B2 1.5e-11, B3 6.33e-8, C2 3.08e-15, C3 1.69e-7, C4 7.37e-12, D -1.88e-7
- Formation potential of tropospheric ozone (POCP) [kg Ethen-Äqv.]: A1-A3 0.0758, A4 -0.0138, A5 0.00173, B2 0.000108, B3 0.00188, C2 -0.000224, C3 0.000979, C4 7.03e-5, D -0.0374

## Use advice
A1-A3 sowie Module A4, A5, B2, B3, C2, C3, C4, D. Das Umweltprofil beinhaltet die Aufwendungen für die Lebenszyklus-Stadien cradle to gate mit Optionen (Modul A1-A3). Die Herstellung der Verpackung wurde innerhalb der Module A1-A3 berücksichtigt.

## Review details
Die angewendete LCI Methode ist in Übereinstimmung mit ISO 14040 und 14044. Die Dokumentation enthält alle relevanten Informationen im Hinblick auf die Datenqualität und den Umfang der Anwendung der jeweiligen LCI Ergebnisse bzw. der Datensätze. Der Datensatz repräsentiert den Stand der Technik bezogen auf die funktionelle Einheit.

## Data sources
- GaBi database (all versions)
- EPD Flachdach Fenster FE, Flachdach Fenster F100, Flachdach Fenster FE Passivhaus und Rauchlift ME
