# Laminate Flammex

Dataset: ILCD process, EPD, specific dataset
Geography: DE
Reference year: 2015
Valid until: 2020
Classification: OEKOBAU.DAT: Beschichtungen / Innenbeschichtungen / Wand- und Deckenbeläge
Classification: IBUCategories: 02 Bauprodukte / Inneneinrichtung / Schichtpressstoffe
Method details: Schichtpressstoffe.pdf
Owner: Fritz EGGER GmbH & Co.OG
Compliance: DIN EN 15804; ISO 14025
Review: Accredited third party review by IBU
Amounts: rows without a unit in brackets have none in this file; such an amount is in the reference unit of its flow, which a separate flow dataset defines
copyright: true

## General comment
The EGGER laminates Flammex are decorative laminates based on curable resins (laminates). Laminates consist of cellulose fibre web (paper) impregnated with heat-setting resins. They have a multilayer structure and consist of melamine resin impregnated decorative paper and one or more layers of soda kraft paper impregnated with phenolic resins, which are laminated under high pressure and heat. The laminate quality Flammex can be classified according to the standard /EN 438:2016/ as laminate type F –Flame-retardant. The laminate Flammex complies in the case of fire with the special requirements of building material class B1, according to /DIN 4102-1: 1998-05/ or the French fire behaviour category M1 according to /NF P 92-501/. The laminate structure, the resin and paper quality, the surface texture, the use of special overlays and the press parameters during production determine the laminate quality and therefore the subsequent use or area of application.

## Technology and included processes
EGGER laminates are only produced using a continuous process. Dual-belt presses allow the continuous production of various laminate thicknesses and grades. This grade or type of laminate production is generally known as CPL (Continuous Pressed Laminates). Depending on the pressure during production, EGGER laminates are produced in accordance with or based on /EN 438-3:2005/. The laminates consist of layers of cellulose fibre webs (usually paper) that are impregnated with curable resins. The one-sided outer layer(s) with decorative colours or patterns is (are) impregnated with melamine-based resins. The core layers are impregnated with phenolic resins. Applying heat and pressure causes the resins to flow and subsequently cure. Cross-linking of the resins, reinforced by the cellulose fibres of the papers, results in a very dense material with a sealed surface.
Technical data:
EGGER laminate Flammex is tested according to the testing procedure described in /EN438-2:2016/ and complies with the requirements stipulated in /EN 438-3:2016/. The technical sheet "EGGER Laminate Flammex" contains detailed information concerning quality features and product characteristics. www.egger.com/laminates
Declared unit:
The declared unit is one square meter Flammex laminate 0.8 mm (1.080 kg/m2).

## Technical purpose
Laminates are non-weight-bearing and only serve as lamination materials. EGGER laminates are only suitable for indoor applications. The laminate quality Flammex is used primarily for laminating doors, partition walls, and where flame-retardant elements are required.

## Reference product
- 1 m² Schichtstoff Flammex (1.080 kg/m²): 1

## Inputs
- Erneuerbare Primärenergie als Energieträger (PERE) [MJ]: A1-A3 45.3964, C4 0.0483652, D -0.945481
- Erneuerbare Primärenergie zur stofflichen Nutzung (PERM) [MJ]: A1-A3 5.46774, C4 0, D 0
- Total erneuerbare Primärenergie (PERT) [MJ]: A1-A3 50.8642, C4 0.0483652, D -0.945481
- Nicht-erneuerbare Primärenergie als Energieträger (PENRE) [MJ]: A1-A3 72.0062, C4 0.92799, D -9.26998
- Nicht-erneuerbare Primärenergie zur stofflichen Nutzung (PENRM) [MJ]: A1-A3 9.03226, C4 0, D 0
- Total nicht erneuerbare Primärenergie (PENRT) [MJ]: A1-A3 81.0385, C4 0.92799, D -9.26998
- Einsatz von Sekundärstoffen (SM) [kg]: A1-A3 0, C4 0, D 0
- Erneuerbare Sekundärbrennstoffe (RSF) [MJ]: A1-A3 0, C4 0, D 0
- Nicht erneuerbare Sekundärbrennstoffe (NRSF) [MJ]: A1-A3 0, C4 0, D 0
- Einsatz von Süßwasserressourcen (FW) [m^3]: A1-A3 2.49297, C4 0.0565073, D -0.84757

## Outputs
- Gefährlicher Abfall zur Deponie (HWD) [kg]: A1-A3 0.00261232, C4 4.73963e-5, D -2.68698e-6
- Entsorgter nicht gefährlicher Abfall (NHWD) [kg]: A1-A3 0.317346, C4 0.00432377, D -0.00278665
- Entsorgter radioaktiver Abfall (RWD) [kg]: A1-A3 0.0017352, C4 3.43016e-5, D -0.000672171
- Komponenten für die Wiederverwendung (CRU) [kg]
- Stoffe zum Recycling (MFR) [kg]
- Stoffe für die Energierückgewinnung (MER) [kg]
- Exportierte elektrische Energie (EEE) [MJ]: C4 1.86441
- Exportierte thermische Energie (EET) [MJ]: C4 4.31281

## Impact indicators
- Globales Erwärmungspotenzial (GWP) [kg CO_(2)-Äq.]: A1-A3 3.68701, C4 2.07182, D -0.542155
- Abbau Potential der stratosphärischen Ozonschicht (ODP) [kg CFC11-Äq.]: A1-A3 3.1291e-10, C4 7.22563e-12, D -1.87458e-10
- Versauerungspotenzial von Boden und Wasser (AP) [kg SO_(2)-Äq.]: A1-A3 0.0209178, C4 0.00193451, D -0.00145
- Eutrophierungspotenzial (EP) [kg PO_(4)^(3)-Äq.]: A1-A3 0.0035573, C4 0.000493096, D -9.82657e-5
- Bildungspotential für troposphärisches Ozon (POCP) [kg Ethen-Äq.]: A1-A3 0.0020228, C4 0.000118648, D -0.000118833
- Potenzial für den abiotischen Abbau nicht fossiler Ressourcen (ADPE) [kg Sb-Äq.]: A1-A3 3.23931e-6, C4 2.24076e-8, D -5.5051e-8
- Potenzial für den abiotischen Abbau fossiler Brennstoffe (ADPF) [MJ]: A1-A3 76.6683, C4 0.841799, D -7.58259

## Use advice
Scope:
This document refers to the laminate Flammex produced by EGGER Kunststoffe GmbH & Co.KG (a subsidiary of Fritz EGGER GmbH & Co. OG) in the Gifhorn plant (Germany). This document is translated from the German Environmental Product Declaration into English. It is based on the German original version EPD-EGG-20150066-IBA1-DE. The verifier has no influence on the quality of the translation.
System boundary:
The present study represents a cradle-to-gate approach with options. Module A1-A3, Module C4, and Module D are considered. The system thus includes raw material procurement, transport, manufacturing, and the energetic utilisation of the product.

The data collection reference year is 2013 in the Gifhorn, Germany plant.

The following life cycle phases are taken into account:

- product stage

- disposal stage

- credits and charges outside the system limits

The EPD system limits follow the modular approach of /EN 15804/.

## Data sources
- Schichtstoff Flammex.pdf
- GaBi Database (all versions)
- GaBi database SP20 2013
