# PU - Schaum ummantelte Kupfer-Hausinstallationsrohre

Dataset: ILCD process, EPD, average dataset
Geography: DE
Reference year: 2015
Valid until: 2020
Classification: OEKOBAU.DAT: Metalle / Kupfer / Kupferrohre
Classification: IBUCategories: 02 Bauprodukte / Metallbauprodukte und Zubehör / Metallrohre für Hausinstallationen
Method details: Metallrohre für Hausinstallationen.pdf
Owner: KME
Compliance: DIN EN 15804; ISO 14025
Review: Accredited third party review by IBU
Amounts: rows without a unit in brackets have none in this file; such an amount is in the reference unit of its flow, which a separate flow dataset defines
copyright: true

## General comment
Dieses Dokument bezieht sich auf mit Kunststoff ummantelte sowie wärmegedämmte KME-Markenkupferrohre. Für die Herstellung von Installationsrohren wird bei KME Kupfer der sauerstofffreien Qualität Cu-DHP nach /DIN EN1057/ eingesetzt. Bei Cu-DHP handelt es sich um desoxidiertes Kupfer mit begrenzt hohem Phosphorgehalt (maximal 0,040 %), welches sich durch seine sehr gute Schweiß- und Lötbarkeit auszeichnet. Der Reinheitsgrad beträgt

mindestens 99,90 % Kupfer.

Folgende Marke wird von KME angeboten:

Tabelle 1: Ummantelte Markenkupfer – Hausinstallationsrohre

Basis für die Berechnung der Ergebnisse sind die jeweils angegebenen produzierten Jahresmengen an ummantelten Kupferrohren. Die Ergebnisse basieren dabei auf gemittelten Werten, die sich anhand der Jahresproduktionsmengen zusammensetzen. Die deklarierte Einheit umfasst Herstellung und Aufbereitung von einem Kilogramm ummanteltem Kupferrohr (PU Ummantelung) mit durchschnittlichem Ummantelungsanteil.

Zur Umrechnung der Bezugsgröße sind in der Tabelle 4 das Gewicht, und für eine mögliche spätere Berechnung von Wärmeverlusten der Installation die Außenfläche des Rohres pro Meter im Lieferzustand angegeben.

## Technology and included processes
Grundstoffe Vorprodukte Die Hausinstallationsrohre bestehen aus 100 Masse-% aus Cu-DHP, d.h. sauerstofffreiem phosphor- desoxidiertem Kupfer mit begrenztem Restphospho- rgehalt. Der Reinheitsgrad beträgt mindestens 99,90 % Kupfer. Bei den eingesetzten Kunststoff- Ummantelungen handelt es sich um Polyurethan (PU). Hilfsstoffe / Zusatzmittel Nachfolgend sind alle Hilfsstoffe/ Zusatzmaterialien, die während der Produktion eingesetzt werden, aufgeführt. Hilfsstoffe: Eingesetzte Ziehmittel: 2,6 g/kg Kupfer Stofferläuterung: Stoffzusammensetzung der verwendeten Materialien (Grundstoffe/ Vorprodukte und Hilfsstoffe/Zusatzmittel). Kupfer Cu-DHP; EN-Nr. CW 024A - Werkstoff Reinkupfer Cu-DHP; EN-Nr. CW 024A - Zusammensetzung 99,90 % Cu + Ag - Phosphor 0,015-0,040 % Ziehmittel bestehen aus hochtemperaturbeständigen mineralölhaltigen und synthetischen Ölen, die als Kühl- und Schmiermittel während des Ziehprozesses dienen. Ummantelung: Die eingesetzte PU-Ummantelung beruht auf der nachfolgenden Rezeptur: - 40-50 % Polyol - 48-58 % Isocyanat - 1-4 % Katalysator - 2-5 % Pentan Fertigung von ummantelten KME-Kupferrohren: In der ersten Stufe der Kupferrohrproduktion wird aus einem Rundbolzen durch Warmumformen ein Vorrohr erstellt. Dieses wird im Anschluss im Ziehverfahren kalt weitergearbeitet. Das Glühen und Fertigziehen erfolgt je nach Festigkeitsstufe. Harte und halbharte Rohre durchlaufen zusätzlich eine Richtanlage. Nach einer abschließenden Prüfung werden die Rohre gekennzeichnet und abgelängt. KME – Kupferrohre mit Isolierung aus PU: WICU® Eco Zur Ummantelung werden die abgelängten Rohre mit Kunststoffverbindern zusammengefügt und danach werden kontinuierlich PU Komponenten in entsprechender Weise auf das Rohr aufgebracht, dass diese zu einem homogenen PU-Mantel aushärten. Zum Schutz wird eine PVC-Folie um den PU-Mantel angebracht. Anschließend werden die Rohre an den Verbindungs- stellen wieder getrennt. Nach einer abschließenden Prüfung werden die Rohre gekennzeichnet und verpackt. Gütesicherung: Eigenüberwachung durch den Hersteller mit Qualitätsmanagementsystem nach /DIN EN ISO 9001/ sowie Fremdüberwachung durch Lloyds Register, Gütegemeinschaft Kupferrohre e.V., DVGW und andere nationale europäische Überwachungsinstitutionen, wie KIWA, CSTB, etc.
Technische Daten:
Prüfnormen/Produktnormen/Zulassungen:

/DIN EN 1057/, /DVGW-GW 392/, /RAL-Gütezeichen der Gütegemeinschaft Kupferrohre/, /Energie-einsparverordnung/, /Übereinstimmungszeichen

(Ü-Zeichen)/.

Tabelle 2: Physikalische Eigenschaften von Ummantelungen bei KME-Kupferrohren
Deklarierte Einheit:
Die Deklaration bezieht sich auf die Herstellung und das Recycling von einem Kilogramm Kupferrohr (PU-Schaum ummantelt).

Tabelle 5: Überblick zu den Produktgruppen, Firmennamen, Produktionsstätten und Art der Durchschnittsbildung

Der Durchschnitt wurde auf Basis der jährlichen Produktionsmenge gebildet.

## Technical purpose
Die Einsatzzwecke der deklarierten Markenkupferrohre sind Transport von:

- Trinkwasser kalt, warm, Zirkulation

- Regenwasser

- Grauwasser

- Wärmeträgern in Heizung, Flächenheizung, Flächenkühlung und Solarthermie

## Reference product
- 1 kg PU -Schaum ummanteltes Kupferrohr: 1

## Inputs
- Erneuerbare Primärenergie als Energieträger (PERE) [MJ]: A1-A3 4.35, C4 0.0306, D -1.44
- Erneuerbare Primärenergie zur stofflichen Nutzung (PERM) [MJ]: A1-A3 0
- Total erneuerbare Primärenergie (PERT) [MJ]: A1-A3 4.35, C4 0.0306, D -1.44
- Nicht-erneuerbare Primärenergie als Energieträger (PENRE) [MJ]: A1-A3 49.9, C4 0.337, D -11.2
- Nicht-erneuerbare Primärenergie zur stofflichen Nutzung (PENRM) [MJ]: A1-A3 0
- Total nicht erneuerbare Primärenergie (PENRT) [MJ]: A1-A3 49.9, C4 0.337, D -11.2
- Einsatz von Sekundärstoffen (SM) [kg]: A1-A3 0, C4 0, D 0
- Erneuerbare Sekundärbrennstoffe (RSF) [MJ]: A1-A3 0, C4 0, D 0
- Nicht erneuerbare Sekundärbrennstoffe (NRSF) [MJ]: A1-A3 0, C4 0, D 0
- Einsatz von Süßwasserressourcen (FW) [m^3]: A1-A3 0.0167, C4 0.00146, D -0.00475

## Outputs
- Gefährlicher Abfall zur Deponie (HWD) [kg]: A1-A3 0.00322, C4 4.13e-5, D -0.00103
- Entsorgter nicht gefährlicher Abfall (NHWD) [kg]: A1-A3 0.0367, C4 0.132, D -0.00473
- Entsorgter radioaktiver Abfall (RWD) [kg]: A1-A3 0.00149, C4 1.59e-5, D -0.000481
- Komponenten für die Wiederverwendung (CRU) [kg]: A1-A3 0, C4 0
- Stoffe zum Recycling (MFR) [kg]: A1-A3 0, C4 0
- Stoffe für die Energierückgewinnung (MER) [kg]: A1-A3 0, C4 0
- Exportierte elektrische Energie (EEE) [MJ]: A1-A3 0, C4 0
- Exportierte thermische Energie (EET) [MJ]: A1-A3 0, C4 0

## Impact indicators
- Globales Erwärmungspotenzial (GWP) [kg CO_(2)-Äq.]: A1-A3 2.85, C4 0.611, D -0.952
- Abbau Potential der stratosphärischen Ozonschicht (ODP) [kg CFC11-Äq.]: A1-A3 1.14e-10, C4 7.47e-13, D -1.85e-11
- Versauerungspotenzial von Boden und Wasser (AP) [kg SO_(2)-Äq.]: A1-A3 0.00879, C4 0.000156, D -0.00345
- Eutrophierungspotenzial (EP) [kg PO_(4)^(3)-Äq.]: A1-A3 0.000988, C4 1.28e-5, D -0.000316
- Bildungspotential für troposphärisches Ozon (POCP) [kg Ethen-Äq.]: A1-A3 0.00094, C4 8.71e-6, D -0.000216
- Potenzial für den abiotischen Abbau nicht fossiler Ressourcen (ADPE) [kg Sb-Äq.]: A1-A3 1.94e-5, C4 8.81e-8, D -6.26e-6
- Potenzial für den abiotischen Abbau fossiler Brennstoffe (ADPF) [MJ]: A1-A3 46.1, C4 0.297, D -9.95

## Use advice
Gültigkeitsbereich:
Die vorliegende EPD ist eine Durchschnitts - EPD. Die für die Berechnung der Ökobilanz verwendeten Werte stammen von zwei Herstellern. Die Produktionsstandorte sind Osnabrück und Ulm.
Systemgrenze:
Die Lebenszyklusanalyse für die Herstellung der betrachteten Kupferrohre umfasst die Lebenswegabschnitte „von der Wiege bis zum Werkstor" (cradle to gate) mit Option.

Produktionsstadium

Module A1-A3 betrachtet: Die Bereitstellung von Rohmaterialen, Hilfsstoffen und Energien, Transport von Rohmaterialien und Hilfsstoffen Herstellprozess im Werk inklusive energetischen Aufwendungen, Herstellung von Hilfsstoffen, Entsorgung von anfallenden Reststoffen und der Berücksichtigung von auftretenden Werksemissionen. Kreislaufführung von Produktionsschrotten.

Module C4 beinhaltet die Emissionen im End-of-Life bei der Verbrennung und Deponierung.

Für Kupferschrott wird angenommen, dass der "end-of-waste" Status nach dem Sortieren und Schreddern beim Abriss oder in den Abfallbehandlungsanlagen erreicht ist.

In Modul D werden Wiederverwendung und Recycling von Kupferschrott auf Basis der Netto-Schrottmenge im End-of-Life betrachtet.

## Data sources
- PU - Schaum ummantelte Kupfer-Hausinstallationsrohre.pdf
- GaBi Database (all versions)
- GaBi database SP20 2013
