# Rhepanol hfk-sk

Dataset: ILCD process, EPD, specific dataset
Geography: DE
Reference year: 2015
Valid until: 2020
Classification: OEKOBAU.DAT: Kunststoffe / Dachbahnen / PIB-Dachbahnen (Polyisobutylen)
Classification: IBUCategories: 02 Bauprodukte / Abdichtungen / Dach- und Dichtungsbahnsysteme aus Kunststoffen und Elastomeren
Method details: Dach- und Dichtungsbahnsysteme aus Kunststoffen und Elastomeren.pdf
Owner: FDT FlachdachTechnologie GmbH &. Co. KG
Compliance: DIN EN 15804; ISO 14025
Review: Accredited third party review by IBU
Amounts: rows without a unit in brackets have none in this file; such an amount is in the reference unit of its flow, which a separate flow dataset defines
copyright: true

## General comment
Rhepanol hfk-sk is a bitumen-compatible polyisobutylene (PIB) synthetic roofing membrane comprising PIB of high molecular weight, co-polymers and functional additives as well as a glass/synthetic non-woven fleece on the underside and a full-surface self-adhesive layer including protective foil. Rhepanol hfk-sk seams are hot air-welded.

## Technology and included processes
Rhepanol hfk-sk compounds are produced by a continuous operating mixer in which the individual raw materials are combined to form a homogeneous mass before being granulated. The granulate is added to a calendar via another mixing extruder and mixing roll which shapes the membranes. A doubling calendar combines two synthetic membranes with glass non-woven fleece, synthetic non-woven fleece and self-adhesive layering. The roofing membranes are packed at the end of the doubling calendar. Production is subject to the Quality Management system introduced in accordance with /ISO 9001/. The certification agency is TÜV Süd Management Service. External quality monitoring and tests (are also performed by the State Material Testing Institute in Darmstadt.
Declared unit:
The declared unit is 1 m² Rhepanol hfk-sk 1.5 mm of roofing membrane produced.

## Technical purpose
Rhepanol hfk-sk is used for single-layer sealing on both flat and inclined roofs in adhered layers.

The manufacturer's installation instructions must be maintained during processing.

## Reference product
- 1 m² Dachbahn: 1

## Inputs
- Erneuerbare Primärenergie als Energieträger (PERE) [MJ]: A1-A3 16.1
- Erneuerbare Primärenergie zur stofflichen Nutzung (PERM) [MJ]: A1-A3 0
- Total erneuerbare Primärenergie (PERT) [MJ]: A1-A3 16.1
- Nicht-erneuerbare Primärenergie als Energieträger (PENRE) [MJ]: A1-A3 109
- Nicht-erneuerbare Primärenergie zur stofflichen Nutzung (PENRM) [MJ]: A1-A3 67.5
- Total nicht erneuerbare Primärenergie (PENRT) [MJ]: A1-A3 176
- Einsatz von Sekundärstoffen (SM) [kg]: A1-A3 0
- Erneuerbare Sekundärbrennstoffe (RSF) [MJ]: A1-A3 0
- Nicht erneuerbare Sekundärbrennstoffe (NRSF) [MJ]: A1-A3 0
- Einsatz von Süßwasserressourcen (FW) [m^3]: A1-A3 0.0439

## Outputs
- Gefährlicher Abfall zur Deponie (HWD) [kg]: A1-A3 0.00422
- Entsorgter nicht gefährlicher Abfall (NHWD) [kg]: A1-A3 0.338
- Entsorgter radioaktiver Abfall (RWD) [kg]: A1-A3 0.0047
- Komponenten für die Wiederverwendung (CRU) [kg]: A1-A3 0
- Stoffe zum Recycling (MFR) [kg]: A1-A3 0
- Stoffe für die Energierückgewinnung (MER) [kg]: A1-A3 0
- Exportierte elektrische Energie (EEE) [MJ]: A1-A3 0
- Exportierte thermische Energie (EET) [MJ]: A1-A3 0

## Impact indicators
- Globales Erwärmungspotenzial (GWP) [kg CO_(2)-Äq.]: A1-A3 8.49
- Abbau Potential der stratosphärischen Ozonschicht (ODP) [kg CFC11-Äq.]: A1-A3 4.98e-10
- Versauerungspotenzial von Boden und Wasser (AP) [kg SO_(2)-Äq.]: A1-A3 0.0319
- Eutrophierungspotenzial (EP) [kg PO_(4)^(3)-Äq.]: A1-A3 0.0019
- Bildungspotential für troposphärisches Ozon (POCP) [kg Ethen-Äq.]: A1-A3 0.00341
- Potenzial für den abiotischen Abbau nicht fossiler Ressourcen (ADPE) [kg Sb-Äq.]: A1-A3 6.64e-6
- Potenzial für den abiotischen Abbau fossiler Brennstoffe (ADPF) [MJ]: A1-A3 164

## Use advice
Scope:
The Declaration applies for Rhepanol hfk-sk roofing membrane, 1.5 mm thick, manufactured in 68199 Mannheim-Neckarau. This document is translated from the German Environmental Product Declaration into English. It is based on the German original version EPD-FDT-20150015-IAA1-DE. The verifier has no influence on the quality of the translation.
System boundary:
This Life Cycle Analysis addresses the life cycle stage of product manufacturing (cradle to gate). The product stage comprises Module A1 (Raw material supply), A2 (Transport), A3 (Production) in accordance with EN 15804 including the provision of all materials, products and energy. Waste indicated in A1-A3 only concerns that which is recycled internally.

## Data sources
- Rhepanol hfk-sk.pdf
- GaBi Database (all versions)
- GaBi database SP20 2013
