# EURODEKOR MDF

Dataset: ILCD process, EPD, specific dataset
Geography: RER
Reference year: 2015
Valid until: 2020
Classification: OEKOBAU.DAT: Holz / Holzwerkstoffe / Holzfaserplatten
Classification: IBUCategories: 02 Bauprodukte / Holzwerkstoffe / Holzwerkstoffe
Method details: Holzwerkstoffe.pdf
Owner: Fritz EGGER GmbH & Co. OG Holzwerkstoffe
Compliance: DIN EN 15804; ISO 14025
Review: Accredited third party review by IBU
Amounts: rows without a unit in brackets have none in this file; such an amount is in the reference unit of its flow, which a separate flow dataset defines
copyright: true

## General comment
EURODEKOR MDF boards are panel-shaped materials in accordance with /EN 622-5/ and /EN 14322/. These raw material boards are predominantly used as furniture boards. They are used, for example, as deep drawer fronts in the kitchen area. The decorative pattern is achieved by means of printed decor paper. A corresponding texture is applied to the surface in the course of the pressing.

## Technology and included processes
Production of the rawboards: 1. Peeling logs 2. Chipping the wood to produce chips 3. Cooking the chips 4. Defibration in the refiner 5. Drying the fibres to approximately 2-3 % residual moisture 6. Application of resin to the fibres 7. Spreading the glue-coated fibres onto a forming belt 8. Compression of the fibre mat in a continuously operating hot press 9. Cutting and trimming the fibre strand into rawboard formats 10. Cooling the rawboards in star coolers 11. Piling into large stacks 12. Sanding the upper and lower sides after the acclimatisation phase Production of the impregnated papers: 1. Processing the base paper 2. Addition of impregnation resins (MUF) in the plant 3. Drying the impregnated paper in heated dryers 4. Formatting the endless paper by means of a crosscutter 5. Stacking the formatted sheets on pallets Manufacturing the coated MDF boards: 1. Laying the impregnated papers onto the upper and lower sides of the rawboard 2. Pressing the board in the hot press with differently textured press plates/belts. 3. Sorting by quality and stacking 4. Acclimatisation phase of up to 14 days All waste generated in the course of production (trimming, cutting and milling waste) is used thermally with no exceptions.
Technical data:
Technical data for EGGER MDF-ST E1CE
Declared unit:
The declaration refers to the manufacturing of

1 m² of coated MDF board with an average thickness of 11.7 mm and a weight per unit area of 12.7 kg/m².

## Technical purpose
Coated MDF boards are used indoors for high quality purposes in furniture construction. Due to their homogeneous structure, MDF boards can be milled three-dimensionally and then painted or faced with a foil in a membrane press. Boards produced in this way can happily be used as fronts for high quality kitchens.

## Reference product
- 1 m² MDF Platte beschichtet: 1

## Inputs
- Erneuerbare Primärenergie als Energieträger (PERE) [MJ]: A1-A3 148.298
- Erneuerbare Primärenergie zur stofflichen Nutzung (PERM) [MJ]: A1-A3 202.448
- Total erneuerbare Primärenergie (PERT) [MJ]: A1-A3 350.746, D -9.22433
- Nicht-erneuerbare Primärenergie als Energieträger (PENRE) [MJ]: A1-A3 167.208
- Nicht-erneuerbare Primärenergie zur stofflichen Nutzung (PENRM) [MJ]: A1-A3 34.2163
- Total nicht erneuerbare Primärenergie (PENRT) [MJ]: A1-A3 201.425, D -77.6835
- Einsatz von Sekundärstoffen (SM) [kg]: A1-A3 0.00472151, D -0.000432615
- Erneuerbare Sekundärbrennstoffe (RSF) [MJ]: A1-A3 156.087, D 202
- Nicht erneuerbare Sekundärbrennstoffe (NRSF) [MJ]: A1-A3 0, D 34.2
- Einsatz von Süßwasserressourcen (FW) [m^3]: A1-A3 0.0427959, D -0.0177242

## Outputs
- Gefährlicher Abfall zur Deponie (HWD) [kg]: A1-A3 0.00618485, D -0.00698716
- Entsorgter nicht gefährlicher Abfall (NHWD) [kg]: A1-A3 0.192967, D 0.0530845
- Entsorgter radioaktiver Abfall (RWD) [kg]: A1-A3 0.00392878, D -0.00727231
- Komponenten für die Wiederverwendung (CRU) [kg]: A1-A3 0
- Stoffe zum Recycling (MFR) [kg]: A1-A3 0
- Stoffe für die Energierückgewinnung (MER) [kg]: C3 7.87736
- Exportierte elektrische Energie (EEE) [MJ]
- Exportierte thermische Energie (EET) [MJ]

## Impact indicators
- Globales Erwärmungspotenzial (GWP) [kg CO_(2)-Äq.]: A1-A3 -8.10026, C3 14.5731, D -11.3
- Abbau Potential der stratosphärischen Ozonschicht (ODP) [kg CFC11-Äq.]: A1-A3 1.22226e-8, D -1.94271e-9
- Versauerungspotenzial von Boden und Wasser (AP) [kg SO_(2)-Äq.]: A1-A3 0.0318474, D -0.00251964
- Eutrophierungspotenzial (EP) [kg PO_(4)^(3)-Äq.]: A1-A3 0.0121803, D 9.84417e-5
- Bildungspotential für troposphärisches Ozon (POCP) [kg Ethen-Äq.]: A1-A3 0.00886125, D 0.000449468
- Potenzial für den abiotischen Abbau nicht fossiler Ressourcen (ADPE) [kg Sb-Äq.]: A1-A3 5.61701e-6, D -4.4381e-7
- Potenzial für den abiotischen Abbau fossiler Brennstoffe (ADPF) [MJ]: A1-A3 191.364, D -59.4231

## Use advice
Scope:
This document relates to coated medium density EGGER MDF fibreboards (average), which are produced in the group's following plant:

Egger Holzwerkstoffe Wismar GmbH & Co. KG, Am Haffeld 1, 23970 Wismar, Germany
The production conditions in Wismar are representative for the other plants. They correspond to the technologies and standards used in all locations. This document is translated from the German Environmental Product Declaration into English. It is based on the German original version EPD-EGG-20150045-IBA1-DE. The verifier has no influence on the quality of the translation.
System boundary:
This is a "from cradle to factory gate, with options" EPD. The life cycle analysis for the product under consideration encompasses the following segments of the life cycle: “Product stage” and “Credits and debits beyond the limits of the product system”. The systems therefore encompass the following stages according to /EN 15804/: Product stage (module A1-A3):

A1 Procurement and processing of raw materials as well as processing of secondary raw materials serving as inputs
A2 Transportation to the manufacturer
A3 Production

Credits and debits beyond the limits of the product system (module D):

D Reuse, recovery or recycling potential

## Data sources
- MDF beschichtet.pdf
- GaBi Database (all versions)
- GaBi database SP26 2014
