# Sanitary acrylic

Dataset: ILCD process, EPD, average dataset
Geography: EG
Reference year: 2015
Valid until: 2020
Classification: OEKOBAU.DAT: Gebäudetechnik / Sanitär / Dusch- und Badewannen
Classification: IBUCategories: 03 Gebäudetechnik / Sanitäreinrichtungen / Bade- und Duschwannen aus Stahl-Email oder Acryl
Method details: Bade- und Duschwannen aus Stahl-Email oder Acryl.pdf
Owner: DURAVIT AG
Compliance: DIN EN 15804; ISO 14025
Review: Accredited third party review by IBU
Amounts: rows without a unit in brackets have none in this file; such an amount is in the reference unit of its flow, which a separate flow dataset defines
copyright: true

## General comment
The sanitary acrylic group includes bathtubs, shower trays, pools and acrylic bathtub panelling. The products primarily comprise materials such as acrylic boards (PMMA – polymethyl methacrylate), synthetic resin (polyester resin), glass fibre, calcium carbonate and wood. A representative average sanitary acrylic product based on the overall mass volume of the respective products for 2013 was formed for calculating the environmental impacts. The bathtubs and pools comprise a deep-drawn acrylic base which is reinforced with a compound made of glass fibre and synthetic resin on the underside.

## Technology and included processes
Following delivery of the poly methyl methacrylate (PMMA) boards, they are initially cleaned of dust and other foreign particles, cut to size and then heated in an electrically-powered kiln at 180 °C before being deep-drawn in a pre-formed mould. Cooling is accelerated by ventilators. This phase is followed by spraying the acrylic mould with a mixture of polyester resin, glass fibre, acetone and calcium carbonate. Methyl ethyl ketone peroxide (catalyst) forms another component of the mixture for polymerisation. To improve the stability of the bathtubs, an additional layer of wooden boards is applied to the underside which is then sprayed again with the polyester resin and glass fibre mixture. With the aid of manual processing in the form of rollers, the mixture is compressed before running through the curing tunnel for the polymerisation process. Once polymerisation is complete, final processing of the product can commence which primarily comprises two processes. After excess edges are trimmed and polished, holes are drilled for the pipe systems, jets etc. Production of the moulds for deep-drawing the heated acrylic boards also takes place at the Cairo site and is included disproportionately in the calculation. The moulds primarily comprise polyester resin, glass fibre, epoxy resin and metal. The Cairo site is certified to /ISO 9001/, /ISO 14001/ and /OHSAS 18001/.
Technical data:
Depending on the model, installation accessories used and the respective structural situation, bathtubs and shower trays by Duravit fulfil individual or several sound insulation standards. These include:

/DIN 4109 (A1)/, /VDI 4100/, /SIA 181/. The product dimensions on delivery are listed in the following table and are indicated as L x W x H. No other technical data is of relevance for the sanitary acrylic product group.
Declared unit:
A declared unit of 1 square metre acrylic surface is taken as a basis for calculating the LCA for sanitary acrylic. All environmental impacts by the product relate to one square metre acrylic surface. On account of identical manufacturing methods, an average product representing bathtubs and shower trays as well as bath panelling is formed on the basis of the overall sales volume of the respective products for 2013.

Accessories for the products as well as technical components for whirltubs and pools are not considered within this study as the analysis of electronic sensors and jets for bathtub systems would exceed the framework of this study. Furthermore, feet and base systems are hardly used in the case of the products reviewed.

The thickness of the acrylic surface coating can be distinguished as follows for the respective products:

Bathtubs: 4 - 5 mm

Shower trays: 3.2 - 4 mm

Panelling: 4 - 5 mm

The following table provides another overview of key parameters. The density of PMMA boards is indicated as 1.19 g/cm³ in the literature. The average product without packaging displays a total weight of 10.66 kg in relation to the declared unit. Packaging is defined with a weight of 0.34 kg per declared unit.

## Technical purpose
The sanitary acrylic group comprises bathtubs and shower trays, pools and bathtub panelling which are primarily used in bathrooms. Bathtubs and shower trays are furnishings for bathrooms which are used in particular for personal hygiene. Acrylic bathtub panelling is available as an accessory for bathtubs.

## Reference product
- 1 m² Acryl-Oberfläche: 1

## Inputs
- Erneuerbare Primärenergie als Energieträger (PERE) [MJ]: A1-A3 70.01, C4 0.31, D -0.75
- Erneuerbare Primärenergie zur stofflichen Nutzung (PERM) [MJ]: A1-A3 0, C4 0, D 0
- Total erneuerbare Primärenergie (PERT) [MJ]: A1-A3 70.01, C4 0.31, D -0.75
- Nicht-erneuerbare Primärenergie als Energieträger (PENRE) [MJ]: A1-A3 803.49, C4 4, D -146
- Nicht-erneuerbare Primärenergie zur stofflichen Nutzung (PENRM) [MJ]: A1-A3 0, C4 0, D 0
- Total nicht erneuerbare Primärenergie (PENRT) [MJ]: A1-A3 803.49, C4 4, D -146
- Einsatz von Sekundärstoffen (SM) [kg]
- Erneuerbare Sekundärbrennstoffe (RSF) [MJ]
- Nicht erneuerbare Sekundärbrennstoffe (NRSF) [MJ]
- Einsatz von Süßwasserressourcen (FW) [m^3]: A1-A3 6.17, C4 0.03, D -0.66

## Outputs
- Gefährlicher Abfall zur Deponie (HWD) [kg]
- Entsorgter nicht gefährlicher Abfall (NHWD) [kg]: A1-A3 0.022
- Entsorgter radioaktiver Abfall (RWD) [kg]
- Komponenten für die Wiederverwendung (CRU) [kg]
- Stoffe zum Recycling (MFR) [kg]
- Stoffe für die Energierückgewinnung (MER) [kg]: C4 11.0036
- Exportierte elektrische Energie (EEE) [MJ]: C4 21.4
- Exportierte thermische Energie (EET) [MJ]: C4 67.3

## Impact indicators
- Globales Erwärmungspotenzial (GWP) [kg CO_(2)-Äq.]: A1-A3 44.29, C4 17.61, D -9.11
- Abbau Potential der stratosphärischen Ozonschicht (ODP) [kg CFC11-Äq.]: A1-A3 2.07e-8, C4 2.64e-8, D -9.68e-10
- Versauerungspotenzial von Boden und Wasser (AP) [kg SO_(2)-Äq.]: A1-A3 0.224, C4 0.004, D -0.007
- Eutrophierungspotenzial (EP) [kg PO_(4)^(3)-Äq.]: A1-A3 0.0215, C4 0.0009, D -0.001
- Bildungspotential für troposphärisches Ozon (POCP) [kg Ethen-Äq.]: A1-A3 0.028, C4 0.000208, D -0.001
- Potenzial für den abiotischen Abbau nicht fossiler Ressourcen (ADPE) [kg Sb-Äq.]: A1-A3 0.00017, C4 4.16e-8, D -3.43e-5
- Potenzial für den abiotischen Abbau fossiler Brennstoffe (ADPF) [MJ]: A1-A3 766.06, C4 3, D -145

## Use advice
Scope:
The object of this study is to draw up an LCA for DURAVIT AG sanitary acrylic, including packaging, produced at the Cairo location in Egypt. On account of identical manufacturing methods, an average product representing bathtubs and shower trays as well as bath panelling is formed on the basis of the overall sales volume of the respective products for 2013.
System boundary:
The system boundaries contain all relevant process steps during the manufacture of sanitary acrylic within a cradle-to-gate review with options. This means that in accordance with the PCR document on which they are based, all processes to the factory gate are considered (Product stage A1-A3). Subsequent transport of the product to the construction site is no longer included in the calculation. A representative disposal scenario (End-of-Life stage C4 as well as benefits and loads outside the system boundary D) was modelled for the disposal phase based on expert knowledge at DURAVIT AG.

As a general rule, the system can be divided into four main processes:

- Provision and production of preliminary products and packaging materials (Module A1)

- Transport of preliminary products and packaging materials to the plant (Module A2)

- Production of sanitary acrylic in the plant (Module A3)

- Disposal of sanitary acrylic (Modules C4 & D)

The following graphic depicts a summarising overview of the system boundaries in this study:

## Data sources
- Sanitäracryl.pdf
- GaBi Database (all versions)
- GaBi database SP26 2014
