# Raufa e.l.f, Praxit e.l.f., Nordstar e.l.f., Biosan e.l.f., Raufa, Praxit EC, Imodin F, Renoschwarz (3-1)

Dataset: ILCD process, EPD, specific dataset
Geography: DE
Reference year: 2015
Valid until: 2020
Classification: OEKOBAU.DAT: Beschichtungen / Innenbeschichtungen / Innenfarben
Classification: IBUCategories: 02 Bauprodukte / Bauklebstoffe und Beschichtungen / Beschichtungen mit organischen Bindemitteln
Method details: Beschichtungen mit organischen Bindemitteln.pdf
Owner: IMparat Farbwerk Iversen & Mähl GmbH & Co. KG
Compliance: DIN EN 15804; ISO 14025
Review: Accredited third party review by IBU
Amounts: rows without a unit in brackets have none in this file; such an amount is in the reference unit of its flow, which a separate flow dataset defines
copyright: false

## General comment
Die hier aufgeführten Produkte sind hochwertige Dispersionsfarben für den Innenbereich nach /DIN EN 13000:2002/. Es handelt sich um werksseitig hergestellte flüssige Gemische aus organischen Bindemitteln, Pigmenten, mineralischen Füllstoffen, Wasser und Additiven. Die Trocknung basiert auf physikalischen Prozessen wie Verdunstung von Wasser, Verfilmung der Bindemittelpolymere unter Einbindung von Pigmenten und Füllstoffen.

Als repräsentatives Produkt wurde die Farbe mit den höchsten Umweltwirkungen zur Berechnung der Ökobilanzergebnisse herangezogen.

## Technology and included processes
Beschichtungssysteme für diverse Untergründe im Innenbereich.
Deklarierte Einheit:
Diese individualisierte Muster-EPD bezieht sich auf die deklarierte Einheit von 1 kg dispersionsbasierter Innenwandfarbe. Der Verbrauch der Produkte, die flächig aufgebracht werden, kann zwischen 100 und 150 g/m² liegen. Aus den Produktgruppen wurde das Produkt mit den höchsten Umweltwirkungen deklariert.

## Technical purpose
Die Anwendung erfolgt als Neu- und Renovierungsanstrich auf z.B. Raufasertapeten, Vlies, alten Dispersionsanstrichen, Gipskarton, usw.

Die Produkte sind einteilbar in die Nassabriebklasse 3 und der Deckvermögensklasse 1.

## Reference product
- Produkte: Raufa e.l.f., Raufa, Praxit e.l.f., Praxit EC, Nordstar e.l.f., Imodin F, Biosan e.l.f. und Renoschwarz: 1

## Inputs
- Erneuerbare Primärenergie als Energieträger (PERE) [MJ]: A1-A3 2.32
- Erneuerbare Primärenergie zur stofflichen Nutzung (PERM) [MJ]: A1-A3 0
- Total erneuerbare Primärenergie (PERT) [MJ]: A1-A3 2.32, A4 0.02, A5 0.00291, D -0.114
- Nicht-erneuerbare Primärenergie als Energieträger (PENRE) [MJ]: A1-A3 27.5
- Nicht-erneuerbare Primärenergie zur stofflichen Nutzung (PENRM) [MJ]: A1-A3 1.87
- Total nicht erneuerbare Primärenergie (PENRT) [MJ]: A1-A3 29.4, A4 0.338, A5 0.033, D -1.2
- Einsatz von Sekundärstoffen (SM) [kg]: A1-A3 0
- Erneuerbare Sekundärbrennstoffe (RSF) [MJ]: A1-A3 0.00218, A4 2.51e-6, A5 5.11e-7, D -1.73e-5
- Nicht erneuerbare Sekundärbrennstoffe (NRSF) [MJ]: A1-A3 0.022, A4 2.63e-5, A5 5.34e-6, D -0.000182
- Einsatz von Süßwasserressourcen (FW) [m^3]: A1-A3 0.00789, A4 1.93e-5, A5 0.000381, D -0.000178

## Outputs
- Gefährlicher Abfall zur Deponie (HWD) [kg]: A1-A3 0.00691, A4 0, A5 0.000777, D 0
- Entsorgter nicht gefährlicher Abfall (NHWD) [kg]: A1-A3 0.337, A4 6.68e-5, A5 1.53e-5, D -0.00045
- Entsorgter radioaktiver Abfall (RWD) [kg]: A1-A3 0.00123, A4 4.85e-7, A5 1.76e-6, D -6.82e-5
- Komponenten für die Wiederverwendung (CRU) [kg]
- Stoffe zum Recycling (MFR) [kg]
- Stoffe für die Energierückgewinnung (MER) [kg]
- Exportierte elektrische Energie (EEE) [MJ]: A5 0.24
- Exportierte thermische Energie (EET) [MJ]: A5 0.577

## Impact indicators
- Globales Erwärmungspotenzial (GWP) [kg CO_(2)-Äq.]: A1-A3 1.6, A4 0.0246, A5 0.159, D -0.0786
- Abbau Potential der stratosphärischen Ozonschicht (ODP) [kg CFC11-Äq.]: A1-A3 6.28e-10, A4 5.14e-13, A5 1e-12, D -2.38e-11
- Versauerungspotenzial von Boden und Wasser (AP) [kg SO_(2)-Äq.]: A1-A3 0.0198, A4 0.000162, A5 1.68e-5, D -0.000109
- Eutrophierungspotenzial (EP) [kg PO_(4)^(3)-Äq.]: A1-A3 0.000539, A4 4.03e-5, A5 3.44e-6, D -1.22e-5
- Bildungspotential für troposphärisches Ozon (POCP) [kg Ethen-Äq.]: A1-A3 0.000986, A4 -6.81e-5, A5 0.000256, D -9.99e-6
- Potenzial für den abiotischen Abbau nicht fossiler Ressourcen (ADPE) [kg Sb-Äq.]: A1-A3 2.84e-6, A4 1.14e-9, A5 2.09e-9, D -8.14e-9
- Potenzial für den abiotischen Abbau fossiler Brennstoffe (ADPF) [MJ]: A1-A3 26.4, A4 0.337, A5 0.0287, D -1.04

## Use advice
Gültigkeitsbereich:
In dieser Produktdeklaration werden die Innenwandfarben Raufa e.l.f., Raufa, Praxit e.l.f., Praxit EC, Nordstar e.l.f., Imodin F, Biosan e.l.f. und Renoschwarz betrachtet, die am Standort Glinde hergestellt werden.

Diese EPD beruht auf der Muster-Deklaration EPD-DIV-20140149-IBG1-DE.
Systemgrenze:
In der Ökobilanz werden die Module A1/A2/A3, A4, A5 und D berücksichtigt:

A1 Herstellung der Vorprodukte

A2 Transport zum Werk

A3 Produktion inkl. Energiebereitstellung, Herstellung von Verpackung sowie Hilfs- und Betriebsstoffen und Abfallbehandlung)

A4 Transport zur Baustelle

A5 Installation (Verpackungsentsorgung sowie Emissionen bei der Installation)

D Gutschriften aus der Verbrennung der Verpackungsmaterialien und Recycling des Metallgebindes

Es handelt sich also um eine Deklaration von der „Wiege bis Werkstor - mit Optionen“.

## Data sources
- Raufa e.l.f, Praxit e.l.f., Nordstar e.l.f., Biosan e.l.f., Raufa, Praxit EC, Imodin F, Renoschwarz (3-1).pdf
- GaBi Database (all versions)
- GaBi database SP27 2015
