# Brillux Super Latex ELF 3000

Dataset: ILCD process, EPD, representative dataset
Geography: DE
Reference year: 2015
Valid until: 2020
Classification: OEKOBAU.DAT: Beschichtungen / Innenbeschichtungen / Innenfarben
Classification: IBUCategories: 02 Bauprodukte / Bauklebstoffe und Beschichtungen / Beschichtungen mit organischen Bindemitteln
Method details: Beschichtungen mit organischen Bindemitteln.pdf
Owner: Brillux GmbH & Co. KG
Compliance: DIN EN 15804; ISO 14025
Review: Accredited third party review by IBU
Amounts: rows without a unit in brackets have none in this file; such an amount is in the reference unit of its flow, which a separate flow dataset defines
copyright: true

## General comment
Brillux Super Latex ELF 3000 ist eine stumpfmatte, hoch diffusionsfähige, emissionsarme, lösemittel- und weichmacherfreie Innendispersionsfarbe mit gutem Deckvermögen und besonders langer Offenzeit. Ausgezeichnet vom /TÜV Süd/ mit dem TÜV Gütezeichen >> Emissionsarm, Schadstoffgeprüft und Produktion überwacht <<.

Es handelt sich um ein werkseitig hergestelltes flüssiges Gemisch mit organischem Bindemittel, organischen und mineralischen Füllstoffen, Pigmenten, Wasser und Zusatzstoffen. Die Verfestigung erfolgt durch Trocknung und Verfilmung des Polymerbindemittels.

## Technology and included processes
Brillux Super Latex ELF 3000 ist eine stumpfmatte, hoch diffusionsfähige, emissionsarme, lösemittel- und weichmacherfreie Innendispersionsfarbe mit gutem Deckvermögen und besonders langer Offenzeit. Ausgezeichnet vom /TÜV Süd/ mit dem TÜV Gütezeichen >> Emissionsarm, Schadstoffgeprüft und Produktion überwacht <<. Es handelt sich um ein werkseitig hergestelltes flüssiges Gemisch mit organischem Bindemittel, organischen und mineralischen Füllstoffen, Pigmenten, Wasser und Zusatzstoffen. Die Verfestigung erfolgt durch Trocknung und Verfilmung des Polymerbindemittels.
Deklarierte Einheit:
Die Deklaration bezieht sich auf 1 kg Brillux Super Latex ELF 3000. Da Farben nach Volumen (Liter) verkauft werden, ist nachfolgend der Verbrauch volumenbezogen angegeben.

## Technical purpose
Für Decken- und Wandanstriche im Innenbereich, wie z. B. Innenputz, Beton, Gipskarton, Faserzementplatten, Kalksandsteinmauerwerk, Brillux Relief 3490, Brillux Rapidvlies 1525, Brillux CreaGlas Gewebe und Raufaser. Aufgrund der langen Offenzeit besonders geeignet für größere und zusammenhängende Flächen mit Streiflichteinfall. Der Verbrauch beträgt ca. 0,130 - 0,150 l/m².

## Reference product
- 1 kg Brillux Super Latex ELF 3000: 1

## Inputs
- Erneuerbare Primärenergie als Energieträger (PERE) [MJ]: A1-A3 1.46
- Erneuerbare Primärenergie zur stofflichen Nutzung (PERM) [MJ]: A1-A3 0
- Total erneuerbare Primärenergie (PERT) [MJ]: A1-A3 1.46
- Nicht-erneuerbare Primärenergie als Energieträger (PENRE) [MJ]: A1-A3 18.4358
- Nicht-erneuerbare Primärenergie zur stofflichen Nutzung (PENRM) [MJ]: A1-A3 3.76
- Total nicht erneuerbare Primärenergie (PENRT) [MJ]: A1-A3 22.2
- Einsatz von Sekundärstoffen (SM) [kg]: A1-A3 0
- Erneuerbare Sekundärbrennstoffe (RSF) [MJ]: A1-A3 0
- Nicht erneuerbare Sekundärbrennstoffe (NRSF) [MJ]: A1-A3 0
- Einsatz von Süßwasserressourcen (FW) [m^3]: A1-A3 0.0084

## Outputs
- Gefährlicher Abfall zur Deponie (HWD) [kg]: A1-A3 0.00325
- Entsorgter nicht gefährlicher Abfall (NHWD) [kg]: A1-A3 0.021
- Entsorgter radioaktiver Abfall (RWD) [kg]: A1-A3 0.000747
- Komponenten für die Wiederverwendung (CRU) [kg]
- Stoffe zum Recycling (MFR) [kg]
- Stoffe für die Energierückgewinnung (MER) [kg]
- Exportierte elektrische Energie (EEE) [MJ]
- Exportierte thermische Energie (EET) [MJ]

## Impact indicators
- Globales Erwärmungspotenzial (GWP) [kg CO_(2)-Äq.]: A1-A3 1.18
- Abbau Potential der stratosphärischen Ozonschicht (ODP) [kg CFC11-Äq.]: A1-A3 2.99e-10
- Versauerungspotenzial von Boden und Wasser (AP) [kg SO_(2)-Äq.]: A1-A3 0.0268
- Eutrophierungspotenzial (EP) [kg PO_(4)^(3)-Äq.]: A1-A3 0.000382
- Bildungspotential für troposphärisches Ozon (POCP) [kg Ethen-Äq.]: A1-A3 0.00113
- Potenzial für den abiotischen Abbau nicht fossiler Ressourcen (ADPE) [kg Sb-Äq.]: A1-A3 2.11e-6
- Potenzial für den abiotischen Abbau fossiler Brennstoffe (ADPF) [MJ]: A1-A3 20.4

## Use advice
Gültigkeitsbereich:
In dieser Produktdeklaration wird die Innendispersionsfarbe Brillux Super Latex ELF 3000 betrachtet, die am Standort Münster/Westfalen hergestellt wird.
Systemgrenze:
Diese Ökobilanz adressiert das Lebenszyklusstadium der Produktherstellung (Wiege bis Werktor). Das Produktstadium umfasst die Module A1 (Rohstoffbereitstellung), A2 (Transport), A3 (Herstellung) gemäß der /DIN EN 15804/.

## Data sources
- Brillux Super Latex ELF 3000.pdf
- GaBi Database (all versions)
- GaBi database SP28 2015
