# MISAPOR Schaumglas 10/50

Dataset: ILCD process, EPD, specific dataset
Geography: DE
Reference year: 2015
Valid until: 2020
Classification: OEKOBAU.DAT: Dämmstoffe / Schaumglas / Platten
Classification: IBUCategories: 01 Grundstoffe und Vorprodukte / Zuschlagsstoffe / Leichtzuschlag / Schüttgranulat
Method details: Leichtzuschlag / Schüttgranulat.pdf
Registration number: 7613
Owner: MISAPOR AG
Compliance: DIN EN 15804; ISO 14025
Review: Accredited third party review by Institut Bauen und Umwelt e. V.
Amounts: rows without a unit in brackets have none in this file; such an amount is in the reference unit of its flow, which a separate flow dataset defines
copyright: true

## General comment
MISAPOR Schaumglas ist ein künstlich hergestelltes und gebrochenes Korngemisch, das durch Aufblähen von gemahlenem Altglas hergestellt wird. Die typische Schüttdichte (trocken) liegt im Bereich von etwa 125 bis 190 kg/m3. Der Wärmedämmstoff "MISAPOR" wird in mehreren Fraktionen hergestellt.

## Technology and included processes
MISAPOR Schaumglas ist ein künstlich hergestelltes und gebrochenes Korngemisch, das durch Aufblähen von gemahlenem Altglas hergestellt wird. Die typische Schüttdichte (trocken) liegt im Bereich von etwa 125 bis 190 kg/m3. Der Wärmedämmstoff "MISAPOR" wird in mehreren Fraktionen hergestellt.
Deklarierte Einheit:
Die deklarierte Einheit bezieht sich auf 1m3 MISAPOR Schaumglas. Die Schüttdichte dieses Produkts beträgt 165 kg/m3. Die Übertragung der Ergebnisse auf andere Schüttdichten ist über eine lineare Skalierung möglich.

## Technical purpose
Übliche Anwendungen sind die Wärmedämmung/ Frostschutzschicht unter Fundamenten oder Gründungsplatten und in Bereichen mit Bodenfrost sowie als Leichtschüttung. Unter Tragwerken wird das Schüttmaterial verdichtet, um eine optimale Tragfähigkeit zu erhalten, allerdings ohne übermäßige Kornzertrümmerung. Grundsätzlich wird das Material im Verhältnis 1,3:1 verdichtet. Die Verdichtung kann jedoch je nach Anwendungsbereich angepasst werden.

Bereiche für den Hoch- und Tiefbau:

Perimeterdämmung
Fussboden
Zwischendecke
Industriehallen
Hochbelastbare Deckenkonstruktionen
Strassenbau
Brückenbau
Sonderbauten (Sportplätze, Flughäfen, Golfplätze)
Drainageleitungen
Sanierung im Altbaubestand

## Reference product
- 1 m³ MISAPOR Schaumglas 10/50: 1

## Inputs
- Erneuerbare Primärenergie als Energieträger (PERE) [MJ]: A1-A3 112.771
- Erneuerbare Primärenergie zur stofflichen Nutzung (PERM) [MJ]: A1-A3 0
- Total erneuerbare Primärenergie (PERT) [MJ]: A1-A3 112.771
- Nicht-erneuerbare Primärenergie als Energieträger (PENRE) [MJ]: A1-A3 824.406
- Nicht-erneuerbare Primärenergie zur stofflichen Nutzung (PENRM) [MJ]: A1-A3 0
- Total nicht erneuerbare Primärenergie (PENRT) [MJ]: A1-A3 824.406
- Einsatz von Sekundärstoffen (SM) [kg]: A1-A3 169.162
- Erneuerbare Sekundärbrennstoffe (RSF) [MJ]
- Nicht erneuerbare Sekundärbrennstoffe (NRSF) [MJ]
- Einsatz von Süßwasserressourcen (FW) [m^3]: A1-A3 0.4719

## Outputs
- Gefährlicher Abfall zur Deponie (HWD) [kg]: A1-A3 0.000466
- Entsorgter nicht gefährlicher Abfall (NHWD) [kg]: A1-A3 4.94
- Entsorgter radioaktiver Abfall (RWD) [kg]: A1-A3 0.0078
- Komponenten für die Wiederverwendung (CRU) [kg]
- Stoffe zum Recycling (MFR) [kg]: A1-A3 0.466
- Stoffe für die Energierückgewinnung (MER) [kg]
- Exportierte elektrische Energie (EEE) [MJ]
- Exportierte thermische Energie (EET) [MJ]

## Impact indicators
- Globales Erwärmungspotenzial (GWP) [kg CO_(2)-Äq.]: A1-A3 19.2311
- Abbau Potential der stratosphärischen Ozonschicht (ODP) [kg CFC11-Äq.]: A1-A3 2.67357e-6
- Versauerungspotenzial von Boden und Wasser (AP) [kg SO_(2)-Äq.]: A1-A3 0.0909877
- Eutrophierungspotenzial (EP) [kg PO_(4)^(3)-Äq.]: A1-A3 0.044009
- Bildungspotential für troposphärisches Ozon (POCP) [kg Ethen-Äq.]: A1-A3 0.00352986
- Potenzial für den abiotischen Abbau nicht fossiler Ressourcen (ADPE) [kg Sb-Äq.]: A1-A3 5.9272e-5
- Potenzial für den abiotischen Abbau fossiler Brennstoffe (ADPF) [MJ]: A1-A3 246.251

## Use advice
Gültigkeitsbereich:
Dieses Dokument bezieht sich auf die Herstellung von 1 m3 MISAPOR Schaumglas hergestellt am Produktionsstandort Dagmersellen, Schweiz der MISAPOR AG. Für die Umrechnung auf m3 wurde ein spezifisches Schüttgewicht von 165 kg angenommen.
Systemgrenze:
Es wurden die Systemgrenzen "Wiege bis Werkstor" (Cradle-to-Gate) gewählt. Diese umfassen die Herstellung des Produkts einschliesslich der Vorkette (Bereitstellung sowie anteilige Transporte der Rohstoffe) bis zum fertig verladebereiten Produkt am Werkstor des Betriebsstandortes Dagmersellen (Schweiz). Die Nutzung wird wegen der vielseitigen Anwendungsmöglichkeiten und Konstruktionen nicht in die Berechnung einbezogen. Die Entsorgung des Schaumglas ist aufgrund der langen Lebensdauer noch nicht hinreichend quantifizierbar und wird deshalb nicht in die Bilanzierung mit einbezogen.

## Data sources
- MISAPOR Schaumglas 10/50.pdf
- ecoinvent database (all versions)
- ecoinvent 2.2 database
