# Sikaplan SGmA

Dataset: ILCD process, EPD, specific dataset
Geography: RER
Reference year: 2015
Valid until: 2020
Classification: OEKOBAU.DAT: Kunststoffe / Dachbahnen / PVC-Dachbahnen
Classification: IBUCategories: 02 Bauprodukte / Abdichtungen / Dach- und Dichtungsbahnsysteme aus Kunststoffen und Elastomeren
Method details: Dach- und Dichtungsbahnsysteme aus Kunststoffen und Elastomeren.pdf
Owner: Sika Deutschland GmbH
Compliance: DIN EN 15804; ISO 14025
Review: Accredited third party review by IBU
Amounts: rows without a unit in brackets have none in this file; such an amount is in the reference unit of its flow, which a separate flow dataset defines
copyright: true

## General comment
Sikaplan SGmA is a multi-layer polymeric waterproofing sheet based on polyvinyl chloride (PVC) with an embedded fleece layer (DE/E1 PVC-P-NB-E-GV).

Sikaplan SGmA polymeric waterproofing sheets are available in the following thicknesses: 1.5 mm (SGmA 15), 1.8 mm (SGmA 18), 2.0 mm (SGmA 20) and 2.4 mm (SGmA 24).

An average value of the various thicknesses of Sikaplan SGmA waterproofing membrane was not used for the calculation of the life cycle assessment. Rather, all values given apply to Sikaplan SGmA 15, and a formula for individually calculating values for the other thicknesses is given in Chapter 5.

## Technology and included processes
Sikaplan SGmA polymeric waterproofing sheets are manufactured in the following steps: Dosing of the various raw materials and classification of the mixture in an extruder Rolling the melt into sheets by calendar pressing Cooling and reeling the sheets Heat fusing of two sheets (top and bottom layers), embedding a glass fleece layer, on a lamination machine Trimming the sheets and winding them onto cardboard spools made of recycled paper Wrapping the roles in PE stretch film, palletisingProduction waste such as scrap is recycled by feeding it directly back into the manufacturing process. Sika maintains a quality management system certified in accordance with /ISO 9001/.
Technical data:
In the following table, only technical data relevant to Sikaplan SGmA waterproofing sheets are given.
Declared unit:
This declaration applies to 1 m² of Sikaplan SGmA polymeric waterproofing membrane, thickness 1.5 mm. A formula is given for independent calculation of the values for other thicknesses.

## Technical purpose
Sikaplan SGmA waterproofing sheets are used mainly for waterproofing flat roofs. They sheets are loose laid in all types of ballasted roofing systems, green roof systems and in gravel-ballasted roof systems. The sheets must not be left exposed; the ballast covering must be applied within three months.

## Reference product
- 1 m² Dachbahn: 1

## Inputs
- Erneuerbare Primärenergie als Energieträger (PERE) [MJ]: A1-A3 5.15508, A5 0.412406
- Erneuerbare Primärenergie zur stofflichen Nutzung (PERM) [MJ]: A1-A3 1.45603, A5 0.116483
- Total erneuerbare Primärenergie (PERT) [MJ]: A1-A3 6.61111, A4 0.036204, A5 0.575685, C2 0.0176, C3 0.341, D -5.48
- Nicht-erneuerbare Primärenergie als Energieträger (PENRE) [MJ]: A1-A3 94.7696, A5 7.58157
- Nicht-erneuerbare Primärenergie zur stofflichen Nutzung (PENRM) [MJ]: A1-A3 45.0489, A5 3.59992
- Total nicht erneuerbare Primärenergie (PENRT) [MJ]: A1-A3 139.815, A4 0.610185, A5 11.647, C2 0.449, C3 1.64, D -107
- Einsatz von Sekundärstoffen (SM) [kg]
- Erneuerbare Sekundärbrennstoffe (RSF) [MJ]
- Nicht erneuerbare Sekundärbrennstoffe (NRSF) [MJ]
- Einsatz von Süßwasserressourcen (FW) [m^3]: A1-A3 0.010278, A4 2.34e-5, A5 0.001251, C2 1.24e-5, C3 0.000827, D -0.0182

## Outputs
- Gefährlicher Abfall zur Deponie (HWD) [kg]: A1-A3 0.00487, A4 2.7e-6, A5 0.000449, C2 1.02e-6, C3 0.000492, D -0.00634
- Entsorgter nicht gefährlicher Abfall (NHWD) [kg]: A1-A3 0.127778, A4 0.000117, A5 0.075432, C2 5.64e-5, C3 0.00474, D -0.0322
- Entsorgter radioaktiver Abfall (RWD) [kg]: A1-A3 0.003398, A4 8.5e-7, A5 0.000296, C2 5.87e-7, C3 0.00019, D -0.00367
- Komponenten für die Wiederverwendung (CRU) [kg]
- Stoffe zum Recycling (MFR) [kg]: C3 1.91
- Stoffe für die Energierückgewinnung (MER) [kg]
- Exportierte elektrische Energie (EEE) [MJ]: A5 0.183, C3 0.117
- Exportierte thermische Energie (EET) [MJ]: A5 0.516, C3 0.34

## Impact indicators
- Globales Erwärmungspotenzial (GWP) [kg CO_(2)-Äq.]: A1-A3 5.5, A4 0.044537, A5 0.628563, C2 0.0324, C3 0.236, D -4.09
- Abbau Potential der stratosphärischen Ozonschicht (ODP) [kg CFC11-Äq.]: A1-A3 7.02e-8, A4 1.06e-13, A5 5.62e-9, C2 1.55e-13, C3 9.39e-12, D -1.73e-9
- Versauerungspotenzial von Boden und Wasser (AP) [kg SO_(2)-Äq.]: A1-A3 0.012222, A4 0.000162, A5 0.001168, C2 0.000164, C3 0.000256, D -0.0086
- Eutrophierungspotenzial (EP) [kg PO_(4)^(3)-Äq.]: A1-A3 0.001537, A4 3.72e-5, A5 0.000136, C2 3.75e-5, C3 3.4e-5, D -0.00102
- Bildungspotential für troposphärisches Ozon (POCP) [kg Ethen-Äq.]: A1-A3 0.003083, A4 1.93e-5, A5 0.000254, C2 1.75e-5, C3 1.74e-5, D -0.00283
- Potenzial für den abiotischen Abbau nicht fossiler Ressourcen (ADPE) [kg Sb-Äq.]: A1-A3 2.14e-5, A4 2.09e-9, A5 1.76e-6, C2 1.22e-9, C3 2.47e-8, D -1.72e-5
- Potenzial für den abiotischen Abbau fossiler Brennstoffe (ADPF) [MJ]: A1-A3 128.704, A4 0.607407, A5 10.6969, C2 0.447, C3 1.16, D -97.8

## Use advice
Scope:
This document applies to Sikaplan SGmA polymeric waterproofing membrane manufactured by Sika Trocal GmbH in 53840 Troisdorf, Germany. The lifecycle assessment data are based on production data from 2014 collected by Sika Services AG.
System boundary:
Type of EPD: Cradle to gate with options

The system boundaries of the EPD follow the modular structuring system described by /EN 15804/. The LCA takes into account the following modules:
A1-A3: Manufacturing of pre-products, packaging, ancillary materials, transport to the factory, production including energy supply and waste handling
A4: Transport to the building site
A5: Installation into the building (welding energy, disposal of packaging and scrap membrane)
C1: Deconstruction and demolition
C2: Transport to waste-processing facility
C3: Waste processing for reuse, recovery and/or recycling
C4: Disposal (waste incineration)
D: Potential for reuse, recovery and/or recycling as net flows and benefits

## Data sources
- Sikaplan SGmA.pdf
- GaBi Database (all versions)
- GaBi database SP26 2014
