# Tageslichtsysteme - JET Brakel Aero GmbH - JET BA 5/6-Verglasungssystem; Glasdachkonstruktion; Aluminium-Glasarchitektur; Verglasungssystem; Glasarchitektur

Dataset: ILCD process, EPD, representative dataset
Geography: DE
Reference year: 2018
Valid until: 2023
Classification: Komponenten von Fenstern und Vorhangfassaden / Füllungen / Transparente Füllungen
Classification: OEKOBAU.DAT: Komponenten von Fenstern und Vorhangfassaden / Füllungen / Transparente Füllungen
Method details: Produktkategorieregeln Teil A; Produktkategorieregeln Teil B – für Fassaden und Dächer aus Glas und Kunststoff; EPD Glasarchitektur
Owner: JET Brakel Aero GmbH
Compliance: EN 15804
Review: Independent external review by Dr.-Ing. Carolin Roth
Amounts: rows without a unit in brackets have none in this file; such an amount is in the reference unit of its flow, which a separate flow dataset defines
copyright: true

## General comment
Dieser Datensatz beinhaltet die Ergebnisse für die Module A1-A3 sowie die Module A4, A5, B2, B3, C2, C3, C4, D gemäß EN 15804. Ein Vergleich mit anderen Produkten ist nur mit einer vergleichbaren Anwendung im Gebäude zulässig. Grundsätzlich ist eine Gegenüberstellung oder die Bewertung von EPD Daten nur möglich, wenn alle zu vergleichenden Datensätze nach EN 15804 erstellt wurden und der Gebäudekontext, bz. die produktspezifischen Leistungsmerkmale berücksichtigt werden.

## Geography
Dieser Datensatz repräsentiert die Situation des Unternehmens JET Brakel Aero GmbH in 46562 Voerde, Deutschland im Hinblick auf die wichtigsten Technologien und die gesetzlichen Rahmenbedingungen.

## Time period
jährlicher Durchschnitt

## Technology and included processes
Die Ökobilanzergebnisse umfassen die Lebenszyklusstadien der Herstellung der Vorprodukte bis hin zur Rohstoffgewinnung und Verarbeitungsprozesse von als Input dienenden Sekundärstoffen (z.B. Recyclingprozesse), deren Transporte zum Werk sowie die Produktion selbst, einschließlich der Bereitstellung von allen Hilfs- und Betriebsstoffen, Energie, sowie die vollständige Abfallbehandlung oder die Deponierung der Restabfälle während des Stadiums der Produktion. Die Module A1, A2 und A3 sind hier als ein aggregiertes Modul A1-A3 ausgewiesen. Falls für diesen Datensatz weitere Module berechnet wurden, sind diese separat zu finden und können für eine Betrachtung des gesamten Lebenszyklus zusammengeführt werden.

## Technical purpose
Die Glasdachkonstruktion dient neben der eigentlichen Funktion als Dach zusätzlich der Erhöhung des Tageslichteinfalls sowie der natürlichen Be- und Entlüftung.

## Reference product
- Tageslichtsysteme - JET Brakel Aero GmbH - JET BA 5/6-Verglasungssystem: 1

## Inputs
- Use of net fresh water (FW) [m3]: A1-A3 2.24, A4 0.00183, A5 0.00149, B2 0.0102, B3 0.0204, C2 0.000681, C3 0.0137, C4 0, D -0.82
- Use of non renewable primary energy (PENRE) [MJ]: A1-A3 3640, A4 23.5, A5 0.62, B2 2.42, B3 45.7, C2 8.45, C3 48.5, C4 13.3, D -910
- Use of non renewable primary energy resources used as raw materials (PENRM) [MJ]: A1-A3 81, A4 0, A5 0.2, B2 0, B3 36.2, C2 0, C3 -44.6, C4 0, D 0
- Use of non renewable secondary fuels (NRSF) [MJ]: A1-A3 0, A4 0, A5 0, B2 0, B3 0, C2 0, C3 0, C4 0, D 0
- Use of renewable primary energy (PERE) [MJ]: A1-A3 705, A4 1.58, A5 4.88, B2 0.351, B3 3, C2 0.539, C3 1.07, C4 1.55, D -295
- Use of renewable primary energy resources used as raw materials (PERM) [MJ]: A1-A3 4.56, A4 0, A5 -4.56, B2 0, B3 0, C2 0, C3 0, C4 0, D 0
- Use of renewable secondary fuels (RSF) [MJ]: A1-A3 0, A4 0, A5 0, B2 0, B3 0, C2 0, C3 0, C4 0, D 0
- Use of secondary material (SM) [kg]: A1-A3 2.34, A4 0, A5 0, B2 0, B3 0, C2 0, C3 0, C4 0, D -87.8
- Total use of non renewable primary energy resource (PENRT) [MJ]: A1-A3 3720, A4 23.5, A5 0.823, B2 2.42, B3 81.9, C2 8.45, C3 3.89, C4 13.3, D -910
- Total use of renewable primary energy resources (PERT) [MJ]: A1-A3 710, A4 1.58, A5 0.322, B2 0.351, B3 2.88, C2 0.539, C3 1.07, C4 1.55, D -295

## Outputs
- Components for re-use (CRU) [kg]: A1-A3 0, A4 0, A5 0, B2 0, B3 0, C2 0, C3 0, C4 0, D 0
- Exported electrical energy (EEE) [MJ]: A1-A3 0, A4 0, A5 0.55, B2 0, B3 4.09, C2 0, C3 10.3, C4 0, D 0
- Exported thermal energy (EET) [MJ]: A1-A3 0, A4 0, A5 1.27, B2 0, B3 10, C2 0, C3 25.2, C4 0, D 0
- Hazardous waste disposed (HWD) [kg]: A1-A3 1.06e-5, A4 1.48e-6, A5 4.17e-9, B2 8.49e-8, B3 5.71e-7, C2 5.13e-7, C3 5.64e-7, C4 2.1e-7, D -5.13e-7
- Materials for energy recovery (MER) [kg]: A1-A3 0, A4 0, A5 0, B2 0, B3 0, C2 0, C3 0, C4 0, D 0
- Materials for recycling (MFR) [kg]: A1-A3 1.6, A4 0, A5 0, B2 0, B3 0, C2 0, C3 26.7, C4 0, D 0
- Non hazardous waste dispose (NHWD) [kg]: A1-A3 40.7, A4 0.00181, A5 0.0115, B2 0.468, B3 0.738, C2 0.000648, C3 0.24, C4 61.8, D -14.7
- Radioactive waste disposed (RWD) [kg]: A1-A3 0.149, A4 3.56e-5, A5 4.45e-5, B2 7.58e-5, B3 0.00239, C2 1.25e-5, C3 0.000454, C4 0.000182, D -0.0371

## Impact indicators
- Abiotic depletion potential for non fossil resources (ADPE) [kg Sb-Äqv.]: A1-A3 0.00203, A4 1.85e-7, A5 2.48e-6, B2 3.96e-7, B3 9.03e-7, C2 6.29e-8, C3 4.12e-7, C4 3.56e-7, D -0.000237
- Abiotic depletion potential for fossil resources (ADPF) [MJ]: A1-A3 3340, A4 23.5, A5 0.711, B2 2.23, B3 76, C2 8.42, C3 2.75, C4 12.9, D -822
- Acidification potential of soil and water (AP) [kg SO2-Äqv.]: A1-A3 1.21, A4 0.00721, A5 0.000165, B2 0.00193, B3 0.00772, C2 0.00378, C3 0.00109, C4 0.00588, D -0.321
- Eutrophication potential (EP) [kg Phosphat-Äqv.]: A1-A3 0.135, A4 0.00178, A5 2.18e-5, B2 0.0014, B3 0.00135, C2 0.000953, C3 0.000119, C4 0.000801, D -0.0173
- Global warming potential (GWP) [kg CO2-Äqv.]: A1-A3 284, A4 1.73, A5 0.475, B2 1.44, B3 5.3, C2 0.62, C3 5.39, C4 1, D -76.7
- Depletion potential of the stratospheric ozone layer (ODP) [kg CFC 11 eq.]: A1-A3 3.75e-8, A4 3.42e-13, A5 8.5e-13, B2 7.93e-13, B3 5.29e-8, C2 1.39e-13, C3 1e-11, C4 3.36e-12, D 7.11e-7
- Formation potential of tropospheric ozone (POCP) [kg Ethen-Äqv.]: A1-A3 0.0828, A4 -0.00263, A5 1.69e-5, B2 0.000109, B3 0.00136, C2 -0.00168, C3 6.74e-5, C4 0.000465, D -0.0255

## Use advice
A1-A3 sowie Module A4, A5, B2, B3, C2, C3, C4, D . Das Umweltprofil beinhaltet die Aufwendungen für die Lebenszyklus-Stadien cradle-to-gate mit Optionen (Modul A1-A3). Die Herstellung der Verpackung wurde innerhalb der Module A1-A3 berücksichtigt.

## Review details
Die angewendete LCI Methode ist in Übereinstimmung mit ISO 14040 und 14044. Die Dokumentation enthält alle relevanten Informationen im Hinblick auf die Datenqualität und den Umfang der Anwendung der jeweiligen LCI Ergebnisse bzw. der Datensätze. Der Datensatz repräsentiert den Stand der Technik bezogen auf die funktionelle Einheit.

## Data sources
- GaBi database (all versions)
