# Tectofin RV

Dataset: ILCD process, EPD, specific dataset
Geography: DE
Reference year: 2015
Valid until: 2020
Classification: OEKOBAU.DAT: Kunststoffe / Dachbahnen / PVC-Dachbahnen
Classification: IBUCategories: 02 Bauprodukte / Abdichtungen / Dach- und Dichtungsbahnsysteme aus Kunststoffen und Elastomeren
Method details: Dach- und Dichtungsbahnsysteme aus Kunststoffen und Elastomeren.pdf
Owner: WOLFIN Bautechnik GmbH
Compliance: DIN EN 15804; ISO 14025
Review: Accredited third party review by IBU
Amounts: rows without a unit in brackets have none in this file; such an amount is in the reference unit of its flow, which a separate flow dataset defines
copyright: true

## General comment
TECTOFIN RV Dach- und Dichtungsbahnen sind unterseitig polyestervlieskaschierte, im Extrusionsverfahren hergestellte, hochpolymere, durchgehend homogene (keine unterschiedlichen Ober- Mittel- Unterschichten) Kunststoff Dach- und Dichtungsbahnen.

## Technology and included processes
Polyvinylchlorid40 - 45M-% Adipinsäurpolyester25 - 30M-% Biocide Ausrüstung0 - 1M-% FlammschutzkeineM-% Füllstoff (1)10 - 14M-% Ca/Zn Stabilisator2,0 - 3,0M-% Epoxiertes Sojabohnenöl2,0 - 3,0 M-% AdditivekeineM-% Titandioxid (1)4 - 5M-% Ruß0 – 2,0M-% Schlagzähmodifizierer1,5 - 2,5M-% Herstellung: Die Grundstoffe der Rezeptur werden in einem Mischer zusammengeführt und gemischt und anschließend in einem Extruder geknetet und plastifiziert. Durch eine Breitschlitzdüse wird im Extrusionsverfahren die komplette Dichtschicht in einem Arbeitsschritt gefertigt. Nach dem Austritt aus der Breitschlitzdüse wird im Walzenspalt das zugeführte Polyestervlies mit Druck im Walzenspalt mit der Bahn verbunden. Über Kühlwalzen erfolgt die Abkühlung der Bahn. Auf dem Weg zur Konfektionierung erhält die Bahn einen eindeutigen Bahnenaufdruck inkl. Chargennummmer zur Rückverfolgbarkeit. Die Bahn wird auf die entsprechende Breite zugeschnitten. Da die TECTOFIN RV Bahn über keine mittige Verstärkung oder Einlage verfügt, können die Randabschnitte komplett recycelt und dem Produktionsprozess wieder zugeführt werden. Die Produktion ist nach /DIN EN ISO 9001/ zertifiziert.
Deklarierte Einheit:
Die deklarierte Einheit ist 1 m² produzierte Dachbahn TECTOFIN RV mit der Dicke 1,5 mm. Die Bahnen werden lose mit Auflast oder streifenweise bzw. vollflächig mit Systemklebstoffen verklebt verlegt. Die Auflast oder Befestigungselemente sind nicht in dieser Produktdeklaration enthalten.

## Technical purpose
Einlagige Dach,- und Bauwerksabdichtung. Die Bahnen werden lose mit Auflast (Kies, Platten, Begrünung) oder streifenweise bzw. vollflächig mit Systemklebstoffen verklebt verlegt.

## Reference product
- 1 m² Tectofin RV: 1

## Inputs
- Erneuerbare Primärenergie als Energieträger (PERE) [MJ]: A1-A3 0.693
- Erneuerbare Primärenergie zur stofflichen Nutzung (PERM) [MJ]: A1-A3 13
- Total erneuerbare Primärenergie (PERT) [MJ]: A1-A3 13.7, C2 0.00378, C4 1.27, D -2.29
- Nicht-erneuerbare Primärenergie als Energieträger (PENRE) [MJ]: A1-A3 108
- Nicht-erneuerbare Primärenergie zur stofflichen Nutzung (PENRM) [MJ]: A1-A3 60.2
- Total nicht erneuerbare Primärenergie (PENRT) [MJ]: A1-A3 168, C2 0.0638, C4 14.9, D -22.6
- Einsatz von Sekundärstoffen (SM) [kg]: A1-A3 0, C2 0, C4 0
- Erneuerbare Sekundärbrennstoffe (RSF) [MJ]: A1-A3 0, C2 0, C4 0, D 0
- Nicht erneuerbare Sekundärbrennstoffe (NRSF) [MJ]: A1-A3 0, C2 0, C4 0, D 0
- Einsatz von Süßwasserressourcen (FW) [m^3]: A1-A3 0.0522, C2 2.45e-6, C4 0.0109, D -0.00309

## Outputs
- Gefährlicher Abfall zur Deponie (HWD) [kg]: A1-A3 0.0105, C2 2.83e-7, C4 0.00171, D -0.00332
- Entsorgter nicht gefährlicher Abfall (NHWD) [kg]: A1-A3 0.334, C2 1.22e-5, C4 3.57, D -0.0056
- Entsorgter radioaktiver Abfall (RWD) [kg]: A1-A3 0.00434, C2 8.89e-8, C4 0.000658, D -0.00127
- Komponenten für die Wiederverwendung (CRU) [kg]: A1-A3 0, C2 0, C4 0
- Stoffe zum Recycling (MFR) [kg]: A1-A3 0, C2 0, C4 0
- Stoffe für die Energierückgewinnung (MER) [kg]: A1-A3 0, C2 0, C4 0
- Exportierte elektrische Energie (EEE) [MJ]: A1-A3 0, C2 0, C4 4.5
- Exportierte thermische Energie (EET) [MJ]: A1-A3 0, C2 0, C4 11

## Impact indicators
- Globales Erwärmungspotenzial (GWP) [kg CO_(2)-Äq.]: A1-A3 8.72, C2 0.00466, C4 5.49, D -1.47
- Abbau Potential der stratosphärischen Ozonschicht (ODP) [kg CFC11-Äq.]: A1-A3 3.67e-10, C2 1.12e-14, C4 3.1e-11, D -5.96e-11
- Versauerungspotenzial von Boden und Wasser (AP) [kg SO_(2)-Äq.]: A1-A3 0.0182, C2 2.13e-5, C4 0.00722, D -0.00208
- Eutrophierungspotenzial (EP) [kg PO_(4)^(3)-Äq.]: A1-A3 0.00352, C2 5.1e-6, C4 0.000266, D -0.000249
- Bildungspotential für troposphärisches Ozon (POCP) [kg Ethen-Äq.]: A1-A3 0.0036, C2 -7.17e-6, C4 0.000237, D -0.000193
- Potenzial für den abiotischen Abbau nicht fossiler Ressourcen (ADPE) [kg Sb-Äq.]: A1-A3 1.82e-5, C2 2.19e-10, C4 4.92e-6, D -1.74e-7
- Potenzial für den abiotischen Abbau fossiler Brennstoffe (ADPF) [MJ]: A1-A3 157, C2 0.0636, C4 13.2, D -19.4

## Use advice
Gültigkeitsbereich:
Diese Deklaration gilt für Tectofin RV Dach- und Dichtungsbahnen der Dicke 1,5 mm, die am Standort Wächtersbach in Deutschland hergestellt werden.
Systemgrenze:
Typ der EPD: Wiege bis Werkstor - mit Optionen.

Die Ökobilanz berücksichtigt die Rohstoff- und Energiegewinnung, Rohstofftransporte und die Produktherstellung (Module A1-A3), sowie den Transport nach dem Rückbau (Modul C2), die Abfallbehandlung (thermische Verwertung, Modul C4) und Nutzenpotentiale außerhalb der Systemgrenze für die thermische Verwertung (Modul D).

## Data sources
- Tectofin RV.pdf
- GaBi Database (all versions)
- GaBi database SP25 2014
