# Betonpflaster- Standardstein grau mit Vorsatz

Dataset: ILCD process, EPD, average dataset
Geography: DE
Reference year: 2015
Valid until: 2020
Classification: OEKOBAU.DAT: Mineralische Baustoffe / Steine und Elemente / Betonfertigteile und Betonwaren
Classification: IBUCategories: 02 Bauprodukte / Tiefbauprodukte / Oberbaumaterialien für Verkehrswege im Aussenbereich
Method details: Oberbaumaterialien für Verkehrswege im Aussenbereich.pdf
Owner: Betonverband Straße, Landschaft, Garten e.V.
Compliance: DIN EN 15804; ISO 14025
Review: Accredited third party review by IBU
Amounts: rows without a unit in brackets have none in this file; such an amount is in the reference unit of its flow, which a separate flow dataset defines
copyright: true

## General comment
Pflastersteine aus Beton werden aus natürlichen Gesteinskörnungen, Zement und Wasser, mit oder ohne Zugabe von Zusatzmitteln und Zusatzstoffen maschinell hergestellt.

Für das Inverkehrbringen der Produkte in der EU/EFTA (mit Ausnahme der Schweiz) gilt die Verordnung (EU) Nr. 305/2011: Die Produkte bedürfen einer Leistungserklärung unter Berücksichtigung der /EN 1338:2003 Pflastersteine aus Beton Anforderungen und Prüfverfahren/ und der CE-Kennzeichnung. Die Steine haben unterschiedliche Formate (Breite/Länge) und eine Dicke von 10 cm. Ihre Oberseite ist nicht geschliffen oder poliert oder so hergestellt, dass diese glatt ist.
Das mittlere Flächengewicht beträgt 225 kg/m².

## Technology and included processes
Die deklarierten Betonsteine werden nach DIN EN 1338 hergestellt. Der Produktionsprozess ist stark mechanisiert und bei allen Herstellern sehr ähnlich. Der Transport auf die Baustelle erfolgt in der Regel auf Holzpaletten . Die Steine sind dabei mit Kunststoffbändern und / oder Stretch-/Abdeckfolie zu einer Ladeeinheit verpackt. Weitere Informationen auf www.betonstein.org
Technische Daten:
Die deklarierten Betonpflastersteine sind so hergestellt, dass sie einen ausreichenden Gleit-/Rutschwiderstand aufweisen.

Folgende technische Eigenschaften sind im Lieferzustand gem. /DIN EN 1338/ Pflastersteine aus Beton gegeben:
Deklarierte Einheit:
Die Deklaration bezieht sich auf die Herstellung von 1 m² Betonpflastersteine grau mit Vorsatz mit einem mittleren Flächengewicht von 225 kg/m² und einer Pflastersteindicke von 10 cm.
Jedoch werden in dieser EPD zusätzliche Informationen zum möglichen Straßenaufbau, Installationsaufwendungen, Montageverlusten und zur Entsorgung im EPD-Anhang auswiesen.

## Technical purpose
Betonpflastersteine werden u. a. als Bodenbelag für Industrie- und Gewerbestraßen, dörfliche Hauptstraßen, Busverkehrs- und Abstellflächen sowie sonstige Wege und Plätze eingesetzt.
Die Verwendung der Steine erfolgt auf der Grundlage der jeweiligen nationalen Bestimmungen.

## Reference product
- 1 m² Betonpflasterstein, 10 cm (225 kg/m²): 1

## Inputs
- Erneuerbare Primärenergie als Energieträger (PERE) [MJ]: A1-A3 23.4
- Erneuerbare Primärenergie zur stofflichen Nutzung (PERM) [MJ]: A1-A3 0
- Total erneuerbare Primärenergie (PERT) [MJ]: A1-A3 23.4
- Nicht-erneuerbare Primärenergie als Energieträger (PENRE) [MJ]: A1-A3 131
- Nicht-erneuerbare Primärenergie zur stofflichen Nutzung (PENRM) [MJ]: A1-A3 0
- Total nicht erneuerbare Primärenergie (PENRT) [MJ]: A1-A3 131
- Einsatz von Sekundärstoffen (SM) [kg]: A1-A3 8.48
- Erneuerbare Sekundärbrennstoffe (RSF) [MJ]: A1-A3 0
- Nicht erneuerbare Sekundärbrennstoffe (NRSF) [MJ]: A1-A3 0
- Einsatz von Süßwasserressourcen (FW) [m^3]: A1-A3 0.0869

## Outputs
- Gefährlicher Abfall zur Deponie (HWD) [kg]: A1-A3 0.00031
- Entsorgter nicht gefährlicher Abfall (NHWD) [kg]: A1-A3 6.96
- Entsorgter radioaktiver Abfall (RWD) [kg]: A1-A3 0.00649
- Komponenten für die Wiederverwendung (CRU) [kg]: A1-A3 0
- Stoffe zum Recycling (MFR) [kg]: A1-A3 0
- Stoffe für die Energierückgewinnung (MER) [kg]: A1-A3 0
- Exportierte elektrische Energie (EEE) [MJ]: A1-A3 0
- Exportierte thermische Energie (EET) [MJ]: A1-A3 0

## Impact indicators
- Globales Erwärmungspotenzial (GWP) [kg CO_(2)-Äq.]: A1-A3 25.1
- Abbau Potential der stratosphärischen Ozonschicht (ODP) [kg CFC11-Äq.]: A1-A3 4.79e-10
- Versauerungspotenzial von Boden und Wasser (AP) [kg SO_(2)-Äq.]: A1-A3 0.0366
- Eutrophierungspotenzial (EP) [kg PO_(4)^(3)-Äq.]: A1-A3 0.00496
- Bildungspotential für troposphärisches Ozon (POCP) [kg Ethen-Äq.]: A1-A3 0.00311
- Potenzial für den abiotischen Abbau nicht fossiler Ressourcen (ADPE) [kg Sb-Äq.]: A1-A3 3.56e-5
- Potenzial für den abiotischen Abbau fossiler Brennstoffe (ADPF) [MJ]: A1-A3 115

## Use advice
Gültigkeitsbereich:
Die vorliegende Umweltproduktdeklaration bezieht sich auf graue Betonpflastersteine mit Vorsatzschicht, die von den Mitgliedern des Betonverbandes Straße, Landschaft, Garten e.V. (SLG), Bonn hergestellt werden.

Sie beruht auf Produktionsdaten mit dem Bezugsjahr 2014, die in Betonsteinwerken verschiedener Region und Größe in Deutschland erhoben und nach massenseitiger Produktionsmenge gewichtet wurden.
Systemgrenze:
Die Systemgrenzen der EPD folgen dem modularen Ansatz der EN 15804.

In der vorliegenden EPD werden die Module A1 bis A3 betrachtet, d. h. die Rohstoffbereitstellung, der Rohstoff-Transport und die Herstellung in den Betonsteinwerken der beteiligten SLG-Mitgliedsfirmen.

Einflüsse von Abfällen werden in den Modulen berücksichtigt, in denen diese anfallen. Transportaufwendungen werden für alle Basismaterialien und die Verpackungen einbezogen.

In der Herstellung benötigte Maschinen, Anlagen und Infrastruktur werden vernachlässigt. Auch der Transport der Hilfsstoffe wird wegen der geringen Mengen und damit verbundenen geringen Relevanz nicht berücksichtigt.
Die Sammlung der Vordergrunddaten bezieht sich auf das Jahr 2014. Es handelt sich in allen Fällen um jährliche Durchschnittszahlen. Alle Produktionsstätten liegen in Deutschland.
Hintergrunddaten entstammen der Datenbank /GaBi 6/.

## Data sources
- Betonpflaster- Standardstein grau mit Vorsatz.pdf
- GaBi Database (all versions)
- GaBi database SP25 2014
