# Sikaplan G

Dataset: ILCD process, EPD, specific dataset
Geography: RER
Reference year: 2015
Valid until: 2020
Classification: OEKOBAU.DAT: Kunststoffe / Dachbahnen / PVC-Dachbahnen
Classification: IBUCategories: 02 Bauprodukte / Abdichtungen / Dach- und Dichtungsbahnsysteme aus Kunststoffen und Elastomeren
Method details: Dach- und Dichtungsbahnsysteme aus Kunststoffen und Elastomeren.pdf
Owner: Sika Deutschland GmbH
Compliance: DIN EN 15804; ISO 14025
Review: Accredited third party review by IBU
Amounts: rows without a unit in brackets have none in this file; such an amount is in the reference unit of its flow, which a separate flow dataset defines
copyright: true

## General comment
Sikaplan G is multi-layer synthetic roof waterproofing sheet based on polyvinyl chloride (PVC) with embedded polyester scrim reinforcing (DE/E1 PVC-P-NB-V-PG).

Sikaplan G waterproofing sheets are available in these thicknesses: 1.5 mm (15 G), 1.8 mm (18 G), 2.0 mm (20 G) and 2.4 mm (24 G).

For the calculation of the life cycle assessment no average values were taken for the various thicknesses of Sikaplan G waterproofing sheets. Rather, all values given apply to Sikaplan 15 G; a formula for individually calculating values for other thicknesses is given in Chapter 5.

## Technology and included processes
Sikaplan G polymeric waterproofing sheets are manufactured in the following steps Dosing of the various raw materials and plastifi-cation of the mixture in an extruder Rolling the melt into sheets by calendar processingCooling and reeling the sheetsHeat fusing of two sheets (top and bottom layers), embedding a polyester scrim, on a lamination machineTrimming the sheets and winding them onto cardboard spools made of recycled paperWrapping the rolls in PE stretch film, palletising Production waste such as scrap is recycled by feeding it directly back into the manufacturing process. Sika maintains a quality management system certified in accordance with /ISO 9001/.
Technical data:
In the following table, only technical data relevant to Sikaplan G waterproofing sheets are given.
Declared unit:
This declaration applies to 1 m2 of Sikaplan G polymeric waterproofing membrane, thickness 1.5 mm. A formula is given for independent calculation of the values for other thicknesses.

## Technical purpose
Sikaplan G waterproofing sheets are used mainly for waterproofing flat roofs. The sheets can be loose laid and mechanically fastened to roofs with a slope ≤ 20°.

## Reference product
- 1 m² Dachbahn: 1

## Inputs
- Erneuerbare Primärenergie als Energieträger (PERE) [MJ]: A1-A3 5.70137, A5 0.45611
- Erneuerbare Primärenergie zur stofflichen Nutzung (PERM) [MJ]: A1-A3 1.45603, A5 0.116483
- Total erneuerbare Primärenergie (PERT) [MJ]: A1-A3 7.15741, A4 0.034352, A5 0.574837, C2 0.0167, C3 0.323, D -5.07
- Nicht-erneuerbare Primärenergie als Energieträger (PENRE) [MJ]: A1-A3 94.2028, A5 7.53622
- Nicht-erneuerbare Primärenergie zur stofflichen Nutzung (PENRM) [MJ]: A1-A3 40.0564, A5 3.20452
- Total nicht erneuerbare Primärenergie (PENRT) [MJ]: A1-A3 134.259, A4 0.57963, A5 11.6306, C2 0.425, C3 1.56, D -97.2
- Einsatz von Sekundärstoffen (SM) [kg]
- Erneuerbare Sekundärbrennstoffe (RSF) [MJ]
- Nicht erneuerbare Sekundärbrennstoffe (NRSF) [MJ]
- Einsatz von Süßwasserressourcen (FW) [m^3]: A1-A3 0.011296, A4 2.22e-5, A5 0.001322, C2 1.18e-5, C3 0.000783, D -0.0165

## Outputs
- Gefährlicher Abfall zur Deponie (HWD) [kg]: A1-A3 0.005519, A4 2.57e-6, A5 0.0005, C2 9.68e-7, C3 0.000466, D -0.00576
- Entsorgter nicht gefährlicher Abfall (NHWD) [kg]: A1-A3 0.249074, A4 0.00011, A5 0.081735, C2 5.34e-5, C3 0.00449, D -0.0292
- Entsorgter radioaktiver Abfall (RWD) [kg]: A1-A3 0.003537, A4 8.07e-7, A5 0.000315, C2 5.56e-7, C3 0.00018, D -0.00333
- Komponenten für die Wiederverwendung (CRU) [kg]
- Stoffe zum Recycling (MFR) [kg]: C3 1.81
- Stoffe für die Energierückgewinnung (MER) [kg]
- Exportierte elektrische Energie (EEE) [MJ]: A5 0.183, C3 0.111
- Exportierte thermische Energie (EET) [MJ]: A5 0.516, C3 0.322

## Impact indicators
- Globales Erwärmungspotenzial (GWP) [kg CO_(2)-Äq.]: A1-A3 5.38889, A4 0.042315, A5 0.614496, C2 0.0307, C3 0.224, D -3.7
- Abbau Potential der stratosphärischen Ozonschicht (ODP) [kg CFC11-Äq.]: A1-A3 6.08e-8, A4 1.02e-13, A5 4.87e-9, C2 1.47e-13, C3 8.89e-12, D -1.7e-9
- Versauerungspotenzial von Boden und Wasser (AP) [kg SO_(2)-Äq.]: A1-A3 0.012963, A4 0.000154, A5 0.001219, C2 0.000155, C3 0.000242, D -0.00781
- Eutrophierungspotenzial (EP) [kg PO_(4)^(3)-Äq.]: A1-A3 0.001574, A4 3.53e-5, A5 0.000139, C2 3.55e-5, C3 3.22e-5, D -0.000926
- Bildungspotential für troposphärisches Ozon (POCP) [kg Ethen-Äq.]: A1-A3 0.002722, A4 1.82e-5, A5 0.000225, C2 1.66e-5, C3 1.65e-5, D -0.00257
- Potenzial für den abiotischen Abbau nicht fossiler Ressourcen (ADPE) [kg Sb-Äq.]: A1-A3 0.000869, A4 1.99e-9, A5 6.95e-5, C2 1.16e-9, C3 2.34e-8, D -1.6e-5
- Potenzial für den abiotischen Abbau fossiler Brennstoffe (ADPF) [MJ]: A1-A3 123.148, A4 0.576852, A5 10.238, C2 0.424, C3 1.1, D -88.8

## Use advice
Scope:
This document applies to Sikaplan G polymeric waterproofing membrane manufactured by Sika Trocal GmbH in DE-53840 Troisdorf (Germany). The life cycle assessment data are based on production data from 2014 collected by Sika Services AG. This document is a translation from the German Environmental Product Declaration into English. It is based on the German original version EPD-SIK-20140212-IBA1-DE.
System boundary:
Type of EPD: Cradle to gate with options

The system boundaries of the EPD follow the modular construction system described by /EN 15804/. The LCA takes into account the following modules:

A1-A3: Manufacturing of pre-products, packaging, ancillary materials, transport to the factory, production including energy supply and waste handlingA4: Transport to the building siteA5: Installation into the building (welding energy, disposal of packaging and scrap membrane)C1: Deconstruction and demolitionC2: Transport to waste-processing facilityC3: Waste processing for reuse, recovery and/or recyclingC4: Disposal (waste incineration)D: Potential for reuse, recovery and/or recycling as net flows and benefits

## Data sources
- Sikaplan G.pdf
- GaBi Database (all versions)
- GaBi database SP26 2014
