# WPC Fassadenelemente

Dataset: ILCD process, EPD, average dataset
Geography: DE
Reference year: 2015
Valid until: 2020
Classification: OEKOBAU.DAT: Holz / Holzwerkstoffe / Wood-Plastic-Composites
Classification: IBUCategories: 02 Bauprodukte / Fassaden / Fassadenelemente aus Holz-Polymer-Verbundwerkstoffen (WPC)
Method details: Fassadenelemente aus Holz-Polymer-Verbundwerkstoffen (WPC).pdf
Owner: Verband der Deutschen Holzwerkstoffindustrie e.V.
Compliance: DIN EN 15804; ISO 14025
Review: Accredited third party review by IBU
Amounts: rows without a unit in brackets have none in this file; such an amount is in the reference unit of its flow, which a separate flow dataset defines
copyright: false

## General comment
Bei dem deklarierten Produkt handelt es sich um ein speziell für den Außenbereich geeignetes Holz-Kunststoff-Fassadenelement. Die Kunststoffmatrix kann entweder aus Polyethylen (PE), Polypropylen (PP) oder Polyvinylchlorid (PVC) bestehen.

Die EPD bezieht sich nicht auf ein spezifisches Produkt eines Herstellers sondern deklariert die durchschnittliche Umweltqualität für alle WPC-Fassadenelemente von Mitgliedsunternehmen des VHI. Die Angaben repräsentieren 100 % des deutschen Marktes. Detaillierte Daten sind der Produktbeschreibung des jeweiligen Herstellers zu entnehmen.

## Technology and included processes
Bei dem deklarierten Produkt handelt es sich um Fassadenelemente aus Holz-Polymer-Verbundwerkstoffen, die hauptsächlich aus Holzfasern (Fichte und Kiefer aus Industrierestholz), einer Kunststoffmatrix (entweder Polyethylen (PE), Polypropylen (PP) oder Polyvinylchlorid (PVC)) und Additiven bestehen. WPC-Fassadenelemente dienen der Fassadenverkleidung und können nur als nicht-tragfähiges Bauelement eingesetzt werden (keine bautechnische Zulassung). Bei der Herstellung von WPC-Profilen gibt es zwei unterschiedliche in der Praxis eingesetzte Verfahren. Zum einen die Direktextrusion, in der die Rohstoffe direkt zugegeben werden und zum anderen ein zweistufiger Prozess aus Compoundieren und Extrudieren. Im Anschluss an die Kühlung werden die WPC-Fassadenelemente zugeschnitten und für den Transport verpackt. Allgemeine Regelungen zu WPC-Produkten und WPC-Fassadenelementen sind der Norm DIN EN 15234, Teile 1 und 5 zu entnehmen.
Technische Daten:
Die nachfolgend aufgeführten bautechnischen Daten gelten für alle WPC-Fassadenelemente der beteiligten Hersteller.
Deklarierte Einheit:
Die deklarierte Einheit ist wie folgt definiert:

1 m² installierte WPC-Fassadenelemente, mit den Abmessungen 1.000-4.000 mm/80-240 mm/18-25 mm und einem Flächengewicht von 7,79 kg/m², über eine Nutzungsdauer von 40 Jahren.
Die Zusammensetzung der WPC-Fassadenelemente ergibt sich aus dem gewichteten Durchschnitt in Abhängigkeit des Produktionsvolumens der beteiligten Hersteller.

## Technical purpose
WPC-Fassadenelemente dienen der Fassadenverkleidung und können nur als nicht-tragfähiges Bauelement eingesetzt werden (keine bautechnische Zulassung).
Die Produkte sind gesundheitlich unbedenklich und technisch sicher.

## Scenarios
- S1: Zur Thermischenverwertung
- S2: Zum Recycling

## Reference product
- 1 m² WPC-Fassadenelement: 1

## Inputs
- Erneuerbare Primärenergie als Energieträger (PERE) [MJ]: A1-A3 1.23, A4 0.239, B2 0.258, C2 0.117, C3 (S1) 0, C3 (S2) 0, D (S1) -17.7, D (S2) -1.04
- Erneuerbare Primärenergie zur stofflichen Nutzung (PERM) [MJ]: A1-A3 84.06, A4 0, B2 0, C2 0, C3 (S1) 0, C3 (S2) 0, D (S1) 0, D (S2) -91.0754
- Total erneuerbare Primärenergie (PERT) [MJ]: A1-A3 85.29, A4 0.239, B2 0.258, C2 0.117, C3 (S1) 0, C3 (S2) 0, D (S1) -17.7, D (S2) -92.1
- Nicht-erneuerbare Primärenergie als Energieträger (PENRE) [MJ]: A1-A3 94, A4 3.14, B2 4.48, C2 1.53, C3 (S1) 0, C3 (S2) 0, D (S1) -166, D (S2) -8.57
- Nicht-erneuerbare Primärenergie zur stofflichen Nutzung (PENRM) [MJ]: A1-A3 141, A4 0, B2 2.3814, C2 0, C3 (S1) 0, C3 (S2) 0, D (S1) 0, D (S2) -130.507
- Total nicht erneuerbare Primärenergie (PENRT) [MJ]: A1-A3 235, A4 3.14, B2 6.86, C2 1.53, C3 (S1) 0, C3 (S2) 0, D (S1) -166, D (S2) -139
- Einsatz von Sekundärstoffen (SM) [kg]: A1-A3 0, A4 0, B2 0, C2 0, C3 (S1) 0, C3 (S2) 0, D (S1) 0, D (S2) 7.4
- Erneuerbare Sekundärbrennstoffe (RSF) [MJ]: A1-A3 0, A4 0, B2 0, C2 0, C3 (S1) 0, C3 (S2) 0, D (S1) 81.9, D (S2) 4.1
- Nicht erneuerbare Sekundärbrennstoffe (NRSF) [MJ]: A1-A3 0, A4 0, B2 0, C2 0, C3 (S1) 0, C3 (S2) 0, D (S1) 129, D (S2) 6.45
- Einsatz von Süßwasserressourcen (FW) [m^3]: A1-A3 33.9, A4 0.138, B2 0.909, C2 0.0673, C3 (S1) 0, C3 (S2) 0, D (S1) 11.4, D (S2) -14.5

## Outputs
- Gefährlicher Abfall zur Deponie (HWD) [kg]: A1-A3 8.19e-5, A4 2.53e-6, B2 1.42e-6, C2 1.23e-6, C3 (S1) 0, C3 (S2) 0, D (S1) -7.25e-5, D (S2) -2.41e-5
- Entsorgter nicht gefährlicher Abfall (NHWD) [kg]: A1-A3 0.139, A4 0.000784, B2 0.00165, C2 0.000382, C3 (S1) 0, C3 (S2) 0, D (S1) -0.0456, D (S2) -0.101
- Entsorgter radioaktiver Abfall (RWD) [kg]: A1-A3 0.00559, A4 4.17e-6, B2 9.27e-5, C2 2.03e-6, C3 (S1) 0, C3 (S2) 0, D (S1) -0.00555, D (S2) -0.000507
- Komponenten für die Wiederverwendung (CRU) [kg]: A1-A3 0, A4 0, B2 0, C2 0, C3 (S1) 0, C3 (S2) 0, D (S1) 0, D (S2) 0
- Stoffe zum Recycling (MFR) [kg]: A1-A3 0, A4 0, B2 0, C2 0, C3 (S1) 0, C3 (S2) 7.4, D (S1) 0, D (S2) 0
- Stoffe für die Energierückgewinnung (MER) [kg]: A1-A3 0, A4 0, B2 0, C2 0, C3 (S1) 7.79, C3 (S2) 0.39, D (S1) 0, D (S2) 0
- Exportierte elektrische Energie (EEE) [MJ]: A1-A3 0, A4 0, B2 0, C2 0, C3 (S1) 0, C3 (S2) 0, D (S1) 0, D (S2) 0
- Exportierte thermische Energie (EET) [MJ]: A1-A3 0, A4 0, B2 0, C2 0, C3 (S1) 0, C3 (S2) 0, D (S1) 0, D (S2) 0

## Impact indicators
- Globales Erwärmungspotenzial (GWP) [kg CO_(2)-Äq.]: A1-A3 -0.558, A4 0.235, B2 0.227, C2 0.011, C3 (S1) 8.78167, C3 (S2) 8.78167, D (S1) -2.74917, D (S2) -2.9477
- Abbau Potential der stratosphärischen Ozonschicht (ODP) [kg CFC11-Äq.]: A1-A3 3.72e-9, A4 2.83e-13, B2 4.76e-12, C2 1.38e-13, C3 (S1) 0, C3 (S2) 0, D (S1) 2.63e-8, D (S2) 9.24e-10
- Versauerungspotenzial von Boden und Wasser (AP) [kg SO_(2)-Äq.]: A1-A3 0.0176332, A4 0.0010018, B2 0.000526, C2 0.00048821, C3 (S1) 0, C3 (S2) 0, D (S1) -0.00865722, D (S2) -0.00858592
- Eutrophierungspotenzial (EP) [kg PO_(4)^(3)-Äq.]: A1-A3 0.00204744, A4 0.00027385, B2 5.63e-5, C2 0.00013346, C3 (S1) 0, C3 (S2) 0, D (S1) -0.00116371, D (S2) -0.0009693
- Bildungspotential für troposphärisches Ozon (POCP) [kg Ethen-Äq.]: A1-A3 0.0027054, A4 -0.0003441, B2 7.8e-5, C2 -0.00016769, C3 (S1) 0, C3 (S2) 0, D (S1) -0.00113003, D (S2) -0.00236262
- Potenzial für den abiotischen Abbau nicht fossiler Ressourcen (ADPE) [kg Sb-Äq.]: A1-A3 2.26e-6, A4 1.19e-8, B2 1.14e-6, C2 5.78e-9, C3 (S1) 0, C3 (S2) 0, D (S1) -1.07e-6, D (S2) -5.21e-5
- Potenzial für den abiotischen Abbau fossiler Brennstoffe (ADPF) [MJ]: A1-A3 221, A4 3.13, B2 6.63, C2 1.52, C3 (S1) 0, C3 (S2) 0, D (S1) -153, D (S2) -141

## Use advice
Gültigkeitsbereich:
Es handelt sich bei dieser EPD um eine Verbands-EPD. Als Datenbasis für das Fassadenelement aus Wood-Polymer-Composite (WPC) wurde das gewichtete Mittel aus Herstellerangaben von drei Mitgliedsunternehmen herangezogen. Die Mitglieder können den Verbands-Internetseiten entnommen werden.
Die datenliefernden Häuser repräsentieren einen Anteil von 100 % der deutschen Produktion.
Der Geltungsbereich der EPD umfasst alle Fassadenelemente aus Holz-Kunststoff-Werkstoffen, da die verschiedenen Kunststoffarten entsprechend ihrer Anteile berücksichtigt werden.
Systemgrenze:
Typ der EPD: Wiege bis Werkstor mit Optionen
Gemäß /EN 15804/ werden folgende Module verwendet:
Modul A1-3
Für die Herstellung findet die aggregierte Darstellung in Form von A1-3 Verwendung. Darunter fallen die Rohstoffversorgung, die Herstellung der WPC-Fassadenelemente, alle Transporte zum Hersteller, die benötigten Energieverbräuche und Ressourcen sowie jegliche anfallende Produktionsabfälle.
Modul A4
Transport des Produktes von dem Hersteller zur Baustelle
Modul B2
Instandhaltung der WPC-Fassadenelemente während der Nutzungsphase: Reinigung der WPC-Fassadenelemente
Modul C2
Transport des ausrangierten Produktes zum Recyclinghof oder Hersteller
Modul C3
Abfallbehandlung, wie thermische oder stoffliche Verwertung
Auf Grund der gewählten Systemgrenzen (Definition des End-of-waste Status) findet keine Abfallbeseitigung (Modul C4) der WPC-Fassadenelemente statt. Es wird somit nur der Export der materialinhärenten Eigenschaften bilanziert.
Modul D
Gutschriften und Lasten außerhalb des betrachteten Systems durch thermische und stoffliche Verwertung

## Data sources
- WPC Fassadenelemente.pdf
- GaBi Database (all versions)
- GaBi database SP26 2014
