# Volume flow limiter VRL

Dataset: ILCD process, EPD, specific dataset
Geography: DE
Reference year: 2015
Valid until: 2020
Classification: OEKOBAU.DAT: Gebäudetechnik / Klimatisierung und Lüftung / Lüftungsanlagen
Classification: IBUCategories: 03 Gebäudetechnik / Raumlufttechnische Anlagen (RLT) und Klimatechnik / Volumenstromregler und Volumenstrombegrenzer für Lüftungsanlagen
Method details: Volumenstromregler und Volumenstrombegrenzer für Lüftungsanlagen.pdf
Owner: Wildeboer Bauteile GmbH
Compliance: DIN EN 15804; ISO 14025
Review: Accredited third party review by IBU
Amounts: rows without a unit in brackets have none in this file; such an amount is in the reference unit of its flow, which a separate flow dataset defines
copyright: true

## General comment
Maintenance-free VRL volume flow limiters are mechanical controllers that operate without auxiliary power supply to maintain constant volume flows in ventilation and air-conditioning systems. They regulate volume flows independently of pressure with reference to preset set points and keep these constant. They can be installed independent of position in circular ventilation ducts, e.g. in spiral ducts. The adjustment and control mechanism in VRL volume flow limiters is enclosed and protected from soiling from the air flow. Furthermore, the lip seals on both sides position and fix the VRL volume flow limiter in the ventilation duct in such a way as to ensure full enclosure. The controller casing and damper blade are made of special antistatic and microbial-resistant plastic. The smooth surfaces of the air-ducting components practically eliminate the possibility of soiling. VRL volume flow limiters therefore comply with maximum hygiene requirements; please refer to section 7 for more information.

VRL volume flow limiters are adjusted in the factory to the entire volume flow ranges, min. 1:7. On site, a rotary pointer can be used for setting and locking the infinitely variable set points on a scale with volume flow and velocity specifications between Vmin and Vmax. The special control mechanism generally guarantees a

high degree of control accuracy with deviations of only ±5% to ±10% within the entire range of application.

More information is available in the /manufacturer’s documents/ and section 7 provides information on hygiene.

## Technology and included processes
Production is at one location in the Weener plant. The necessary raw and semi-finished parts, ancillary materials and operating materials are delivered by suppliers and are integrated in production. Semi-finished parts are manufactured using production methods typical for the type of material. Metal parts are punched and edged to shape. Plastic parts are manufactured in injection-moulding machines. Blanks are optimised accordingly in order to avoid waste. Any waste incurred is collected and where possible recycled by the corresponding companies, or disposed of and incinerated as domestic waste. Lubricants are largely collected, treated and re-used in production. Dust and fumes are extracted and collected on site. Prefabricated parts are assembled along with bought-in parts to volume flow limiters, inspected within the framework of quality assurance to /DIN EN ISO 9001/, packaged and shipped. Each volume flow limiter is factory adjusted to ensure a high and consistent degree of control accuracy. The plant subject to an energy management system.
Technical data:
The performance rating according to /DIN EN 12589/ and the associated requirements according to /DIN EN ISO 5135/, /DIN EN ISO 3741/, /DIN EN ISO 5167-1/ and /DIN EN 1751/ are fulfilled.
Declared unit:
This declaration refers to the manufacture of one volume flow limiter according to the /IBU PCR, Part B/. Other volume flow limiters whose dimensions differ from the reference products analysed here can be calculated using a weight chart provided by Wildeboer Bauteile GmbH and scaling the results.

## Technical purpose
Circular volume flow limiters serve towards regulating constant volume flows in ventilation and air-conditioning systems, replacing conventional dampers, thereby eliminating the complex manual synchronisation of volume flows within ventilation and air conditioning system. The VRL is suitable for inserting into circular ventilation ducts.

## Reference product
- 1 Stück Volumenstrombegrenzer VRL mit 0,08 kg/Stück: 1

## Inputs
- Erneuerbare Primärenergie als Energieträger (PERE) [MJ]: A1-A3 0.23, A4 0.0014, A5 1.7e-5, B1 0, B2 0, B3 0, B4 0, B5 0, B6 0, C1 0, C2 0.00075, C3 0, C4 0.004, D -0.13
- Erneuerbare Primärenergie zur stofflichen Nutzung (PERM) [MJ]: A1-A3 0, A4 0, A5 0, B1 0, B2 0, B3 0, B4 0, B5 0, B6 0, C1 0, C2 0, C3 0, C4 0, D 0
- Total erneuerbare Primärenergie (PERT) [MJ]: A1-A3 0.23, A4 0.0014, A5 1.7e-5, B1 0, B2 0, B3 0, B4 0, B5 0, B6 0, C1 0, C2 0.00075, C3 0, C4 0.004, D -0.13
- Nicht-erneuerbare Primärenergie als Energieträger (PENRE) [MJ]: A1-A3 0.92, A4 0.023, A5 0.00019, B1 0, B2 0, B3 0, B4 0, B5 0, B6 0, C1 0, C2 0.013, C3 0, C4 0.06, D -1.6
- Nicht-erneuerbare Primärenergie zur stofflichen Nutzung (PENRM) [MJ]: A1-A3 5.2, A4 0, A5 0, B1 0, B2 0, B3 0, B4 0, B5 0, B6 0, C1 0, C2 0, C3 0, C4 0, D 0
- Total nicht erneuerbare Primärenergie (PENRT) [MJ]: A1-A3 6.2, A4 0.023, A5 0.00019, B1 0, B2 0, B3 0, B4 0, B5 0, B6 0, C1 0, C2 0.013, C3 0, C4 0.06, D -1.6
- Einsatz von Sekundärstoffen (SM) [kg]: A1-A3 0.002
- Erneuerbare Sekundärbrennstoffe (RSF) [MJ]: A1-A3 0, A4 0, A5 0, B1 0, B2 0, B3 0, B4 0, B5 0, B6 0, C1 0, C2 0, C3 0, C4 0, D 0
- Nicht erneuerbare Sekundärbrennstoffe (NRSF) [MJ]: A1-A3 0, A4 0, A5 0, B1 0, B2 0, B3 0, B4 0, B5 0, B6 0, C1 0, C2 0, C3 0, C4 0, D 0
- Einsatz von Süßwasserressourcen (FW) [m^3]: A1-A3 0.00097, A4 9e-7, A5 1.2e-6, B1 0, B2 0, B3 0, B4 0, B5 0, B6 0, C1 0, C2 4.8e-7, C3 0, C4 0.0003, D -0.00021

## Outputs
- Gefährlicher Abfall zur Deponie (HWD) [kg]: A1-A3 0.00025, A4 1e-7, A5 2.4e-8, B1 0, B2 0, B3 0, B4 0, B5 0, B6 0, C1 0, C2 5.6e-8, C3 0, C4 4.2e-6, D -0.00017
- Entsorgter nicht gefährlicher Abfall (NHWD) [kg]: A1-A3 0.012, A4 4.5e-6, A5 1.4e-5, B1 0, B2 0, B3 0, B4 0, B5 0, B6 0, C1 0, C2 2.4e-6, C3 0, C4 0.019, D -0.0025
- Entsorgter radioaktiver Abfall (RWD) [kg]: A1-A3 0.00013, A4 3.3e-8, A5 9.3e-9, B1 0, B2 0, B3 0, B4 0, B5 0, B6 0, C1 0, C2 1.8e-8, C3 0, C4 2.4e-6, D -6.6e-5
- Komponenten für die Wiederverwendung (CRU) [kg]: A1-A3 0, A4 0, A5 0, B1 0, B2 0, B3 0, B4 0, B5 0, B6 0, C1 0, C2 0, C3 0, C4 0, D 0
- Stoffe zum Recycling (MFR) [kg]: A1-A3 0, A4 0, A5 0, B1 0, B2 0, B3 0, B4 0, B5 0, B6 0, C1 0, C2 0, C3 0, C4 0, D 0.018
- Stoffe für die Energierückgewinnung (MER) [kg]: A1-A3 0, A4 0, A5 0.00032, B1 0, B2 0, B3 0, B4 0, B5 0, B6 0, C1 0, C2 0, C3 0, C4 0.05
- Exportierte elektrische Energie (EEE) [MJ]: A1-A3 0, A4 0, A5 0.00038, B1 0, B2 0, B3 0, B4 0, B5 0, B6 0, C1 0, C2 0, C3 0, C4 0.24
- Exportierte thermische Energie (EET) [MJ]: A1-A3 0, A4 0, A5 0.00095, B1 0, B2 0, B3 0, B4 0, B5 0, B6 0, C1 0, C2 0, C3 0, C4 0.65

## Impact indicators
- Globales Erwärmungspotenzial (GWP) [kg CO_(2)-Äq.]: A1-A3 0.28, A4 0.0017, A5 0.00041, B1 0, B2 0, B3 0, B4 0, B5 0, B6 0, C1 0, C2 0.00092, C3 0, C4 0.13, D -0.11
- Abbau Potential der stratosphärischen Ozonschicht (ODP) [kg CFC11-Äq.]: A1-A3 8.4e-11, A4 4.1e-15, A5 4.3e-16, B1 0, B2 0, B3 0, B4 0, B5 0, B6 0, C1 0, C2 2.2e-15, C3 0, C4 3.8e-13, D -3.5e-12
- Versauerungspotenzial von Boden und Wasser (AP) [kg SO_(2)-Äq.]: A1-A3 0.00062, A4 7.8e-6, A5 1.6e-7, B1 0, B2 0, B3 0, B4 0, B5 0, B6 0, C1 0, C2 4.2e-6, C3 0, C4 3.2e-5, D -0.00024
- Eutrophierungspotenzial (EP) [kg PO_(4)^(3)-Äq.]: A1-A3 6.9e-5, A4 1.9e-6, A5 2.9e-8, B1 0, B2 0, B3 0, B4 0, B5 0, B6 0, C1 0, C2 1e-6, C3 0, C4 2.5e-6, D -2.4e-5
- Bildungspotential für troposphärisches Ozon (POCP) [kg Ethen-Äq.]: A1-A3 8.5e-5, A4 -2.6e-6, A5 9.8e-9, B1 0, B2 0, B3 0, B4 0, B5 0, B6 0, C1 0, C2 -1.4e-6, C3 0, C4 1.6e-6, D -2.7e-5
- Potenzial für den abiotischen Abbau nicht fossiler Ressourcen (ADPE) [kg Sb-Äq.]: A1-A3 5.3e-6, A4 8e-11, A5 2.3e-11, B1 0, B2 0, B3 0, B4 0, B5 0, B6 0, C1 0, C2 4.3e-11, C3 0, C4 8.3e-9, D -3e-6
- Potenzial für den abiotischen Abbau fossiler Brennstoffe (ADPF) [MJ]: A1-A3 5.8, A4 0.023, A5 0.00016, B1 0, B2 0, B3 0, B4 0, B5 0, B6 0, C1 0, C2 0.013, C3 0, C4 0.054, D -1.4

## Use advice
Scope:
This document refers to the manufacture, transport, installation, operation and disposal of circular volume flow limiters with optional accessories for ventilation and air-conditioning systems. The products are produced exclusively at the Weener plant in Germany where production data for 2012 was recorded.
System boundary:
The “cradle to grave” EPD system boundary has a modular design according to /EN 15804/. The LCA for the product under review considers Modules A, B, C and D:

A1-A3 (Product stage): Raw material supply, transport to the manufacturer, production (incl. provision of energy and water, provision of ancillary materials, disposal of waste)

A4-A5 (Construction process): Transport to construction site, installation in the building, recycling packaging waste

B1-B5 (Use stage): Use of the installed product

B6 (Use stage – building operation): Use of electrical energy for the product

C1-C4 (End-of-life stage): De-constructing the product, transport to waste treatment, waste processing, disposal

D (Credits): Recycling potential

## Data sources
- Volumenstrombegrenzer VRL.pdf
- GaBi Database (all versions)
- GaBi database SP27 2015
