# Brillux Glemalux ELF 1000

Dataset: ILCD process, EPD, representative dataset
Geography: DE
Reference year: 2015
Valid until: 2020
Classification: OEKOBAU.DAT: Beschichtungen / Innenbeschichtungen / Innenfarben
Classification: IBUCategories: 02 Bauprodukte / Bauklebstoffe und Beschichtungen / Beschichtungen mit organischen Bindemitteln
Method details: Beschichtungen mit organischen Bindemitteln.pdf
Owner: Brillux GmbH & Co. KG
Compliance: DIN EN 15804; ISO 14025
Review: Accredited third party review by IBU
Amounts: rows without a unit in brackets have none in this file; such an amount is in the reference unit of its flow, which a separate flow dataset defines
copyright: true

## General comment
Brillux Glemalux ELF 1000 ist eine stumpfmatte, wasserdampfdiffusionsfähige, emissionsarme, lösemittel- und weichmacherfreie Innendispersions- farbe mit hohem Deckvermögen und langer Offenzeit. Ausgezeichnet vom /TÜV SÜD/ mit dem TÜV Gütezeichen >> Emissionsarm, Schadstoffgeprüft und Produktion überwacht <<.

Es handelt sich um ein werkseitig hergestelltes flüssiges Gemisch mit organischem Bindemittel, mineralischen Füllstoffen, Pigmenten, Wasser und Zusatzstoffen. Die Verfestigung erfolgt durch Trocknung und Verfilmung der Polymerbindemittel.

## Technology and included processes
Brillux Glemalux ELF 1000 ist eine stumpfmatte, wasserdampfdiffusionsfähige, emissionsarme, lösemittel- und weichmacherfreie Innendispersionsfarbe mit hohem Deckvermögen und langer Offenzeit. Ausgezeichnet vom /TÜV SÜD/ mit dem TÜV Gütezeichen >> Emissionsarm, Schadstoffgeprüft und Produktion überwacht <<. Es handelt sich um ein werkseitig hergestelltes flüssiges Gemisch mit organischem Bindemittel, mineralischen Füllstoffen, Pigmenten, Wasser und Zusatzstoffen. Die Verfestigung erfolgt durch Trocknung und Verfilmung der Polymerbindemittel.
Deklarierte Einheit:
Die Deklaration bezieht sich auf 1 kg Brillux Glemalux ELF 1000. Da Farben nach Volumen (Liter) verkauft werden, ist nachfolgend der Verbrauch volumenbezogen angegeben.

## Technical purpose
Für Decken- und Wandanstriche im Innenbereich, wie z. B. Innenputz, Beton, Raufaser, Gipskarton, Faserzement und Kalksandsteinmauerwerk. Aufgrund des hohen Deckvermögens besonders für Renovierungsanstriche geeignet. Der Verbrauch beträgt ca. 0,120 - 0,140 l/m².

## Reference product
- 1 kg Brillux Glemalux ELF 1000: 1

## Inputs
- Erneuerbare Primärenergie als Energieträger (PERE) [MJ]: A1-A3 1.59
- Erneuerbare Primärenergie zur stofflichen Nutzung (PERM) [MJ]: A1-A3 0
- Total erneuerbare Primärenergie (PERT) [MJ]: A1-A3 1.59
- Nicht-erneuerbare Primärenergie als Energieträger (PENRE) [MJ]: A1-A3 20.01
- Nicht-erneuerbare Primärenergie zur stofflichen Nutzung (PENRM) [MJ]: A1-A3 2.79
- Total nicht erneuerbare Primärenergie (PENRT) [MJ]: A1-A3 22.8
- Einsatz von Sekundärstoffen (SM) [kg]: A1-A3 0
- Erneuerbare Sekundärbrennstoffe (RSF) [MJ]: A1-A3 0
- Nicht erneuerbare Sekundärbrennstoffe (NRSF) [MJ]: A1-A3 0
- Einsatz von Süßwasserressourcen (FW) [m^3]: A1-A3 0.00731

## Outputs
- Gefährlicher Abfall zur Deponie (HWD) [kg]: A1-A3 0.00323
- Entsorgter nicht gefährlicher Abfall (NHWD) [kg]: A1-A3 0.0372
- Entsorgter radioaktiver Abfall (RWD) [kg]: A1-A3 0.0008
- Komponenten für die Wiederverwendung (CRU) [kg]
- Stoffe zum Recycling (MFR) [kg]
- Stoffe für die Energierückgewinnung (MER) [kg]
- Exportierte elektrische Energie (EEE) [MJ]
- Exportierte thermische Energie (EET) [MJ]

## Impact indicators
- Globales Erwärmungspotenzial (GWP) [kg CO_(2)-Äq.]: A1-A3 1.27
- Abbau Potential der stratosphärischen Ozonschicht (ODP) [kg CFC11-Äq.]: A1-A3 4.93e-10
- Versauerungspotenzial von Boden und Wasser (AP) [kg SO_(2)-Äq.]: A1-A3 0.0299
- Eutrophierungspotenzial (EP) [kg PO_(4)^(3)-Äq.]: A1-A3 0.000417
- Bildungspotential für troposphärisches Ozon (POCP) [kg Ethen-Äq.]: A1-A3 0.00122
- Potenzial für den abiotischen Abbau nicht fossiler Ressourcen (ADPE) [kg Sb-Äq.]: A1-A3 3.32e-6
- Potenzial für den abiotischen Abbau fossiler Brennstoffe (ADPF) [MJ]: A1-A3 20.9

## Use advice
Gültigkeitsbereich:
In dieser Produktdeklaration wird die Innen-dispersionsfarbe Brillux Glemalux ELF 1000 betrachtet, die am Standort Münster/Westfalen hergestellt wird.
Systemgrenze:
Diese Ökobilanz adressiert das Lebenszyklusstadium der Produktherstellung (Wiege bis Werktor). Das Produktstadium umfasst die Module A1 (Rohstoffbereitstellung), A2 (Transport), A3 (Herstellung) gemäß der /DIN EN 15804/.

## Data sources
- Brillux Glemalux ELF 1000.pdf
- GaBi Database (all versions)
- GaBi database SP28 2015
