# ROCKWOOL Steinwolle-Dämmstoff im mittleren Rohdichtebereich

Dataset: ILCD process, EPD, average dataset
Geography: DE
Reference year: 2018
Valid until: 2023
Classification: OEKOBAU.DAT: Dämmstoffe / Mineralwolle / Steinwolle
Classification: IBUCategories: 02 Bauprodukte / Wärmedämmungsprodukte / Mineralische Dämmstoffe
Method details: Mineralische Dämmstoffe.pdf
Registration number: 10718
Owner: Deutsche Rockwool Mineralwoll GmbH & Co. OHG
Compliance: DIN EN 15804; ISO 14025
Review: Accredited third party review by Institut Bauen und Umwelt e. V.
Amounts: rows without a unit in brackets have none in this file; such an amount is in the reference unit of its flow, which a separate flow dataset defines
copyright: true

## General comment
Die Definition von Mineralwolle (Stein- bzw. Glaswolle) nach deutschem Gefahrstoffrecht (/ChemVerbotsV/, /GefStoffV/) lautet: "Künstliche Mineralfasern, die aus ungerichteten glasigen (Silikat-) Fasern mit einem Massengehalt von über 18 % an Oxiden von Natrium, Kalium, Calcium, Magnesium und Barium bestehen".
Steinwolle-Dämmstoff ist ein Faserdämmstoff. Wesent-licher Bestandteil sind Steinwolle-Dämmstofffasern. Das sind monophile künstliche Mineralfasern nicht kristalliner Struktur, die aus einer silikatischen Schmelze gewonnen werden. Der mittlere Faserdurchmesser beträgt 3-6 µm. Die Länge der Fasern kann bis zu einigen Zentimetern betragen.
Die in dieser Deklaration beschriebenen kunstharzge-bundenen Steinwolle-Dämmstoffe werden in Form von Platten, Matten oder Rollen im mittleren Rohdichte-bereich (61 bis 120 kg/m3) hergestellt. Die Produkte werden in Dicken zwischen 20 mm und 350 mm geliefert, beispielsweise als druckfeste Platten, tritt-feste zweischichtige Platten oder Filze und Rollen.
Für bestimmte Anwendungsbereiche werden die Dämmstoffe ein- oder zweiseitig mit einer Funktions-kaschierung versehen.

## Technology and included processes
Allgemeines: Steinwolle-Dämmstoff ist ein Faserdämmstoff. Wesentlicher Bestandteil sind Steinwolle-Dämmstofffasern, monophile künstliche Mineralfasern nicht kristalliner Struktur, die aus einer silikatischen Schmelze gewonnen werden. Der mittlere Faserdurchmesser beträgt 3-6 µm. Die Länge der Fasern kann bis zu einigen Zentimetern betragen. Die in dieser Deklaration beschriebenen unkaschierten kunstharzgebundenen Steinwolle-Dämmstoffe werden in Form von Platten, Matten oder Rollen im niedrigen Rohdichtebereich (bis 60 kg/m3) hergestellt. Die Produkte werden in Dicken zwischen 20 mm und 350 mm geliefert, beispielsweise als druckfeste Platten, trittfeste zweischichtige Platten oder hochkomprimierbare Filze und Rollen. Die Umweltwirkungen der Kaschierungen sind dem EPD-Anhang zu entnehmen und entsprechend der in der EPD angegebenen Rechenregeln den hier angegebenen Kennzahlen zuzufügen. Herstellung: Diabas/Basalt sowie Betonformsteine werden mittels Koks als Energieträger im Kupolofen bei ca. 1.400-1.500 °C geschmolzen und im Walzenspinnerverfahren zerfasert. Gleich danach wird das Bindemittel (harnstoffmodifiziertes Phenol-Formaldehyd-Harz) und Schmelzmittel in wässriger Lösung aufgesprüht. Das Bindemittel dient der Gewährleistung von Bindung und Formstabilität, das Schmelzmittel der Staubminderung und Hydrophobierung. Der in der wässrigen Lösung ebenfalls enthaltene Haftvermittler unterstützt die Anhaftung des Bindemittels an den Fasern. Die Rohwolle wird in Sammelkammern auf unter Unterdruck stehenden Transportbändern abgelegt. Das Rohvlies wird kontinuierlich ausgetragen und Härteöfen zugeführt, in denen 200-300 °C heiße Luft durch die Wollmasse gesaugt wird, wobei sich die Bindemittel zu Duroplasten vernetzen. Anschließend erfolgt die optionale Aufbringung der im EPD-Anhang deklarierten Kaschierungen. Schließlich wird das Produkt mittels Sägen in Form gebracht. Ressourcenschonung während des Produktionsprozesses: Die während des Produktionsbetriebes entstehenden Abluftmengen werden mechanisch gefiltert und überwiegend thermisch nachverbrannt. Über Wärmetauscher wird der hierbei freigesetzte Wärmeinhalt zur Vorwärmung des Ofenwindes verwendet. Die abgeschiedenen Stäube werden als Rohstoff erneut genutzt. Das Prozesswasser wird intern gereinigt und zu einem erheblichen Teil wieder in den Prozess zurückgeführt. Deklarierte Lebenszyklusphasen: Die Ökobilanzergebnisse umfassen die Lebenszyklusstadien der Herstellung der Vorprodukte bis hin zur Rohstoffgewinnung und Verarbeitungsprozesse von als Input dienenden Sekundärstoffen (z.B. Recyclingprozesse), deren Transporte zum Werk sowie die Produktion selbst, einschließlich der Bereitstellung von allen Hilfs- und Betriebsstoffen, Energie, sowie die vollständige Abfallbehandlung oder die Deponierung der Restabfälle während des Stadiums der Produktion. Die Module A1, A2 und A3 sind hier als ein aggregiertes Modul A1-A3 ausgewiesen. Zusätzlich werden die Module A4 (Transport zum Verwendungsort), A5 (Einbau), C1 (Demontage), C2 (Transport), C3 (Abfallaufbereitung), C4 (Deponierung) und D (Gutschrift) deklariert. Technische Daten: Wärmeleitfähigkeit [W/(mK)]: 0,032 bis 0,050 [W/(mK)] nach /DIN EN 13162/ bzw. /DIN EN 14303/]; Bemessungswert Wärmeleitfähigkeit [W/(mK)]: 0,033 bis 0,049 [W/(mK)] gemäß /DIN 4108-4/ Wasserdampfdiffusionswiderstandszahl nach /DIN EN 12086/: µ = 1 Wasserdampfdiffusionsäquivalente Luftschichtdicke = µ x Bauteildicke in [m]; (bei 1 m Dicke wäre sie 1) Rohdichte gem. /DIN EN 1602/: ≤60 kg/m³; Druckspannung (bei 10 % Stauchung) gem. /DIN EN 826/: 0,5 bis 5 kPa; Schallabsorptionsgrade [%]: αS in Abhängigkeit von der Frequenz nach /DIN EN ISO 354/ sind den Datenblättern für die entsprechenden Produkte zu entnehmen. Deklarierte Einheit: Die Deklaration bezieht sich auf den Lebenszyklus von 1 m³ Steinwolle-Dämmstoff, hergestellt von der DEUTSCHE ROCKWOOL GmbH & Co. KG. Die Produkte von ROCKWOOL entstammen drei Werken, wobei eine Durchschnittsbildung auf Basis der Produktionsmengen erfolgte. Die Werke weisen bei der Steinwolleherstellung keine Technologieunterschiede auf. Die Rohdichte der deklarierten Steinwolleprodukte kann bis zu 60 kg/m³ betragen. Infolge der Durchschnittsbildung ergibt sich eine mittlere Rohdichte von 39 kg/m³ für Steinwolledämmstoffe im niedrigen Rohdichtebereich, für die nachfolgend die Ökobilanzergebnisse dargestellt werden. Die Übertragung der Ergebnisse auf andere Rohdichten ist über eine lineare Skalierung möglich.
Deklarierte Einheit:
Die Deklaration bezieht sich auf den Lebenszyklus von 1 m3 Steinwolle-Dämmstoff der DEUTSCHE ROCKWOOL GmbH & Co. KG. Die Produkte werden in drei Werken produziert, die bei der Steinwolleher-stellung keine Technologieunterschiede aufweisen. Die Durchschnittsbildung erfolgte auf Basis der Produk-tionsmengen. Die Rohdichte der deklarierten Produkte kann 61-120 kg/m3 betragen. Infolge der Durchschnittsbildung ergibt sich eine mittlere Rohdichte von 96 kg/m3 für Steinwolledämmstoffe im mittleren Rohdichtebereich, für die nachfolgend die Ökobilanzergebnisse dargestellt werden. Die Übertragung der Ergebnisse auf andere Rohdichten ist über eine lineare Skalierung möglich.

## Technical purpose
Alle Anwendungsbereiche nach /DIN 4108- 10/ für die Anwendungsgebiete Wand, Decke und Dach mit den dort festgelegten Anforde-rungen hinsichtlich des Wärme- und Schall- schutzes und der mechanischen Eigenschaf-ten
Haustechnik (Dämmung von Heizungs- und Warmwasserrohren)
Technische Isolierung (Dämmung von Rohr- leitungen, Fernwärmeleitungen, Kesseln und Apparaturen)
Industrielle Weiterverarbeitung (Klimakanäle, Feuerschutztüren, Fertighauselemente und Schornsteinsysteme)
Brandschutzelemente (Kabelabschottungen und Elemente für Stahlkonstruktionen)

## Reference product
- ROCKWOOL-Steinwolle (ROCKWOOL-Steinwolle, 96 kg/m³): 1

## Inputs
- Erneuerbare Primärenergie als Energieträger (PERE) [MJ]: A1-A3 99.3, A4 1.39, A5 58.86, C1 0, C2 0.22, C3 0, C4 2.53, D -10.58
- Erneuerbare Primärenergie zur stofflichen Nutzung (PERM) [MJ]: A1-A3 73.25, A4 0, A5 -55.01, C1 0, C2 0, C3 0, C4 0, D 0
- Total erneuerbare Primärenergie (PERT) [MJ]: A1-A3 175.66, A4 1.39, A5 3.91, C1 0, C2 0.22, C3 0, C4 2.53, D -10.58
- Nicht-erneuerbare Primärenergie als Energieträger (PENRE) [MJ]: A1-A3 897.3, A4 26.72, A5 51.35, C1 0, C2 4.3, C3 0, C4 20.44, D -48.85
- Nicht-erneuerbare Primärenergie zur stofflichen Nutzung (PENRM) [MJ]: A1-A3 143.55, A4 0, A5 -27.39, C1 0, C2 0, C3 0, C4 0, D 0
- Total nicht erneuerbare Primärenergie (PENRT) [MJ]: A1-A3 1137.14, A4 26.72, A5 25.84, C1 0, C2 4.3, C3 0, C4 20.44, D -48.85
- Einsatz von Sekundärstoffen (SM) [kg]: A1-A3 22.99, A4 0, A5 0.46, C1 0, C2 0, C3 0, C4 0, D 0
- Erneuerbare Sekundärbrennstoffe (RSF) [MJ]: A1-A3 0, A4 0, A5 0, C1 0, C2 0, C3 0, C4 0, D 0
- Nicht erneuerbare Sekundärbrennstoffe (NRSF) [MJ]: A1-A3 0, A4 0, A5 0, C1 0, C2 0, C3 0, C4 0, D 0
- Einsatz von Süßwasserressourcen (FW) [m^3]: A1-A3 0.284, A4 0.00257, A5 0.024, C1 0, C2 0.000414, C3 0, C4 0.0039, D -0.00675

## Outputs
- Gefährlicher Abfall zur Deponie (HWD) [kg]: A1-A3 2.15e-6, A4 1.41e-6, A5 1.06e-7, C1 0, C2 2.27e-7, C3 0, C4 3.52e-7, D -2.77e-8
- Entsorgter nicht gefährlicher Abfall (NHWD) [kg]: A1-A3 7.47, A4 0.00215, A5 2.09, C1 0, C2 0.000346, C3 0, C4 95.9, D -0.0268
- Entsorgter radioaktiver Abfall (RWD) [kg]: A1-A3 0.0256, A4 5.58e-5, A5 0.000584, C1 0, C2 8.99e-6, C3 0, C4 0.000296, D -0.00223
- Komponenten für die Wiederverwendung (CRU) [kg]: A1-A3 0, A4 0, A5 0, C1 0, C2 0, C3 0, C4 0, D 0
- Stoffe zum Recycling (MFR) [kg]: A1-A3 0, A4 0, A5 0, C1 0, C2 0, C3 0, C4 0, D 0
- Stoffe für die Energierückgewinnung (MER) [kg]: A1-A3 0, A4 0, A5 0, C1 0, C2 0, C3 0, C4 0, D 0
- Exportierte elektrische Energie (EEE) [MJ]: A1-A3 0, A4 0, A5 10.63, C1 0, C2 0, C3 0, C4 0, D 0
- Exportierte thermische Energie (EET) [MJ]: A1-A3 0, A4 0, A5 24.51, C1 0, C2 0, C3 0, C4 0, D 0

## Impact indicators
- Globales Erwärmungspotenzial (GWP) [kg CO_(2)-Äq.]: A1-A3 121.79, A4 1.96, A5 10.21, C1 0, C2 0.32, C3 0, C4 1.52, D -3.36
- Abbau Potential der stratosphärischen Ozonschicht (ODP) [kg CFC11-Äq.]: A1-A3 1.56e-10, A4 8.13e-14, A5 3.21e-12, C1 0, C2 1.31e-14, C3 0, C4 3.45e-13, D -2.56e-12
- Versauerungspotenzial von Boden und Wasser (AP) [kg SO_(2)-Äq.]: A1-A3 0.585, A4 0.0017, A5 0.0128, C1 0, C2 0.000274, C3 0, C4 0.00902, D -0.0036
- Eutrophierungspotenzial (EP) [kg PO_(4)^(3)-Äq.]: A1-A3 0.0652, A4 0.000395, A5 0.00154, C1 0, C2 6.36e-5, C3 0, C4 0.00125, D -0.000603
- Bildungspotential für troposphärisches Ozon (POCP) [kg Ethen-Äq.]: A1-A3 0.0289, A4 -1.37e-5, A5 0.00065, C1 0, C2 -2.2e-6, C3 0, C4 0.000701, D -0.000307
- Potenzial für den abiotischen Abbau nicht fossiler Ressourcen (ADPE) [kg Sb-Äq.]: A1-A3 2.52e-5, A4 1.73e-7, A5 6.17e-7, C1 0, C2 2.79e-8, C3 0, C4 5.85e-7, D -1.27e-6
- Potenzial für den abiotischen Abbau fossiler Brennstoffe (ADPF) [MJ]: A1-A3 1068.33, A4 26.58, A5 24.28, C1 0, C2 4.28, C3 0, C4 19.69, D -43.21

## Use advice
Gültigkeitsbereich:
Die in der EPD dargestellte Ökobilanz bezieht sich auf den Lebenszyklus von unkaschierter bzw. unbe-schichteter kunstharzgebundener Steinwolle von ROCKWOOL. Die Steinwolle wird in den Werken Gladbeck, Neuburg und Flechtingen produziert, in denen die Produktionsdaten des Jahres 2016 erhoben wurden. Die ökobilanziellen Kennzahlen der Kaschie-rungen sind dem Anhang zu entnehmen. Dieser wurde 2015 erstellt und verifiziert. Die Ökobilanz repräsentiert somit 100% der von ROCKWOOL pro-duzierten Steinwolle.
Systemgrenze:
Typ der EPD: Wiege-bis-Bahre, mit Optionen

Die Ökobilanz berücksichtigt die Lebenszyklusphasen der Steinwolle-Herstellung (A1-A3), den Transport zur Baustelle (A4), die Verwertung bzw. Entsorgung der während des Einbaus anfallenden Verpackung und Verschnittreste (Modul A5) und die Nachnutzungs-phase der Steinwolle (Module C1 bis C4). Gutschriften infolge der thermischen Verwertung der Verpackung wurden Modul D zugerechnet.

Im Einzelnen wurden folgende Prozesse in das Produktionsstadium (A1-A3) einbezogen:
Bereitstellungsprozesse von Vorprodukten und Energie
Transporte der Rohstoffe und Vorprodukte zum Werk
Herstellprozess im Werk inklusive energe-tischen Aufwendungen, Entsorgung von anfallenden Reststoffen und Emissionen
Herstellung der VerpackungenIn das System eingehende Sekundärmaterialien, die das Ende der Abfalleigenschaft bereits vor der Anlieferung erreicht haben, wurden lastenfrei, jedoch inklusive der für die Anlieferung erforderlichen Transporte berücksichtigt. Als alternative Brennstoffe genutzte Abfälle gehen ebenfalls lastenfrei in das System ein. Die Transporte dieser Abfälle zum Werk sind gemäß dem Verursacherprinzip jedoch dem vorherigen Produktlebenszyklus anzurechnen und wurden in der LCA nicht berücksichtigt.

Bei den berücksichtigten Mengen der Verpackungs-materialien handelt es sich um Jahresverbrauchs- bzw. Jahreszukaufsmengen, worin Palettenumläufe bereits abgedeckt sind. Bei der Auswahl der für die Berechnung verwendeten Verwertungsprozesse wurde darauf geachtet, dass in den Verpackungsmaterialien gespeichertes CO2 beim Verwertungsprozess als Emission freigesetzt wird.

Emissionen und Lasten infolge der Verwertung der Verpackung sind dem Modul A5 zugeordnet, hieraus entstehende Gutschriften wurden in Modul D angerechnet.

Die Verwertung bzw. Entsorgung der Steinwolle am Lebensende berücksichtigen den LKW-Transport zurück zum Herstellwerk bzw. einer Deponie (C2) sowie die finale Deponierung des entsprechenden Anteils (C4). Als Recycling-Menge am Lebensende wurde die im Bezugsjahr eingesetzte Menge der von Baustellen angelieferten Steinwolle-Abfälle angesetzt, weshalb sich keine Netto-Mengen für das Recycling ergeben und somit hieraus auch keine Gutschriften in Modul D berücksichtigt wurden.
Der Untersuchungsrahmen der Kaschierungen umfasst die Module A1-A3, A4, A5, C1 bis C4 und D. Da für die Kaschierung keine zusätzliche Verpackung berücksichtigt wird, ergeben sich bei den Kaschierungen in den Modulen A5 und D keine Umweltlasten bzw. Gutschriften.

## Data sources
- ROCKWOOL Steinwolle-Dämmstoff im mittleren Rohdichtebereich.pdf
- GaBi Database (all versions)
- GaBi database SP35 2018
