# EPS-Hartschaum (Styropor ®) für Decken/Böden und als Perimeterdämmung B/P-035

Dataset: ILCD process, EPD, average dataset
Geography: DE
Reference year: 2015
Valid until: 2020
Classification: OEKOBAU.DAT: Dämmstoffe / Expandiertes Polystyrol (EPS) / EPS weiß
Classification: IBUCategories: 02 Bauprodukte / Wärmedämmungsprodukte / Dämmstoffe aus Schaumkunststoffen
Method details: Dämmstoffe aus Schaumkunststoffen.pdf
Owner: IVH
Compliance: DIN EN 15804; ISO 14025
Review: Accredited third party review by IBU
Amounts: rows without a unit in brackets have none in this file; such an amount is in the reference unit of its flow, which a separate flow dataset defines
copyright: true

## General comment
In dieser Umwelt-Produktdeklaration (EPD) werden Hartschaum-Dämmstoffprodukte aus expandiertem Polystyrol (EPS) der IVH-Mitglieder beschrieben. Das Verbandszeichen für EPS-Produkte der IVH-Mitglieder ist Styropor®. Diese Produkte werden für den Wärme- und Schallschutz von Gebäuden eingesetzt.

Hergestellt werden sie werkmäßig in Form von Platten oder als loser, wärmedämmender Füllstoff. Die vorlie-gende EPD beschreibt die druckbeanspruchten EPS-Hartschaumprodukte für die Anwendungsgebiete Decken / Böden sowie Kelleraußenwände und Boden-platten.

EPS-Hartschaum ist ein fester Dämmstoff mit Zell-struktur, der aus verschweißtem, geblähtem Polystyrol oder einem seiner Co-Polymere hergestellt wird. Er hat eine geschlossenzellige, mit Luft gefüllte Struktur (98 % Luft). EPS-Platten sind harte Dämmstoffprodukte (geschnitten, geformt oder kontinuierlich geschäumt) mit rechtwinkliger Form. Die Plattenkanten können mit Stufenfalz oder Nut und Feder ausgestattet sein. EPS als loser Füllstoff wird in Form luftgefüllter Perlen (Ø ca. 6 mm) werkmäßig hergestellt. Diese Umwelt-Pro-duktdeklaration betrachtet den homogenen EPS-Dämmstoff ohne Materialkombination zu Verbundplat-ten oder kaschierten Dämmplatten. Wesentliche kenn-zeichnende Eigenschaften sind die Wärmeleitfähigkeit, die Druckfestigkeit und die Schalldämmung.

## Technology and included processes
EPS-Hartschaum / Styropor mit dem Flammschutzmittel Polymer-FR ist ein fester, HBCD-freier Dämmstoff mit Zellstruktur, der aus verschweißtem, geblähtem Polystyrol oder einem seiner Co-Polymere hergestellt wird. Er hat eine geschlossenzellige, mit Luft gefüllte Struktur (98 % Luft). EPS-Platten sind harte Dämmstoffprodukte (geschnitten, geformt oder kontinuierlich geschäumt) mit rechtwinkliger Form. Die Plattenkanten können mit Stufenfalz oder Nut und Feder ausgestattet sein. EPS als loser Füllstoff wird in Form luftgefüllter Perlen (Ø ca. 6 mm) werkmäßig hergestellt.
Technische Daten:
Folgende (bau)technische Daten im Lieferzustand sind für das deklarierte Produkt relevant.
Deklarierte Einheit:
Die deklarierte Einheit ist 1 m³ expandierter, unver-packter Polystyrol-Hartschaum mit Polymer-FR als Flammschutzmittel. Die durchschnittliche Rohdichte beträgt 25,9 kg/m³.

Die gemittelte Rohdichte für die Produktgruppe ergibt sich aus der Aufteilung der Herstellerdaten für die einzelnen Rohdichten und der Zusammenführung mittels Anwendungsbereichen und Marktanteilen der berücksichtigten Unternehmen.

## Technical purpose
Hauptanwendungsgebiet für die hier deklarierten Pro-dukte sind die Anwendungstypen nach DIN 4108-10.

Decken: Kellerdecken - DI; Geschoßdecken - DEO, DES; oberste Geschoßdecken - DEO, DES

Böden: Wärme- und Schalldämmung unter schwimmenden Estrich - DEO,DES

Sockel erdberührter Wände: Perimeterdämmung - PW

Kelleraußenwände, Kellerfußböden und nichtlastabtragende Bodenplatte: Perimeterdämmung - PW, PB

## Reference product
- 1m3 EPS-Hartschaum B/P-035: 1

## Inputs
- Erneuerbare Primärenergie als Energieträger (PERE) [MJ]: A1-A3 27.5
- Erneuerbare Primärenergie zur stofflichen Nutzung (PERM) [MJ]: A1-A3 0
- Total erneuerbare Primärenergie (PERT) [MJ]: A1-A3 27.5, A4 0.718, C4 1.08, D -66
- Nicht-erneuerbare Primärenergie als Energieträger (PENRE) [MJ]: A1-A3 1204.36
- Nicht-erneuerbare Primärenergie zur stofflichen Nutzung (PENRM) [MJ]: A1-A3 1025.64
- Total nicht erneuerbare Primärenergie (PENRT) [MJ]: A1-A3 2230, A4 12.1, C4 11, D -690
- Einsatz von Sekundärstoffen (SM) [kg]: A1-A3 0, A4 0, C4 0
- Erneuerbare Sekundärbrennstoffe (RSF) [MJ]: A1-A3 0, A4 0, C4 0, D 0
- Nicht erneuerbare Sekundärbrennstoffe (NRSF) [MJ]: A1-A3 0, A4 0, C4 0, D 0
- Einsatz von Süßwasserressourcen (FW) [m^3]: A1-A3 0.332, A4 0.000692, C4 0.166, D -0.103

## Outputs
- Gefährlicher Abfall zur Deponie (HWD) [kg]: A1-A3 0.0132, A4 0, C4 3.37e-5, D 0
- Entsorgter nicht gefährlicher Abfall (NHWD) [kg]: A1-A3 0.311, A4 0.0024, C4 0.593, D -0.259
- Entsorgter radioaktiver Abfall (RWD) [kg]: A1-A3 0.0219, A4 1.74e-5, C4 0.000639, D -0.0394
- Komponenten für die Wiederverwendung (CRU) [kg]: A1-A3 0, A4 0, C4 0
- Stoffe zum Recycling (MFR) [kg]: A1-A3 0, A4 0, C4 0
- Stoffe für die Energierückgewinnung (MER) [kg]: A1-A3 0, A4 0, C4 0
- Exportierte elektrische Energie (EEE) [MJ]: A1-A3 0, A4 0, C4 138
- Exportierte thermische Energie (EET) [MJ]: A1-A3 0, A4 0, C4 330

## Impact indicators
- Globales Erwärmungspotenzial (GWP) [kg CO_(2)-Äq.]: A1-A3 75.4, A4 0.886, C4 85.9, D -45.2
- Abbau Potential der stratosphärischen Ozonschicht (ODP) [kg CFC11-Äq.]: A1-A3 4.09e-7, A4 1.85e-11, C4 2.24e-10, D -1.37e-8
- Versauerungspotenzial von Boden und Wasser (AP) [kg SO_(2)-Äq.]: A1-A3 0.171, A4 0.00237, C4 0.00526, D -0.0627
- Eutrophierungspotenzial (EP) [kg PO_(4)^(3)-Äq.]: A1-A3 0.0155, A4 0.000542, C4 0.00104, D -0.00704
- Bildungspotential für troposphärisches Ozon (POCP) [kg Ethen-Äq.]: A1-A3 0.542, A4 -0.000693, C4 0.000621, D -0.00574
- Potenzial für den abiotischen Abbau nicht fossiler Ressourcen (ADPE) [kg Sb-Äq.]: A1-A3 2.79e-5, A4 4.08e-8, C4 1.15e-6, D -4.68e-6
- Potenzial für den abiotischen Abbau fossiler Brennstoffe (ADPF) [MJ]: A1-A3 2170, A4 12.1, C4 9.41, D -594

## Use advice
Gültigkeitsbereich:
Die vorliegende EPD beschreibt die EPS-Hartschaum-produkte zur Wärme- und Schalldämmung von Wänden und Dächern. Die teilnehmenden Mitgliedsunternehmen repräsentieren für das Jahr 2012 mit ihrer Produktion 54 % (nach Masse) der Gesamtmenge aller IVH-Mitgliedsunternehmen. Diese EPD ist nur gültig für Produkte mit dem Flammschutzmittel Polymer-FR. Der Inhaber der Deklaration haftet für die zugrundeliegenden Angaben und Nachweise; eine Haftung des IBU in Bezug auf Herstellerinformationen, Ökobilanzdaten und Nachweise ist ausgeschlossen.
Systemgrenze:
Typ der EPD: Wiege-bis-Werkstor mit Optionen

Die Umweltproduktdeklaration bezieht sich auf die folgenden Lebenszyklusabschnitte

Rohstoffbereitstellung (A1)
Transport (A2)
Herstellung (A3)
Transporte zur Baustelle (A4)
Thermische Verwertung des Produktes (C4)
Gutschriften für das nächste Produktsystem (D): Gutschriften für elektrische und thermische Energie aus der energetischen Verwertung des Produktes

## Data sources
- EPS-Hartschaum (Styropor ®) für Decken/Böden und als Perimeterdämmung B/P-035.pdf
- GaBi Database (all versions)
- GaBi database SP20 2013
