# Mehrschichtparkett

Dataset: ILCD process, EPD, average dataset
Geography: AT
Reference year: 2015
Valid until: 2020
Classification: OEKOBAU.DAT: Holz / Holzböden / Parkett
Classification: IBUCategories: 02 Bauprodukte / Bodenbeläge / Bodenbeläge
Method details: Bodenbeläge.pdf
Owner: Weitzer Parkett GmbH & Co Kg
Compliance: DIN EN 15804; ISO 14025
Review: Accredited third party review by IBU
Amounts: rows without a unit in brackets have none in this file; such an amount is in the reference unit of its flow, which a separate flow dataset defines
copyright: true

## General comment
WEITZER PARKETT Mehrschichtparkettböden sind Holzfußböden mit Edelholznutzschicht, die vorzugsweise auf einem Trägermaterial aus Fichte mit stehenden Jahresringen kreuzweise verleimt werden. Als weiteres Trägermaterial kommt in geringerem Umfang auch HDF (hochdichte Faserplatte) zum Einsatz. Die Abmessungen der einzelnen Parkettelemente sind unterschiedlich. Die Breiten der Deckschichten liegen zwischen 50 und 600mm, die Längen liegen zwischen 360 und 7500mm. Die Produktdicken liegen zwischen 9mm und 18mm. Als Edelholznutzschicht kommen fast ausschließlich heimische Laubholzarten zur Anwendung, Tropenhölzer werden aus ökologischen Gründen nicht verarbeitet. Die Parkettböden weisen je nach Bearbeitung und Oberfläche unterschiedliche Funktionalitäten auf. Die Produkte werden daher auch als Pflegefrei-Parkett, Gesund-Parkett und Flüster-Parkett bezeichnet.

Für die gegenständliche Deklaration wurde der Produktmix einer durchschnittlichen Jahresproduktion herangezogen. Auf Basis dieser Mengen wurde eine durchschnittliche Dicke, Nutzschichtstärke und das Flächengewicht ermittelt. Diese sind in den nachfolgenden bautechnischen Daten angeführt.

## Technology and included processes
WEITZER PARKETT Mehrschichtparkettböden sind Holzfußböden mit Edelholznutz-schicht, die vorzugsweise auf einem Trägermaterial aus Fichte mit stehenden Jahresrin-gen kreuzweise verleimt werden. Als weiteres Trägermaterial kommt in geringerem Um-fang auch HDF (hochdichte Faserplatte) zum Einsatz. Die Abmessungen der einzelnen Parkett¬elemente sind unterschiedlich. Die Breiten der Deckschichten liegen zwischen 50 und 600 mm, die Längen liegen zwischen 360 und 7500 mm. Die Produktdicken liegen zwischen 9 mm und 18 mm. Als Edelholznutzschicht kommen fast ausschließlich heimi-sche Laubholzarten zur Anwendung, Tropenhölzer werden aus ökologischen Gründen nicht verarbeitet. Die Parkettböden weisen ja nach Bearbeitung und Oberfläche unter-schiedliche Funktionalitäten auf. Die Produkte werden daher auch als Pflegefrei-Parkett, Gesund-Parkett und Flüster-Parkett bezeichnet.
Technische Daten:
Nachfolgende Produktdaten stellen den Durchschnitt aller Mehrschichtparkettprodukte dar, die innerhalb eines repräsentativen Wirtschaftsjahres durch die WEITZER PARKETT GmbH gefertigt wurden. Es sind Mittelwerte, die keiner spezifischen Produktgruppe entsprechen.

## Technical purpose
Parkettböden werden im Innenbereich in Neubauten oder bei Renovierungen auf (Heiz)Estrichen oder anderen Unterböden wie Holz, Fliesen, Gussasphalt u.ä. sowohl vollflächig verklebt als auch schwimmend verlegt. Je nach Produktgruppe stehen wahlweise leimlose Klickverbindungen oder Nut/Feder Systeme zur Verfügung. Die Verlegung ist gemäß der Verlegeanleitung, den Regeln des Fachs und dem Stand der Technik durchzuführen.

## Reference product
- 1 m² Mehrschichtparkett (7,31 kg): 1

## Inputs
- Erneuerbare Primärenergie als Energieträger (PERE) [MJ]: A1-A3 17.1768, C3 0, D 112
- Erneuerbare Primärenergie zur stofflichen Nutzung (PERM) [MJ]: A1-A3 129.317, C3 -129.317, D 0
- Total erneuerbare Primärenergie (PERT) [MJ]: A1-A3 146.494, C3 -129.317, D 112
- Nicht-erneuerbare Primärenergie als Energieträger (PENRE) [MJ]: A1-A3 67.3769, C3 0, D -121
- Nicht-erneuerbare Primärenergie zur stofflichen Nutzung (PENRM) [MJ]: A1-A3 3.63015, C3 -3.63015, D 0
- Total nicht erneuerbare Primärenergie (PENRT) [MJ]: A1-A3 71.007, C3 -3.63015, D -121
- Einsatz von Sekundärstoffen (SM) [kg]: A1-A3 0, C3 0, D 7.31
- Erneuerbare Sekundärbrennstoffe (RSF) [MJ]: A1-A3 0, C3 0, D 133
- Nicht erneuerbare Sekundärbrennstoffe (NRSF) [MJ]: A1-A3 0, C3 0, D 0
- Einsatz von Süßwasserressourcen (FW) [m^3]: A1-A3 30.9902, C3 0, D -24.3997

## Outputs
- Gefährlicher Abfall zur Deponie (HWD) [kg]: A1-A3 6.24499e-5, C3 0, D -4.38682e-5
- Entsorgter nicht gefährlicher Abfall (NHWD) [kg]: A1-A3 0.0641281, C3 0, D 0.0142719
- Entsorgter radioaktiver Abfall (RWD) [kg]: A1-A3 0.0029024, C3 0, D -0.0120045
- Komponenten für die Wiederverwendung (CRU) [kg]: C3 0
- Stoffe zum Recycling (MFR) [kg]: C3 0
- Stoffe für die Energierückgewinnung (MER) [kg]: A1-A3 5.44727, C3 7.31
- Exportierte elektrische Energie (EEE) [MJ]: C3 0
- Exportierte thermische Energie (EET) [MJ]: C3 0

## Impact indicators
- Globales Erwärmungspotenzial (GWP) [kg CO_(2)-Äq.]: A1-A3 -5.36632, C3 12.1955, D -7.76217
- Abbau Potential der stratosphärischen Ozonschicht (ODP) [kg CFC11-Äq.]: A1-A3 4.70713e-8, C3 0, D -3.34976e-9
- Versauerungspotenzial von Boden und Wasser (AP) [kg SO_(2)-Äq.]: A1-A3 0.018454, C3 0, D -0.00435453
- Eutrophierungspotenzial (EP) [kg PO_(4)^(3)-Äq.]: A1-A3 0.00313493, C3 0, D 3.2502e-6
- Bildungspotential für troposphärisches Ozon (POCP) [kg Ethen-Äq.]: A1-A3 0.00218493, C3 0, D 0.000587239
- Potenzial für den abiotischen Abbau nicht fossiler Ressourcen (ADPE) [kg Sb-Äq.]: A1-A3 2.1355e-6, C3 0, D -8.81271e-7
- Potenzial für den abiotischen Abbau fossiler Brennstoffe (ADPF) [MJ]: A1-A3 62.9154, C3 0, D -94.8038

## Use advice
Gültigkeitsbereich:
Die Daten der vorliegenden Ökobilanz beruhen auf dem Durchschnitt aller Mehrschichtparkettböden von Weitzer Parkett, die in den Produktionsstandorten 8160 Weiz und 7540 Güssing in Österreich hergestellt werden.
Systemgrenze:
Es handelt sich um eine „von der Wiege bis zum
Werkstor, mit Optionen“ EPD. Die
Lebenszyklusanalyse für die betrachteten Produkte
umfasst die Lebenswegabschnitte „Produktionsstadium“,
sowie "Nutzen und Lasten jenseits der Grenzen
des Produktsystems". Die Systeme beinhalten somit
folgende Stadien gemäß /EN 15804/: Produktstadium
(Module A1-A3):
- A1 Rohstoffbereitstellung und –verarbeitung
und Verarbeitungsprozesse von als Input
dienenden Sekundärstoffen
- A2 Transport zum Hersteller,
- A3 Herstellung

In Modul C3 werden der Nettofluss und die Emission des biogenen CO2 angeführt.
Nachdem das Produkt als gehacktes Altholz den End-of-Waste Status erreicht hat, wird angenommen, dass das Produkt einer Biomasseverbrennung zugeführt wird, welche thermische Energie und Elektrizität produziert. Daraus entstehende Nutzen und Lasten sind im Modul D deklariert.

## Data sources
- Mehrschichtparkett.pdf
- GaBi Database (all versions)
- GaBi database SP20 2013
