# Float glass - Guardian Europe S.à r.l. - Mirror / Ultra Mirror; 51 μm

Dataset: ILCD process, EPD, specific dataset
Geography: EU-27
Reference year: 2015
Valid until: 2020
Classification: OEKOBAU.DAT: Komponenten von Fenstern und Vorhangfassaden / Füllungen / Opake Füllungen
Synonyms: Silver coating for flat glass
Method details: EPD Mirro / Ultra Mirror - Silver coating for flat glass; Produktkategorieregeln Teil A; Produktkategorieregeln Teil B – für Flachglas im Bauwesen
Owner: Guardian Europe S.à r.l.
Compliance: EN 15804
Review: Independent external review by Patrick Wortner
Amounts: rows without a unit in brackets have none in this file; such an amount is in the reference unit of its flow, which a separate flow dataset defines
copyright: true

## General comment
This dataset is modelled according to the European Standard EN 15804 for Sustainable Construction. Results are declared in modules, which allow the structured expression of results throughout the life cycle. It contains the modules A1-A3. The comparison with other products is only permissible if the application in the building is comparable. A comparison or the evaluation of EPD data is only possible, if the datasets have been created according to EN 15804. The building context or the product-specific performance characteristics must be considered.

The EPD is created as addition to the EPD Floatglass, Laminated Safety and Coated Glass (EPD-GFEV-19.0).

## Geography
This data set represents the company Guardian Europe S.à r.l., Luxembourg considering the most important technologies and the legal framework. Production sites as following:
• Guardian Oroshaza / Hungary
• Guardian Dudelange / Luxembourg
• Guardian Llodio / Spain

## Time period
annual average

## Technology and included processes
The LCA results include the lifecycle stages for the raw material extraction and processing, processing of secondary material input, their transport to the manufacturer as well as the maufacturing itself, including provision of all materials, products and energy, as well as waste processing up to the end-of waste state or disposal of final residues during the product stage. The modules A1, A2 and A3 are shown here as an aggregated module A1-A3. If further modules have been calculated for this data set, they can be found separately and can be combined for a consideration of the entire life cycle.

The EPD is created as addition to the EPD Floatglass, Laminated Safety and Coated Glass (EPD-GFEV-19.0).

## Technical purpose
Silver-coated flat glass for applications in buildings.
• UltraMirror I is only used as interior applications in buildings.
• Mirror is used as interior applications in buildings as well as for specific solar mirror applications.

## Reference product
- Float glass - Guardian Europe S.à r.l. - Mirror / Ultra Mirror: 1

## Inputs
- Use of net fresh water (FW) [m3]: A1-A3 0.05
- Use of non renewable primary energy (PENRE) [MJ]: A1-A3 36.14
- Use of non renewable primary energy resources used as raw materials (PENRM) [MJ]: A1-A3 0
- Use of non renewable secondary fuels (NRSF) [MJ]: A1-A3 0
- Use of renewable primary energy (PERE) [MJ]: A1-A3 5.14
- Use of renewable primary energy resources used as raw materials (PERM) [MJ]: A1-A3 0
- Use of renewable secondary fuels (RSF) [MJ]: A1-A3 0
- Use of secondary material (SM) [kg]: A1-A3 0
- Total use of non renewable primary energy resource (PENRT) [MJ]: A1-A3 36.14
- Total use of renewable primary energy resources (PERT) [MJ]: A1-A3 5.14

## Outputs
- Components for re-use (CRU) [kg]
- Exported electrical energy (EEE) [MJ]
- Exported thermal energy (EET) [MJ]
- Hazardous waste disposed (HWD) [kg]: A1-A3 1.17e-5
- Materials for energy recovery (MER) [kg]
- Materials for recycling (MFR) [kg]
- Non hazardous waste dispose (NHWD) [kg]: A1-A3 0.1
- Radioactive waste disposed (RWD) [kg]: A1-A3 0.00314

## Impact indicators
- Abiotic depletion potential for non fossil resources (ADPE) [kg Sb-Äqv.]: A1-A3 0.000153
- Abiotic depletion potential for fossil resources (ADPF) [MJ]: A1-A3 28.17
- Acidification potential of soil and water (AP) [kg SO2-Äqv.]: A1-A3 0.01
- Eutrophication potential (EP) [kg Phosphat-Äqv.]: A1-A3 0.000865
- Global warming potential (GWP) [kg CO2-Äqv.]: A1-A3 2.03
- Depletion potential of the stratospheric ozone layer (ODP) [kg CFC 11 eq.]: A1-A3 1.25e-8
- Formation potential of tropospheric ozone (POCP) [kg Ethen-Äqv.]: A1-A3 0.000773

## Use advice
A1-A3. The environmental profile includes the lifecycle stages cradle to gate with options (module A1-A3).

## Review details
The LCI method applied is in compliance with ISO 14040 and 14044. The documentation includes all relevant information in view of the data quality and scope of the application of the respective LCI result / data set. The dataset represents the state-of-the-art in view of the referenced functional unit.

## Data sources
- GaBi database (all versions)
