# Coloured Core Laminate

Dataset: ILCD process, EPD, specific dataset
Geography: DE
Reference year: 2015
Valid until: 2020
Classification: OEKOBAU.DAT: Beschichtungen / Innenbeschichtungen / Wand- und Deckenbeläge
Classification: IBUCategories: 02 Bauprodukte / Inneneinrichtung / Schichtpressstoffe
Method details: Schichtpressstoffe.pdf
Owner: Fritz EGGER GmbH & Co.OG
Compliance: DIN EN 15804; ISO 14025
Review: Accredited third party review by IBU
Amounts: rows without a unit in brackets have none in this file; such an amount is in the reference unit of its flow, which a separate flow dataset defines
copyright: true

## General comment
EGGER coloured core laminate is a decorative laminate based on curable resins (high-pressure decorative laminates). This high-pressure decorative laminate consists of cellulose fibre web (paper) impregnated with heat-setting resins. It has a multilayer structure and consists of several melamine resin impregnated decorative papers. These multiple layers are pressed together by means of high pressure and heat.

## Technology and included processes
EGGER laminates are only produced using a continuous process. Dual-belt presses allow the continuous production of various laminate thicknesses and grades. This grade or type of laminate production is generally known as CPL (Continuous Pressed Laminates). Depending on the pressure during production, EGGER laminates are produced in accordance with or based on /EN 438-9:2010/. The laminates consist of layers of cellulose fibre webs (usually paper) that are impregnated with curable resins. The individual paper layers are impregnated with resins on the basis of melamine. Applying heat and pressure causes the resins to flow and subsequently cure. Cross-linking of the resins, reinforced by the cellulose fibres of the papers, results in a very dense material with a sealed surface.
Technical data:
EGGER coloured core laminate is tested according to the testing procedure described in /EN438-2:2016/ and complies with the requirements stipulated in /EN 438-9:2010+A1/. The technical sheet "EGGER Coloured Core Laminate " contains detailed information concerning quality features and product characteristics. www.egger.com/laminates
Declared unit:
The declared unit is one square meter coloured core laminate 0.8 mm (1.080 kg/m2).

## Technical purpose
Laminates are non-weight-bearing and only serve as lamination materials. EGGER laminates are only suitable for indoor applications. The laminate quality with coloured core is primarily used for the lamination of wood-based materials, but also for other support materials - for producing the so-called joining elements for furniture or interior design.

## Reference product
- 1 m² Schichtstoff mit farbigem Kern (1.080 kg/m²): 1

## Inputs
- Erneuerbare Primärenergie als Energieträger (PERE) [MJ]: A1-A3 35.154, C4 0.0712258, D -1.02399
- Erneuerbare Primärenergie zur stofflichen Nutzung (PERM) [MJ]: A1-A3 6.86429, C4 0, D 0
- Total erneuerbare Primärenergie (PERT) [MJ]: A1-A3 42.0183, C4 0.0712258, D -1.02399
- Nicht-erneuerbare Primärenergie als Energieträger (PENRE) [MJ]: A1-A3 87.2551, C4 1.93312, D -10.0362
- Nicht-erneuerbare Primärenergie zur stofflichen Nutzung (PENRM) [MJ]: A1-A3 8.63571, C4 0, D 0
- Total nicht erneuerbare Primärenergie (PENRT) [MJ]: A1-A3 95.8908, C4 1.93312, D -10.0362
- Einsatz von Sekundärstoffen (SM) [kg]: A1-A3 0, C4 0, D 0
- Erneuerbare Sekundärbrennstoffe (RSF) [MJ]: A1-A3 0, C4 0, D 0
- Nicht erneuerbare Sekundärbrennstoffe (NRSF) [MJ]: A1-A3 0, C4 0, D 0
- Einsatz von Süßwasserressourcen (FW) [m^3]: A1-A3 0.0230104, C4 0.00459416, D -0.00206689

## Outputs
- Gefährlicher Abfall zur Deponie (HWD) [kg]: A1-A3 0.00260844, C4 8.04754e-5, D -2.90975e-6
- Entsorgter nicht gefährlicher Abfall (NHWD) [kg]: A1-A3 0.325133, C4 0.00221137, D -0.00301762
- Entsorgter radioaktiver Abfall (RWD) [kg]: A1-A3 0.00218658, C4 4.69899e-5, D -0.000727989
- Komponenten für die Wiederverwendung (CRU) [kg]
- Stoffe zum Recycling (MFR) [kg]
- Stoffe für die Energierückgewinnung (MER) [kg]
- Exportierte elektrische Energie (EEE) [MJ]: C4 2.01928
- Exportierte thermische Energie (EET) [MJ]: C4 4.66774

## Impact indicators
- Globales Erwärmungspotenzial (GWP) [kg CO_(2)-Äq.]: A1-A3 4.73, C4 1.99, D -0.587
- Abbau Potential der stratosphärischen Ozonschicht (ODP) [kg CFC11-Äq.]: A1-A3 4.32e-10, C4 7.82e-12, D -2.03e-10
- Versauerungspotenzial von Boden und Wasser (AP) [kg SO_(2)-Äq.]: A1-A3 0.0381, C4 0.00545, D -0.00158
- Eutrophierungspotenzial (EP) [kg PO_(4)^(3)-Äq.]: A1-A3 0.00355, C4 0.00142, D -0.000106
- Bildungspotential für troposphärisches Ozon (POCP) [kg Ethen-Äq.]: A1-A3 0.00314, C4 0.00032, D -0.000129
- Potenzial für den abiotischen Abbau nicht fossiler Ressourcen (ADPE) [kg Sb-Äq.]: A1-A3 4.28e-6, C4 2.49e-8, D -5.96e-8
- Potenzial für den abiotischen Abbau fossiler Brennstoffe (ADPF) [MJ]: A1-A3 90.4, C4 1.81, D -8.21

## Use advice
Scope:
This document refers to the coloured core laminate produced by EGGER Kunststoffe GmbH & Co.KG (a subsidiary of Fritz EGGER GmbH & Co. OG) in the Gifhorn plant (Germany). This document is translated from the German Environmental Product Declaration into English. It is based on the German original version EPD-EGG-20150065-IBA1-DE. The verifier has no influence on the quality of the translation.
System boundary:
The present study represents a cradle-to-gate approach with options. Module A1-A3, Module C4, and Module D are considered. The system thus includes raw material procurement, transport, manufacturing, and the energetic utilisation of the product.

The data collection reference year is 2013 in the Gifhorn, Germany plant.

The following life cycle phases are taken into account:

- product stage

- disposal stage

- credits and charges outside the system limits

The EPD system limits follow the modular approach of /EN 15804/.

## Data sources
- Schichtstoff mit farbigem Kern.pdf
- GaBi Database (all versions)
- GaBi database SP20 2013
