# Glas - Promat GmbH - Brandschutzglas; 1 m² Fläche, 21,1 mm Dicke

Dataset: ILCD process, EPD, average dataset
Geography: RER
Reference year: 2015
Valid until: 2020
Classification: OEKOBAU.DAT: Komponenten von Fenstern und Vorhangfassaden / Füllungen / Transparente Füllungen
Synonyms: PROMAGLAS; Promat-SYSTEMGLAS
Method details: EPD PROMAGLAS und Promat-SYSTEMGLAS; Produktkategorieregeln Teil A; Produktkategorieregeln Teil B – für Flachglas im Bauwesen
Owner: Promat GmbH
Compliance: EN 15804
Review: Independent external review by Patrick Wortner
Amounts: rows without a unit in brackets have none in this file; such an amount is in the reference unit of its flow, which a separate flow dataset defines
copyright: true

## General comment
A1-A3 sowie Module A4, A5, B1, B2, C2, C3, C4. Das Umweltprofil beinhaltet die Aufwendungen für die Lebenszyklus-Stadien cradle to gate mit Optionen (Modul A1-A3).

## Geography
Dieser Datensatz repräsentiert die Situation des Unternehmens Promat GmbH in 40878 Ratingen im Hinblick auf die wichtigsten Technologien und die gesetzlichen Rahmenbedingungen.

## Time period
jährlicher Durchschnitt

## Technology and included processes
Die Ökobilanzergebnisse umfassen die Lebenszyklusstadien für die Herstellung der Vorprodukte bis hin zur Rohstoffgewinnung und Verarbeitungsprozesse von als Input dienenden Sekundärstoffen (z.B. Recyclingprozesse), deren Transporte zum Werk sowie die Produktion selbst, einschließlich der Bereitstellung von allen Hilfs- und Betriebsstoffen, Energie, sowie die vollständige Abfallbehandlung oder die Deponierung der Restabfälle während des Stadiums der Produktion. Die Module A1, A2 und A3 sind hier als ein aggregiertes Modul A1-A3 ausgewiesen. Falls für diesen Datensatz weitere Module berechnet wurden, sind diese separat zu finden und können für eine Betrachtung des gesamten Lebenszyklus zusammengeführt werden.

## Technical purpose
Im Innenbereich oder Außenbereich in Verbindung mit einer Wärmeschutzverglasung.

## Reference product
- Glas - Promat GmbH - Brandschutzglas: 1

## Inputs
- Use of net fresh water (FW) [m3]: A1-A3 0.401, A4 0.00408, A5 9.15e-6, B1 0, B2 0.00569, C2 9.75e-5, C3 0, C4 0.00162
- Use of non renewable primary energy (PENRE) [MJ]: A1-A3 2120, A4 20.4, A5 1.29, B1 0, B2 0.172, C2 1.01, C3 0, C4 45.4
- Use of non renewable primary energy resources used as raw materials (PENRM) [MJ]: A1-A3 37.8, A4 0, A5 -1.27, B1 0, B2 0, C2 0, C3 0, C4 -36.5
- Use of non renewable secondary fuels (NRSF) [MJ]: A1-A3 0, A4 0, A5 0, B1 0, B2 0, C2 0, C3 0, C4 0
- Use of renewable primary energy (PERE) [MJ]: A1-A3 56.3, A4 0, A5 11.6, B1 0, B2 0.0168, C2 0.0394, C3 0, C4 0.73
- Use of renewable primary energy resources used as raw materials (PERM) [MJ]: A1-A3 11.6, A4 0, A5 -11.6, B1 0, B2 0, C2 0, C3 0, C4 0
- Use of renewable secondary fuels (RSF) [MJ]: A1-A3 0, A4 0, A5 0, B1 0, B2 0, C2 0, C3 0, C4 0
- Use of secondary material (SM) [kg]: A1-A3 0, A4 0, A5 0, B1 0, B2 0, C2 0, C3 0, C4 0
- Total use of non renewable primary energy resource (PENRT) [MJ]: A1-A3 2160, A4 20.4, A5 0.0248, B1 0, B2 0.172, C2 1.01, C3 0, C4 8.85
- Total use of renewable primary energy resources (PERT) [MJ]: A1-A3 67.9, A4 0, A5 0.00122, B1 0, B2 0.0168, C2 0.0394, C3 0, C4 0.73

## Outputs
- Components for re-use (CRU) [kg]: A1-A3 0.351, A4 0, A5 0, B1 0, B2 0, C2 0, C3 0, C4 0
- Exported electrical energy (EEE) [MJ]: A1-A3 0, A4 0, A5 0, B1 0, B2 0, C2 0, C3 0, C4 0
- Exported thermal energy (EET) [MJ]: A1-A3 0, A4 0, A5 0, B1 0, B2 0, C2 0, C3 0, C4 0
- Hazardous waste disposed (HWD) [kg]: A1-A3 0.00084, A4 9.7e-6, A5 4.47e-9, B1 0, B2 6.03e-8, C2 4.73e-7, C3 0, C4 2.78e-6
- Materials for energy recovery (MER) [kg]: A1-A3 0, A4 0, A5 0, B1 0, B2 0, C2 0, C3 0, C4 0
- Materials for recycling (MFR) [kg]: A1-A3 0, A4 0, A5 0, B1 0, B2 0, C2 0, C3 0, C4 0
- Non hazardous waste dispose (NHWD) [kg]: A1-A3 0.43, A4 0.00291, A5 0.0134, B1 0, B2 0.0256, C2 0.000142, C3 0, C4 47.6
- Radioactive waste disposed (RWD) [kg]: A1-A3 0.0285, A4 2.79e-5, A5 4.53e-7, B1 0, B2 1.13e-5, C2 1.36e-6, C3 0, C4 0.000134

## Impact indicators
- Abiotic depletion potential for non fossil resources (ADPE) [kg Sb-Äqv.]: A1-A3 0.000197, A4 5.8e-8, A5 3.31e-10, B1 0, B2 2.99e-8, C2 2.73e-9, C3 0, C4 2.42e-7
- Abiotic depletion potential for fossil resources (ADPF) [MJ]: A1-A3 1000, A4 20.4, A5 0.0237, B1 0, B2 0.143, C2 1, C3 0, C4 8.45
- Acidification potential of soil and water (AP) [kg SO2-Äqv.]: A1-A3 0.455, A4 0.00675, A5 8.75e-6, B1 0, B2 0.0001, C2 0.000457, C3 0, C4 0.0041
- Eutrophication potential (EP) [kg Phosphat-Äqv.]: A1-A3 0.0576, A4 0.00171, A5 4.04e-6, B1 0, B2 0.000114, C2 0.000109, C3 0, C4 0.00056
- Global warming potential (GWP) [kg CO2-Äqv.]: A1-A3 71.6, A4 1.49, A5 0.0408, B1 0, B2 0.0783, C2 0.0725, C3 0, C4 0.645
- Depletion potential of the stratospheric ozone layer (ODP) [kg CFC 11 eq.]: A1-A3 5.33e-7, A4 6.05e-12, A5 4.85e-12, B1 0, B2 2.37e-12, C2 3.47e-13, C3 0, C4 8.75e-12
- Formation potential of tropospheric ozone (POCP) [kg Ethen-Äqv.]: A1-A3 0.0298, A4 0, A5 9.1e-6, B1 0, B2 6.24e-6, C2 0, C3 0, C4 0.000384

## Use advice
Dieser Datensatz beinhaltet die Ergebnisse für die Module A1-A3 sowie die Module A4, A5, B1, B2, C2, C3, C4 gemäß EN 15804. Ein Vergleich mit anderen Produkten ist nur mit einer vergleichbaren Anwendung im Gebäude zulässig. Grundsätzlich ist eine Gegenüberstellung oder die Bewertung von EPD Daten nur möglich, wenn alle zu vergleichenden Datensätze nach EN 15804 erstellt wurden und der Gebäudekontext, bzw. die produktspezifischen Leistungsmerkmale berücksichtigt werden.

## Review details
Die angewendete LCI Methode ist in Übereinstimmung mit ISO 14040 und 14044. Die Dokumentation enthält alle relevanten Informationen im Hinblick auf die Datenqualität und den Umfang der Anwendung der jeweiligen LCI Ergebnisse bzw. der Datensätze. Der Datensatz repräsentiert den Stand der Technik bezogen auf die funktionelle Einheit.

## Data sources
- GaBi database (all versions)
