# Glasarchitektur - LAMILUX Heinrich Strunz GmbH - Glasdach PR60

Dataset: ILCD process, EPD, specific dataset
Geography: DE
Reference year: 2018
Valid until: 2024
Classification: Komponenten von Fenstern und Vorhangfassaden / Füllungen / Transparente Füllungen
Classification: OEKOBAU.DAT: Komponenten von Fenstern und Vorhangfassaden / Füllungen / Transparente Füllungen
Synonyms: Glasdachkonstruktion
Method details: EN 15804; EPD Glasdach PR60 und Rauchlift Glasdach PR60
Owner: LAMILUX Heinrich Strunz GmbH
Compliance: EN 15804
Review: Independent external review by Dr.-Ing. Carolin Roth
Amounts: rows without a unit in brackets have none in this file; such an amount is in the reference unit of its flow, which a separate flow dataset defines
copyright: true

## General comment
Dieser Datensatz beinhaltet die Ergebnisse für die Module A1-A3 sowie die Module A4, A5, B2, B3, C2, C3, C4, D gemäß EN 15804. Ein Vergleich mit anderen Produkten ist nur mit einer vergleichbaren Anwendung im Gebäude zulässig. Grundsätzlich ist eine Gegenüberstellung oder die Bewertung von EPD Daten nur möglich, wenn alle zu vergleichenden Datensätze nach EN 15804 erstellt wurden und der Gebäudekontext, bzw. die produktspezifischen Leistungsmerkmale berücksichtigt werden.

## Geography
Dieser Datensatz repräsentiert die Situation des Unternehmens LAMILUX Heinrich Strunz GmbH in 95111 Rehau, im Hinblick auf die wichtigsten Technologien und die gesetzlichen Rahmenbedingungen.

## Time period
jährlicher Durchschnitt

## Technology and included processes
Die Ökobilanzergebnisse umfassen die Lebenszyklusstadien der Herstellung der Vorprodukte bis hin zur Rohstoffgewinnung und Verarbeitungsprozesse von als Input dienenden Sekundärstoffen (z.B. Recyclingprozesse), deren Transporte zum Werk sowie die Produktion selbst, einschließlich der Bereitstellung von allen Hilfs- und Betriebsstoffen, Energie, sowie die vollständige Abfallbehandlung oder die Deponierung der Restabfälle während des Stadiums der Produktion. Die Module A1, A2 und A3 sind hier als ein aggregiertes Modul A1-A3 ausgewiesen. Falls für diesen Datensatz weitere Module berechnet wurden, sind diese separat zu finden und können für eine Betrachtung des gesamten Lebenszyklus zusammengeführt werden.

## Technical purpose
Tageslichtsysteme zur Erhöhung des Tageslichteinfalls und zur natürlichen Be- und Entlüftung.

## Reference product
- Glasarchitektur - LAMILUX Heinrich Strunz GmbH - Glasdach PR60: 1

## Inputs
- Use of net fresh water (FW) [m3]: A1-A3 2.54, A4 0.00991, A5 0.16, B2 0.000731, B3 0.13, C2 0.000159, C3 19.1, C4 -5.83e-5, D -0.27
- Use of non renewable primary energy (PENRE) [MJ]: A1-A3 4000, A4 127, A5 19.2, B2 16.7, B3 314, C2 2.04, C3 178, C4 1.28, D -1210
- Use of non renewable primary energy resources used as raw materials (PENRM) [MJ]: A1-A3 124, A4 0, A5 0, B2 0, B3 0, C2 0, C3 -124, C4 0, D 0
- Use of non renewable secondary fuels (NRSF) [MJ]: A1-A3 0, A4 0, A5 0, B2 0, B3 0, C2 0, C3 0, C4 0, D 0
- Use of renewable primary energy (PERE) [MJ]: A1-A3 634, A4 8.55, A5 799, B2 0.25, B3 45.8, C2 0.14, C3 4.61, C4 0.14, D -128
- Use of renewable primary energy resources used as raw materials (PERM) [MJ]: A1-A3 796, A4 0, A5 -796, B2 0, B3 0, C2 0, C3 0, C4 0, D 0
- Use of renewable secondary fuels (RSF) [MJ]: A1-A3 0, A4 0, A5 0, B2 0, B3 0, C2 0, C3 0, C4 0, D 0
- Use of secondary material (SM) [kg]: A1-A3 0, A4 0, A5 0, B2 0, B3 0, C2 0, C3 0, C4 0, D -0.00867
- Total use of non renewable primary energy resource (PENRT) [MJ]: A1-A3 4120, A4 127, A5 19.2, B2 16.7, B3 314, C2 2.04, C3 54.3, C4 1.28, D -1210
- Total use of renewable primary energy resources (PERT) [MJ]: A1-A3 1430, A4 8.55, A5 3.04, B2 0.25, B3 45.8, C2 0.14, C3 4.61, C4 0.14, D -128

## Outputs
- Components for re-use (CRU) [kg]: A1-A3 0, A4 0, A5 0, B2 0, B3 0, C2 0, C3 0, C4 0, D 0
- Exported electrical energy (EEE) [MJ]: A1-A3 0, A4 0, A5 78.6, B2 0, B3 0, C2 0, C3 14.1, C4 0, D 0
- Exported thermal energy (EET) [MJ]: A1-A3 0, A4 0, A5 184, B2 0, B3 0, C2 0, C3 25.4, C4 0, D 0
- Hazardous waste disposed (HWD) [kg]: A1-A3 0.000611, A4 8.14e-6, A5 2.98e-8, B2 0.00515, B3 4.19e-5, C2 1.31e-7, C3 1.86e-6, C4 1.67e-8, D -3.52e-7
- Materials for energy recovery (MER) [kg]: A1-A3 0, A4 0, A5 0, B2 0, B3 0, C2 0, C3 0, C4 0, D 0
- Materials for recycling (MFR) [kg]: A1-A3 0, A4 0, A5 0, B2 0, B3 0, C2 0, C3 58.3, C4 0, D 0
- Non hazardous waste dispose (NHWD) [kg]: A1-A3 41.6, A4 0.00947, A5 2.55, B2 0.0104, B3 2.92, C2 0.000152, C3 1.25, C4 5.15, D -3.34
- Radioactive waste disposed (RWD) [kg]: A1-A3 0.22, A4 0.000153, A5 0.000635, B2 6.3e-5, B3 0.0146, C2 2.46e-6, C3 0.000263, C4 1.88e-5, D -0.0557

## Impact indicators
- Abiotic depletion potential for non fossil resources (ADPE) [kg Sb-Äqv.]: A1-A3 0.000936, A4 9.8e-7, A5 9.23e-7, B2 8.24e-8, B3 0.000498, C2 1.58e-8, C3 1.11e-5, C4 3.24e-8, D -0.000601
- Abiotic depletion potential for fossil resources (ADPF) [MJ]: A1-A3 3570, A4 127, A5 17.6, B2 16.5, B3 277, C2 2.03, C3 35.5, C4 1.24, D -1070
- Acidification potential of soil and water (AP) [kg SO2-Äqv.]: A1-A3 1.26, A4 0.0396, A5 0.00895, B2 0.00086, B3 0.0708, C2 0.000609, C3 0.0162, C4 0.000495, D -0.43
- Eutrophication potential (EP) [kg Phosphat-Äqv.]: A1-A3 0.13, A4 0.0101, A5 0.00238, B2 0.000149, B3 0.00544, C2 0.000155, C3 0.0088, C4 6.86e-5
- Global warming potential (GWP) [kg CO2-Äqv.]: A1-A3 232, A4 9.4, A5 71.2, B2 0.4, B3 21.7, C2 0.15, C3 10.6, C4 0.12, D -77.4
- Depletion potential of the stratospheric ozone layer (ODP) [kg CFC 11 eq.]: A1-A3 4.15e-7, A4 1.98e-13, A5 7.32e-13, B2 1.55e-11, B3 9.95e-8, C2 3.19e-15, C3 1.72e-7, C4 7.6e-12, D -3.46e-7
- Formation potential of tropospheric ozone (POCP) [kg Ethen-Äqv.]: A1-A3 0.0816, A4 -0.0152, A5 0.00213, B2 0.000112, B3 0.00588, C2 -0.000232, C3 0.000978, C4 4.76e-5, D -0.0255

## Use advice
A1-A3 sowie Module A4, A5, B2, B3, C2, C3, C4, D. Das Umweltprofil beinhaltet die Aufwendungen für die Lebenszyklus-Stadien cradle to gate mit Optionen (Modul A1-A3). Die Herstellung der Verpackung wurde innerhalb der Module A1-A3 berücksichtigt.

## Review details
Die angewendete LCI Methode ist in Übereinstimmung mit ISO 14040 und 14044. Die Dokumentation enthält alle relevanten Informationen im Hinblick auf die Datenqualität und den Umfang der Anwendung der jeweiligen LCI Ergebnisse bzw. der Datensätze. Der Datensatz repräsentiert den Stand der Technik bezogen auf die funktionelle Einheit.

## Data sources
- GaBi database (all versions)
- EPD Glasdach PR60 und Rauchlift Glasdach PR60
