# Modular Automatic Drive System for Sliding Doors in the ES 200 product family

Dataset: ILCD process, EPD, specific dataset
Geography: DE
Reference year: 2016
Valid until: 2021
Classification: OEKOBAU.DAT: Komponenten von Fenstern und Vorhangfassaden / Antriebssysteme / elektrisch
Classification: IBUCategories: 02 Bauprodukte / Türen, Fenster, Beschläge und Zubehör / Antriebssysteme für Automatiktüren und -tore
Method details: Antriebssysteme für Automatiktüren und -tore.pdf
Registration number: 8932
Owner: DORMA Deutschland GmbH
Compliance: DIN EN 15804; ISO 14025
Review: Accredited third party review by Institut Bauen und Umwelt e. V.
Amounts: rows without a unit in brackets have none in this file; such an amount is in the reference unit of its flow, which a separate flow dataset defines
copyright: true

## General comment
The innovative automatic drive system ES 200 for sliding doors is a solution for any fields of application and scope of operation. The ES 200 allows DORMA to supply a drive system that covers all applications due to its modular construction with a low number of components. The modular and flexible drive system is available in the following variants:

ES 200 Standard
ES 200 2D
ES 200 EASY
ES 200 EASYplus.

The product family of the modular automatic ES 200 drive system covers all above mentioned drive systems. Average values (material and energy flows) are based on the volumes of ES 200 variants sold during the reference period.

## Technology and included processes
The innovative automatic drive system ES 200 for sliding doors is a solution for any fields of application and scope of operation. The ES 200 allows DORMA to supply a drive system that covers all applications due to its modular construction with a low number of components. The modular and flexible drive system is available in the following variants:  ES 200 Standard  ES 200 2D  ES 200 EASY  ES 200 EASYplus. The product family of the modular automatic ES 200 drive system covers all above mentioned drive systems. Average values (material and energy flows) are based on the volumes of ES 200 variants sold during the reference period. The drive units and requisite circuit boards of the ES 200 product family are manufactured at DORMA. The certified Quality Management system in accordance with /DIN EN ISO 9001/ safeguards the high quality standard of DORMA products. It guarantees continuous improvement of the overall processes and product quality at the DORMA locations.
Technical data:
The following technical data is of relevance for the LCA:
Declared unit:
The declared unit is the average for one (1) modular automatic drive system for sliding doors as sales averages of the

ES 200 Standard
ES 200-2D
ES 200 EASY
ES 200 EASYplus

including the respective packaging materials.

## Technical purpose
The automatic ES 200 drive system is used as a drive for automating sliding door systems as well as escape and rescue routes:

## Reference product
- Modulares Automatik-Antriebssystem für Schiebetüren ES 200 Produktfamilie (Modulares Automatik-Antriebssystem für Schiebetüren ES 200 Produktfamilie ): 1

## Inputs
- Renewable primary energy as energy carrier (PERE) [MJ]: A1-A3 668, A4 0.446, A5 0.212, B3 36.7, B6 2930, C2 0.145, C3 4.9, D -698
- Renewable primary energy resources as material utilization (PERM) [MJ]: A1-A3 87.1, A4 4.22e-13, A5 6.97e-12, B3 1.75, B6 8.22e-8, C2 1.37e-13, C3 1.78e-5, D 2.87e-7
- Total use of renewable primary energy resources (PERT) [MJ]: A1-A3 756, A4 0.446, A5 0.212, B3 38.4, B6 2930, C2 0.145, C3 4.9, D -698
- Non renewable primary energy as energy carrier (PENRE) [MJ]: A1-A3 3070, A4 7.99, A5 2.22, B3 491, B6 13900, C2 2.6, C3 130, D -1960
- Non renewable primary energy as material utilization (PENRM) [MJ]: A1-A3 45.2, A4 0, A5 0, B3 0.0218, B6 0, C2 0, C3 7.41e-10, D 1.77e-11
- Total use of non renewable primary energy resources (PENRT) [MJ]: A1-A3 3110, A4 7.99, A5 2.22, B3 491, B6 13900, C2 2.6, C3 130, D -1960
- Use of secondary material (SM) [kg]: A1-A3 5.15, A4 0, A5 0, B3 0, B6 0, C2 0, C3 0, D 0
- Use of renewable secondary fuels (RSF) [MJ]: A1-A3 0.0788, A4 5.3e-5, A5 7.94e-5, B3 0.00362, B6 0.184, C2 1.73e-5, C3 0.00213, D 0.0586
- Use of non renewable secondary fuels (NRSF) [MJ]: A1-A3 0.688, A4 0.000555, A5 0.000369, B3 0, B6 1.92, C2 0.000181, C3 0.0153, D 0.714
- Use of net fresh water (FW) [m^3]: A1-A3 1320, A4 0.0358, A5 0.197, B3 45.5, B6 2640, C2 0.0116, C3 6.3, D -1780

## Outputs
- Hazardous waste disposed (HWD) [kg]: A1-A3 0.0775, A4 0, A5 0, B3 0.032, B6 0, C2 0, C3 0, D 0.0694
- Non hazardous waste disposed (NHWD) [kg]: A1-A3 719, A4 0.0301, A5 0.443, B3 244, B6 3230, C2 0.00979, C3 11.7, D -243
- Radioactive waste disposed (RWD) [kg]: A1-A3 0.184, A4 1.09e-5, A5 0.000135, B3 0.013, B6 2.09, C2 3.55e-6, C3 0.00428, D -0.106
- Components for re-use (CRU) [kg]: A1-A3 0, A4 0, A5 0, B3 0, B6 0, C2 0, C3 0, D 0
- Materials for recycling (MFR) [kg]: A1-A3 3.11, A4 0, A5 0, B3 6.09, B6 0, C2 0, C3 25.6, D 0
- Materials for energy recovery (MER) [kg]: A1-A3 0, A4 0, A5 4.91, B3 1.48, B6 0, C2 0, C3 3.83, D 0
- Exported electrical energy (EEE) [MJ]: A1-A3 0, A4 0, A5 9.31, B3 2.79, B6 0, C2 0, C3 11.7, D 0
- Exported thermal energy (EET) [MJ]: A1-A3 0, A4 0, A5 21.9, B3 7.25, B6 0, C2 0, C3 28.7, D 0

## Impact indicators
- Global warming potential (GWP) [kg CO_(2)-Äq.]: A1-A3 224, A4 0.58, A5 7.13, B3 43.4, B6 781, C2 0.189, C3 14.7, D -154
- Depletion potential of the stratospheric ozone layer (ODP) [kg CFC11-Äq.]: A1-A3 2.47e-6, A4 2.37e-12, A5 3.43e-11, B3 3.64e-7, B6 5.82e-7, C2 7.73e-13, C3 1.04e-7, D -3.93e-6
- Acidification potential of land and water (AP) [kg SO_(2)-Äq.]: A1-A3 1.37, A4 0.00373, A5 0.00152, B3 0.575, B6 3.93, C2 0.0012, C3 0.0182, D -0.785
- Eutrophication potential (EP) [kg PO_(4)^(3)-Äq.]: A1-A3 0.109, A4 0.000957, A5 0.000267, B3 0.0188, B6 0.214, C2 0.000307, C3 0.00166, D -0.0429
- Formation potential of tropospheric ozone photochemical oxidants (POCP) [kg Ethen-Äq.]: A1-A3 0.0912, A4 -0.00155, A5 0.00011, B3 0.0265, B6 0.229, C2 -0.000493, C3 0.00159, D -0.0501
- Abiotic depletion potential for non fossil resources (ADPE) [kg Sb-Äq.]: A1-A3 0.0119, A4 2.26e-8, A5 1.2e-7, B3 0.00588, B6 0.000124, C2 7.35e-9, C3 1.18e-5, D -0.000173
- Abiotic depletion potential for fossil resources (ADPF) [MJ]: A1-A3 2540, A4 7.96, A5 1.88, B3 442, B6 8710, C2 2.59, C3 120, D -1700

## Use advice
Scope:
This EPD refers to the entire life cycle of an average ES 200 drive system.

The various technical characteristics are depicted in section 2.3.

The production location is the DORMA production site in Ennepetal, Germany. Product components are also procured from the DORMA location in Bonn. The material and energy flows were taken into consideration accordingly.
System boundary:
Type of EPD: cradle to grave (with options)

The following modules are considered in accordance with /EN 15804/:

Modules A1-3, A4, A5

The product stage commences with consideration of the material and energy flows required for manufacturing the product, including all of the associated upstream chains and requisite transport associated with procurement. Furthermore the whole production phase at the production site Ennepetal was mapped, including the treatment of production waste towards achieving the End-of-Waste status (EoW). Distribution transports and the installation into the building were considered as well.

Module B3

This module covers the replacement of expendable parts over the entire operating life of 10 years.

Module B6

This module includes the energy consumption for operating the declared drive units including the stand-by modus over the entire operating life time of 10 years.

Modules C2-3

These modules include the environmental impact associated with waste treatment until reaching the End-of-Waste status (EoW) including the associated transport at the end of the product's life circle.

Module D

Evidence of credits incurred by waste treatment as a result of energetic (MVA route) or material recycling (recycling route) of packaging (A5), spare parts (B3) and the product at the End-of-Life (C3).

## Data sources
- Modulares Automatik-Antriebssystem für Schiebetüren ES 200 Produktfamilie .pdf
- GaBi Database (all versions)
- GaBi database SP28 2015
