# Silka Kalksandstein

Dataset: ILCD process, EPD, average dataset
Geography: DE
Reference year: 2015
Valid until: 2020
Classification: OEKOBAU.DAT: Mineralische Baustoffe / Steine und Elemente / Kalksandstein
Classification: IBUCategories: 02 Bauprodukte / Mauerwerk und Mörtel / Kalksandstein
Method details: Kalksandstein.pdf
Owner: Xella
Compliance: DIN EN 15804; ISO 14025
Review: Accredited third party review by IBU
Amounts: rows without a unit in brackets have none in this file; such an amount is in the reference unit of its flow, which a separate flow dataset defines
copyright: true

## General comment
Die genannten Produkte sind unbewehrte Bausteine unterschiedlicher Formate aus Kalksandstein. Kalksandstein gehört zur Gruppe der dampfgehärteten Baustoffe.

Es erfolgt eine Durchschnittsbildung auf Basis der jährlichen Produktionsvolumen 2013 aller Xella Werke.

## Technology and included processes
Sand 50 - 85 M-% Kies 0 - 45 M-% Brechsand 0 - 15 M-% Weißfeinkalk 4 - 9 M-% Graukalk 0 - 4 M-% //Herstellung: Die verwendeten Rezepturen werden den jeweiligen Rohstoffeigenschaften angepasst und variieren innerhalb der unter 2.6. Grundstoffe/Hilfsstoffe angegebenen Schwankungsbreiten. Weitere Stoffe sind nicht enthalten. Die Rohstoffe (Sand, Branntkalk und Wasser) werden entsprechend der jeweiligen Rezeptur gravimetrisch dosiert und intensiv miteinander vermischt. Anschließend wird die Rohstoffmischung in einem Reaktor genannten Reaktionsbehälter zwischengelagert, wobei es zu einer exothermen Reaktion kommt. Damit wird sichergestellt, dass der Branntkalk vor der Weiterverarbeitung vollständig zu Kalkhydrat ablöscht. Vom Reaktor gelangt das Mischgut in einen Nachmischer, in dem es durch Wasserzugabe auf Pressfeuchte gebracht wird. Die Verdichtung und Formgebung der Rohmasse erfolgt im Anschluss hieran in Formkästen durch die Kalksandsteinpressen. Die Rohlinge werden dann mittels einer Stapelautomatik auf Härtewagen gestapelt und über ein Schiebebühnensystem per Gleisanlage in den Härtekessel transportiert. Die Ausbildung der endgültigen Eigenschaften der Bauteile erfolgt während der anschließenden Dampfhärtung über 6 – 12 Stunden bei etwa 200°C und einem Druck von ca. 16 bar in Dampfdruckkesseln, den sog. Autoklaven. Hier bilden sich aus den eingesetzten Stoffen Calcium-Silikat- Hydrate. Die Reaktion des Materials ist mit der Entnahme aus dem Autoklav abgeschlossen. Der Dampf wird nach Abschluss des Härtungsprozesses für weitere Autoklavzyklen verwandt. Das anfallende Kondensat wird soweit technologisch möglich als Prozesswasser genutzt.
Technische Daten:
Siehe Leistungserklärung für das jeweilige Produkt. Allgemeine Angaben enthält die nachfolgende Tabelle.
Deklarierte Einheit:
Die Deklaration bezieht sich auf die Herstellung von 1 m³ Kalksandstein mit einer durchschnittlichen Rohdichte von 1800 kg/m³.

## Technical purpose
Unbewehrte Bausteine für gemauerte, tragende und nicht tragende Wände.

## Reference product
- 1 m³ Kalksandstein: 1

## Inputs
- Erneuerbare Primärenergie als Energieträger (PERE) [MJ]: A1-A3 135
- Erneuerbare Primärenergie zur stofflichen Nutzung (PERM) [MJ]: A1-A3 0
- Total erneuerbare Primärenergie (PERT) [MJ]: A1-A3 135
- Nicht-erneuerbare Primärenergie als Energieträger (PENRE) [MJ]: A1-A3 1735
- Nicht-erneuerbare Primärenergie zur stofflichen Nutzung (PENRM) [MJ]: A1-A3 0
- Total nicht erneuerbare Primärenergie (PENRT) [MJ]: A1-A3 1735
- Einsatz von Sekundärstoffen (SM) [kg]: A1-A3 0
- Erneuerbare Sekundärbrennstoffe (RSF) [MJ]: A1-A3 0
- Nicht erneuerbare Sekundärbrennstoffe (NRSF) [MJ]: A1-A3 0
- Einsatz von Süßwasserressourcen (FW) [m^3]: A1-A3 0.44

## Outputs
- Gefährlicher Abfall zur Deponie (HWD) [kg]: A1-A3 0.08
- Entsorgter nicht gefährlicher Abfall (NHWD) [kg]: A1-A3 24.8
- Entsorgter radioaktiver Abfall (RWD) [kg]: A1-A3 0.03
- Komponenten für die Wiederverwendung (CRU) [kg]
- Stoffe zum Recycling (MFR) [kg]
- Stoffe für die Energierückgewinnung (MER) [kg]
- Exportierte elektrische Energie (EEE) [MJ]
- Exportierte thermische Energie (EET) [MJ]

## Impact indicators
- Globales Erwärmungspotenzial (GWP) [kg CO_(2)-Äq.]: A1-A3 216
- Abbau Potential der stratosphärischen Ozonschicht (ODP) [kg CFC11-Äq.]: A1-A3 1.51e-9
- Versauerungspotenzial von Boden und Wasser (AP) [kg SO_(2)-Äq.]: A1-A3 0.175
- Eutrophierungspotenzial (EP) [kg PO_(4)^(3)-Äq.]: A1-A3 0.0285
- Bildungspotential für troposphärisches Ozon (POCP) [kg Ethen-Äq.]: A1-A3 0.00279
- Potenzial für den abiotischen Abbau nicht fossiler Ressourcen (ADPE) [kg Sb-Äq.]: A1-A3 0.000216
- Potenzial für den abiotischen Abbau fossiler Brennstoffe (ADPF) [MJ]: A1-A3 1656

## Use advice
Gültigkeitsbereich:
Die Ökobilanz berücksichtigt die Datenbasis des Jahres 2013 und folgende, deutsche Kalksandstein-Werke: Blatzheim, Bocholt, Colbitz, Eisendorf, Griedel, Haltern, Kaltenkirchen, Möllenhagen, Neustadt, Niederlehme, Nievenheim, Nohra, Reinbek, Remsfeld, Ruhlsdorf, Schönbach und Wankum.
Systemgrenze:
Typ der EPD: Wiege-bis-Werkstor

Im Einzelnen wurden folgende Prozesse in das Produktstadium A1-A3 der Kalksandstein-Herstellung einbezogen:

Bereitstellungsprozesse von Hilfsstoffen & Energie
Transporte der Ressourcen und Vorprodukte (Kalk, Sand etc.) zum jeweiligen Produktionsstandort
Herstellprozess im Werk inklusive energetischer Aufwendungen, Herstellung von Hilfsstoffen, Entsorgung anfallender Reststoffe
Herstellung der anteiligen Verpackung

## Data sources
- Silka Kalksandstein.pdf
- GaBi Database (all versions)
- GaBi database SP25 2014
