# NedZink Naturel

Dataset: ILCD process, EPD, specific dataset
Geography: NL
Reference year: 2015
Valid until: 2020
Classification: OEKOBAU.DAT: Metalle / Zink / Zinkbleche
Classification: IBUCategories: 02 Bauprodukte / Metallbauprodukte und Zubehör / Baumetalle
Method details: Baumetalle.pdf
Owner: NedZink B.V.
Compliance: DIN EN 15804; ISO 14025
Review: Accredited third party review by IBU
Amounts: rows without a unit in brackets have none in this file; such an amount is in the reference unit of its flow, which a separate flow dataset defines
copyright: true

## General comment
NedZink® NATUREL is titanium zinc produced by NedZink according to EN 988. Small quantities, as specified in EN 988, of the alloy elements copper, titanium and aluminium are added to electrolytically refined zinc (with a purity of min. 99,995% Zn, Z1 according to EN 1179). The chemical composition, mechanical and physical properties and measurement tolerances are determined in the KOMO product certificate and the product certificate from Lloyd’s Register, LRIQS (Approval QIS122). The defined material properties are checked by an independent and neutral research institute. This product certification and the ISO 9001 certificate for the quality management system at NedZink assure a constant and uniform high quality standard.

## Technology and included processes
NedZink NATUREL is titanium zinc according to DIN EN 988. The main components are high purity zinc (Zn refined zinc with a purity of 99.995% - Z1 according to DIN EN 1179), together with the alloy elements copper, titanium and aluminum. In a first step, the master alloy is being prepared separately in an induction furnace. Subsequently, the alloy is mixed in the furnace with high-purity zinc. The final alloy is then poured into a Vertikalgießanlage in blocks. These blocks are evenly heated and hot-rolled in several steps and cold rolled after cooling to the desired material thickness. Finally done the plug directing and the assembly to the desired band and panel dimensions. All used packaging materials (wood, paper / cardboard and PE films) are therefore reusable or recyclable. The packaging recycling is not considered in this study. The LCA results include the life cycle stages from manufacturing the materials up to the extraction of raw materials and the processing methods of serving as an input secondary metabolites (eg recycling processes), which transports the work and the production itself, including the provision of all materials and supplies, energy, and complete waste treatment or disposal of waste materials during the stage of production. The modules A1, A2 and A3 are shown here as an aggregate module A1-A3. If more modules have been calculated for this record, they can be found separately and can be combined for a consideration of the entire life cycle.
Declared unit:
The declared unit is 1 kg of NedZink NATUREL, bright-rolled titanium zinc.

## Technical purpose
NedZink® NATUREL titanium zinc coils, sheets, strips and profiles are used for roof and façade cladding, interior use and rainwater drainage systems (gutters, downpipes and accessories).
NedZink® NATUREL is intended mainly for outdoor use. However, the product is safe for indoor use and can be used as such. There are no harmful emissions to indoor air. The product does not contain VOC’s.

## Reference product
- 1 kg NEDZINK NATUREL: 1

## Inputs
- Erneuerbare Primärenergie als Energieträger (PERE) [MJ]: A1-A3 1.27, D 0.367
- Erneuerbare Primärenergie zur stofflichen Nutzung (PERM) [MJ]
- Total erneuerbare Primärenergie (PERT) [MJ]: A1-A3 1.27, D 0.367
- Nicht-erneuerbare Primärenergie als Energieträger (PENRE) [MJ]: A1-A3 19.7, D -11.7
- Nicht-erneuerbare Primärenergie zur stofflichen Nutzung (PENRM) [MJ]
- Total nicht erneuerbare Primärenergie (PENRT) [MJ]: A1-A3 19.7, D -11.7
- Einsatz von Sekundärstoffen (SM) [kg]
- Erneuerbare Sekundärbrennstoffe (RSF) [MJ]
- Nicht erneuerbare Sekundärbrennstoffe (NRSF) [MJ]
- Einsatz von Süßwasserressourcen (FW) [m^3]: A1-A3 0.052

## Outputs
- Gefährlicher Abfall zur Deponie (HWD) [kg]
- Entsorgter nicht gefährlicher Abfall (NHWD) [kg]: A1-A3 0.00487
- Entsorgter radioaktiver Abfall (RWD) [kg]
- Komponenten für die Wiederverwendung (CRU) [kg]
- Stoffe zum Recycling (MFR) [kg]: D 0.9
- Stoffe für die Energierückgewinnung (MER) [kg]
- Exportierte elektrische Energie (EEE) [MJ]
- Exportierte thermische Energie (EET) [MJ]

## Impact indicators
- Globales Erwärmungspotenzial (GWP) [kg CO_(2)-Äq.]: A1-A3 1.71, D -1.15
- Abbau Potential der stratosphärischen Ozonschicht (ODP) [kg CFC11-Äq.]: A1-A3 9.89e-8, D -7.4e-8
- Versauerungspotenzial von Boden und Wasser (AP) [kg SO_(2)-Äq.]: A1-A3 0.0114, D -0.00964
- Eutrophierungspotenzial (EP) [kg PO_(4)^(3)-Äq.]: A1-A3 0.00217, D -0.00182
- Bildungspotential für troposphärisches Ozon (POCP) [kg Ethen-Äq.]: A1-A3 0.000123, D -8.09e-5
- Potenzial für den abiotischen Abbau nicht fossiler Ressourcen (ADPE) [kg Sb-Äq.]: A1-A3 8.29e-5, D -7.24e-5
- Potenzial für den abiotischen Abbau fossiler Brennstoffe (ADPF) [MJ]

## Use advice
Scope:
The Life Cycle Assessment (LCA) was carried out according to ISO 14040, ISO 14044 and EN 15804. The LCA is performed for NedZink® NATUREL manufactured by NedZink B.V. in Budel-Dorplein, Netherlands. NedZink B.V. has provided the site-specific data, background processes are taken from the Ecoinvent (version 2) database. The LCA was carried out for the manufacturing phase of the declared product, containing information on raw and secondary material production, transport and packaging (cradle to gate). Possible credits after the end of life phase (module D) are also included.
System boundary:
Type of the EPD: Cradle-to-Gate for a specific product created at the NedZink production plant (declaration of a specific product from a manufacturer’s plant).. Modules A1, A2 and A3 contain information on raw- and secondary material extraction, transport to the manufacturer, manufacturing and packaging. The possible credits after End-of-Life of the product are also included (module D). No other modules are included in the EPD. Considering the economic value of zinc, the end-of-waste stadium is met after deconstruction of the metal from the building (using hand-tools). As such, there will be no contribution from module C.

## Data sources
- NedZink Naturel.pdf
- ecoinvent database (all versions)
- ecoinvent 2.2 database
