# Brillux Evocryl 200

Dataset: ILCD process, EPD, specific dataset
Geography: DE
Reference year: 2015
Valid until: 2020
Classification: OEKOBAU.DAT: Beschichtungen / Fassadenfarben / Dispersion
Classification: IBUCategories: 02 Bauprodukte / Bauklebstoffe und Beschichtungen / Beschichtungen mit organischen Bindemitteln
Method details: Beschichtungen mit organischen Bindemitteln.pdf
Owner: Brillux GmbH & Co. KG
Compliance: DIN EN 15804; ISO 14025
Review: Accredited third party review by IBU
Amounts: rows without a unit in brackets have none in this file; such an amount is in the reference unit of its flow, which a separate flow dataset defines
copyright: true

## General comment
Brillux Evocryl 200 ist eine matte, wasserverdünnbare Reinacrylat-Fassadenfarbe. Sie ist fotokatalytisch wirksam, hoch wetterbeständig, verschmutzungsunempfindlich und CO2 diffusionsgeprüft (>50 m) nach /DIN EN 1062-6/.

Es handelt sich um ein werkseitig hergestelltes flüssiges Gemisch mit organischem Bindemittel, mineralischen Füllstoffen, Pigmenten, Wasser und Zusatzstoffen. Die Verfestigung erfolgt durch Trocknung und Verfilmung der Polymerbindemittel.

## Technology and included processes
Brillux Evocryl 200 ist eine matte,wasserverdünnbare Reinacrylat-Fassadenfarbe. Sie ist fotokatalytisch wirksam, hoch wetterbeständig, verschmutzungsunempfindlich und CO2 diffusionsgeprüft (>50 m) nach DIN EN 1062-6. Es handelt sich um ein werkseitig hergestelltes flüssiges Gemisch mit organischem Bindemittel, mineralischen Füllstoffen, Pigmenten, Wasser und Zusatzstoffen. Die Verfestigung erfolgt durch Trocknung und Verfilmung der Polymerbindemittel.
Deklarierte Einheit:
Die Deklaration bezieht sich auf 1 kg Brillux Evocryl 200. Da Farben nach Volumen (Liter) verkauft werden, ist nachfolgend der Verbrauch volumenbezogen angegeben.

## Technical purpose
Für wetterbeständige und dauerhafte Fassadenanstriche auf allen tragfähigen, mineralischen Untergründen, z. B. Normalputz, Beton, Faserzement, intakte Dispersionsfarbenanstriche und organisch gebundene Putze, auch im Brillux Wärmedämm-Verbundsystem. Geeignet zur gleichmäßigen Beschichtung auf glatten Untergründen. Der Verbrauch beträgt ca. 0,140 - 0,170 l/m².

## Reference product
- 1 kg Brillux Evocryl 200: 1

## Inputs
- Erneuerbare Primärenergie als Energieträger (PERE) [MJ]: A1-A3 1.62
- Erneuerbare Primärenergie zur stofflichen Nutzung (PERM) [MJ]: A1-A3 0
- Total erneuerbare Primärenergie (PERT) [MJ]: A1-A3 1.62
- Nicht-erneuerbare Primärenergie als Energieträger (PENRE) [MJ]: A1-A3 20.57
- Nicht-erneuerbare Primärenergie zur stofflichen Nutzung (PENRM) [MJ]: A1-A3 10.63
- Total nicht erneuerbare Primärenergie (PENRT) [MJ]: A1-A3 31.2
- Einsatz von Sekundärstoffen (SM) [kg]: A1-A3 0
- Erneuerbare Sekundärbrennstoffe (RSF) [MJ]: A1-A3 0
- Nicht erneuerbare Sekundärbrennstoffe (NRSF) [MJ]: A1-A3 0
- Einsatz von Süßwasserressourcen (FW) [m^3]: A1-A3 0.0066

## Outputs
- Gefährlicher Abfall zur Deponie (HWD) [kg]: A1-A3 0.00237
- Entsorgter nicht gefährlicher Abfall (NHWD) [kg]: A1-A3 0.0358
- Entsorgter radioaktiver Abfall (RWD) [kg]: A1-A3 0.000763
- Komponenten für die Wiederverwendung (CRU) [kg]
- Stoffe zum Recycling (MFR) [kg]
- Stoffe für die Energierückgewinnung (MER) [kg]
- Exportierte elektrische Energie (EEE) [MJ]
- Exportierte thermische Energie (EET) [MJ]

## Impact indicators
- Globales Erwärmungspotenzial (GWP) [kg CO_(2)-Äq.]: A1-A3 1.61
- Abbau Potential der stratosphärischen Ozonschicht (ODP) [kg CFC11-Äq.]: A1-A3 4.44e-10
- Versauerungspotenzial von Boden und Wasser (AP) [kg SO_(2)-Äq.]: A1-A3 0.0259
- Eutrophierungspotenzial (EP) [kg PO_(4)^(3)-Äq.]: A1-A3 0.000517
- Bildungspotential für troposphärisches Ozon (POCP) [kg Ethen-Äq.]: A1-A3 0.0011
- Potenzial für den abiotischen Abbau nicht fossiler Ressourcen (ADPE) [kg Sb-Äq.]: A1-A3 2.5e-6
- Potenzial für den abiotischen Abbau fossiler Brennstoffe (ADPF) [MJ]: A1-A3 29.3

## Use advice
Gültigkeitsbereich:
In dieser Produktdeklaration wird die Reinacrylat-Fassadenfarbe Brillux Evocryl 200 betrachtet, die am Standort Münster/Westfalen hergestellt wird.
Systemgrenze:
Diese Ökobilanz adressiert das Lebenszyklusstadium der Produktherstellung (Wiege bis Werktor). Das Produktstadium umfasst die Module A1 (Rohstoffbereitstellung), A2 (Transport), A3 (Herstellung) gemäß der /DIN EN 15804/.

## Data sources
- Brillux Evocryl 200.pdf
- GaBi Database (all versions)
- GaBi database SP28 2015
