# PE - ummantelte Kupfer-Hausinstallationsrohre

Dataset: ILCD process, EPD, average dataset
Geography: DE
Reference year: 2015
Valid until: 2020
Classification: OEKOBAU.DAT: Metalle / Kupfer / Kupferrohre
Classification: IBUCategories: 02 Bauprodukte / Metallbauprodukte und Zubehör / Metallrohre für Hausinstallationen
Method details: Metallrohre für Hausinstallationen.pdf
Owner: Wieland
Compliance: DIN EN 15804; ISO 14025
Review: Accredited third party review by IBU
Amounts: rows without a unit in brackets have none in this file; such an amount is in the reference unit of its flow, which a separate flow dataset defines
copyright: true

## General comment
Dieses Dokument bezieht sich auf werksseitig ummantelte, flexible Wieland-Markenkupferrohre. Für die Herstellung von Installationsrohren wird bei Wieland Kupfer der sauerstofffreien Qualität Cu-DHP nach /DIN EN1057/ eingesetzt. Bei Cu-DHP handelt es sich um desoxidiertes Kupfer mit begrenzt hohem Phosphorgehalt (maximal 0,040 %), welches sich durch seine sehr gute Schweiß- und Lötbarkeit auszeichnet. Der Reinheitsgrad beträgt

mindestens 99,90 % Kupfer.

Folgende Marke wird von Wieland angeboten:

Tabelle 1: Flexible Markenkupferrohre für die Gebäudetechnik

Die deklarierte Einheit umfasst die Herstellung und Aufbereitung von einem Kilogramm ummanteltem Kupferrohr (PE-Ummantelung) mit durchschnittlichem Ummantelungsanteil.

Zur Umrechnung der Bezugsgröße sind in Tabelle 4 das Gewicht und für eine mögliche spätere Berechnung von Wärmeverlusten der Installation die Außenfläche des Rohres pro Meter im Lieferzustand angegeben.

Basis für die Berechnung der Ergebnisse sind die jeweils angegebenen produzierten Jahresmengen an ummantelten Kupferrohren. Die Ergebnisse basieren dabei auf gemittelten Werten, die sich anhand der Jahresproduktionsmengen zusammensetzen.

## Technology and included processes
Fertigung flexibler Wieland-Markenkupferrohren mit fest haftender Ummantelung: cuprotherm CTX® In der ersten Stufe der Kupferrohrproduktion wird aus dem Rundbolzen ein Vorrohr hergestellt. Dieses Vorrohr wird durch Warmumformen bei ca. 950° C in einer direkt arbeitenden Presse hergestellt (Abbildung 1). Abbildung 1: Rohrpressverfahren Dem Warmumformschritt im High-Ratio Verfahren folgt als nächste Stufe die Kaltverformung durch Ziehen mit fliegendem Dorn. Abbildung 2 zeigt die schematische Darstellung dieser Umformprozesse. Abbildung 2: Schema der Fertigung von blanken Wieland-Markenkupferrohren Die Arbeitsschritte zum abschließenden Fertigrohr erfolgen in mehreren Stufen jeweils durch Kaltziehen in Ziehmaschinen. Im Unterschied zur Warmverformung wird dabei mit einem „fliegenden Dorn“ (Mandrille) gearbeitet. Abbildung 3 zeigt in einer Querschnittzeichnung das Prinzip des „fliegenden Dorns“. Abbildung 3: Prinzip des fliegenden Dorns Zur Ummantelung wird PE-Granulat mit einer bestimmten Dichte unter Beigabe von adhäsiven Zusätzen auf das Rohr extrudiert. Danach werden die Rohre gekennzeichnet, abgelängt und verpackt. Gütesicherung: Eigenüberwachung durch den Hersteller mit Qualitätsmanagementsystem nach /DIN EN ISO 9001/ sowie Fremdüberwachung durch Gütegemeinschaft Kupferrohre e.V., DVGW und andere nationale europäische Überwachungsinstitutionen, wie KIWA, CSTB, etc.
Technische Daten:
Prüfnormen/Produktnormen/Zulassungen:

/DVGW-VP 652/,/RAL-Gütezeichen der Gütegemeinschaft Kupferrohre/.

Tabelle 2: Physikalische Eigenschaften der Ummantelung von flexiblen Wieland-Markenkupferrohren
Deklarierte Einheit:
Die Deklaration bezieht sich auf die Herstellung von und das Recycling von einem Kilogramm Kupferrohr (ummantelt).
Tabelle 5: Überblick zu den Produktgruppen, Firmennamen, Produktionsstätten und Art der Durchschnittsbildung.

Der Durchschnitt wurde auf Basis der jährlichen Produktionsmenge gebildet. Die Annahmen für die Durchschnittsbildung für 1kg ummanteltes Kupferrohr sind in Absatz 1 näher erläutert.

## Technical purpose
Die Einsatzzwecke der deklarierten Markenkupferrohre sind Transport von:

Trinkwasser kalt, warm, Zirkulation

Regenwasser

Heizung

Wärmeträgern in Flächenheizung, Flächenkühlung und Geothermie

## Reference product
- 1 kg PE-Extrusion ummanteltes Kupferrohr: 1

## Inputs
- Erneuerbare Primärenergie als Energieträger (PERE) [MJ]: A1-A3 2.97, C4 0.0477, D -1.66
- Erneuerbare Primärenergie zur stofflichen Nutzung (PERM) [MJ]: A1-A3 0
- Total erneuerbare Primärenergie (PERT) [MJ]: A1-A3 2.97, C4 0.0477, D -1.66
- Nicht-erneuerbare Primärenergie als Energieträger (PENRE) [MJ]: A1-A3 45.8, C4 0.523, D -14.1
- Nicht-erneuerbare Primärenergie zur stofflichen Nutzung (PENRM) [MJ]: A1-A3 0
- Total nicht erneuerbare Primärenergie (PENRT) [MJ]: A1-A3 45.8, C4 0.523, D -14.1
- Einsatz von Sekundärstoffen (SM) [kg]: A1-A3 0, C4 0, D 0
- Erneuerbare Sekundärbrennstoffe (RSF) [MJ]: A1-A3 0, C4 0, D 0
- Nicht erneuerbare Sekundärbrennstoffe (NRSF) [MJ]: A1-A3 0, C4 0, D 0
- Einsatz von Süßwasserressourcen (FW) [m^3]: A1-A3 0.0115, C4 0.00232, D -0.00459

## Outputs
- Gefährlicher Abfall zur Deponie (HWD) [kg]: A1-A3 0.0018, C4 6.48e-5, D -0.00151
- Entsorgter nicht gefährlicher Abfall (NHWD) [kg]: A1-A3 0.0534, C4 0.167, D -0.00505
- Entsorgter radioaktiver Abfall (RWD) [kg]: A1-A3 0.000953, C4 2.49e-5, D -0.000651
- Komponenten für die Wiederverwendung (CRU) [kg]: A1-A3 0, C4 0
- Stoffe zum Recycling (MFR) [kg]: A1-A3 0, C4 0
- Stoffe für die Energierückgewinnung (MER) [kg]: A1-A3 0, C4 0
- Exportierte elektrische Energie (EEE) [MJ]: A1-A3 0, C4 0
- Exportierte thermische Energie (EET) [MJ]: A1-A3 0, C4 0

## Impact indicators
- Globales Erwärmungspotenzial (GWP) [kg CO_(2)-Äq.]: A1-A3 2.07, C4 0.964, D -1.1
- Abbau Potential der stratosphärischen Ozonschicht (ODP) [kg CFC11-Äq.]: A1-A3 1.14e-10, C4 1.17e-12, D -2.7e-11
- Versauerungspotenzial von Boden und Wasser (AP) [kg SO_(2)-Äq.]: A1-A3 0.00713, C4 0.000242, D -0.00333
- Eutrophierungspotenzial (EP) [kg PO_(4)^(3)-Äq.]: A1-A3 0.000634, C4 1.97e-5, D -0.000316
- Bildungspotential für troposphärisches Ozon (POCP) [kg Ethen-Äq.]: A1-A3 0.000766, C4 1.34e-5, D -0.000222
- Potenzial für den abiotischen Abbau nicht fossiler Ressourcen (ADPE) [kg Sb-Äq.]: A1-A3 9.27e-6, C4 1.39e-7, D -5.3e-6
- Potenzial für den abiotischen Abbau fossiler Brennstoffe (ADPF) [MJ]: A1-A3 43.3, C4 0.461, D -12.5

## Use advice
Gültigkeitsbereich:
Die vorliegende EPD ist eine Durchschnitts - EPD.

Die für die Berechnung der Ökobilanz verwendeten Werte stammen von zwei Herstellern. Die Produktionsstandorte sind Osnabrück und Ulm.
Systemgrenze:
Die Lebenszyklusanalyse für die Herstellung der betrachteten Kupferrohre umfasst die Lebenswegabschnitte „von der Wiege bis zum Werkstor" (cradle to gate) mit Option.

Produktionsstadium

Module A1-A3 betrachtet: Die Bereitstellung von Rohmaterialen, Hilfsstoffen und Energien, Transport von Rohmaterialien und Hilfsstoffen Herstellprozess im Werk inklusive energetischen Aufwendungen, Herstellung von Hilfsstoffen, Entsorgung von anfallenden Reststoffen und der Berücksichtigung von auftretenden Werksemissionen. Kreislaufführung von Produktionsschrotten.

Module C4 beinhaltet die Emissionen im End-of-Life bei der Verbrennung und Deponierung.

Für Kupferschrott wird angenommen, dass der "end-of-waste" Status nach dem Sortieren und Schreddern beim Abriss oder in den Abfallbehandlungsanlagen erreicht ist.

In Modul D werden Wiederverwendung und Recycling von Kupferschrott auf Basis der Netto-Schrottmenge im End-of-Life betrachtet.

## Data sources
- PE - ummantelte Kupfer-Hausinstallationsrohre.pdf
- GaBi Database (all versions)
- GaBi database SP27 2015
